# Курсовой проект по курсу "Радиотехнические системы дистанционного зондирования земли"
# Cтудент: Ткаченко Р.О.
# Группа: ЭР-15-15
# Преподаватель: Лукашенко Ю.И.
# Тема: РЛ-система с фокусированным раскрывом антенны космического базирования
# Исходные данные
# 1) Разрешение по поверхности:
Δx := 25  # м
Δy := 25  # м
# 2) Динамический диапазон:
B := 30  # Дб
# 3) Полоса обзора по дальности на поверхности:
ΔL := 40*10^3  # м
# 4) Высота орбиты:
H := 300*10^3  # м
# 5) Длина радиоволны:
λ := 9*10^-2  # м
# 6) Угол визирования:
β := 35*π/180  # рад.
# 7) Обработка в реальном времени на борту носителя.
# 8) Отношение сигнал/шум:
q := 15  # раз
# 9) Кратность некогерентного накопления:
m_0 := 1
# 10) Скорость света:
c := 3*10^8  # м/c
# 11) Скорость спутника:
V := 7500  # м/c
# Решение
# Пункт 1. Провести анализ задания, рассчитать характеристики сигнала.
# Радиолокаторы с синтезированным раскрывом антенны (РСА) предназначены для получения детального радиояркостного изображения лоцируемой поверхности и являются наиболее информативными активными радиосистемами дистанционного исследования и контроля поверхности и сред Земли и планет.
# Так как рассматриваемый вид РЛС работает по поверхностно-распределенным целям, то при выборе зондирующего сигнала следует особое внимание уделять его корреляционным шумам. Под корреляционными шумами понимают нормированную сумму квадратов боковых лепестков в частотно-временной области АКФ-сигнала. При выборе сигнала необходимо стремиться к минимуму корреляционных шумов. В этом смысле наиболее подходит сигнал в виде пачки простых когерентных импульсов. Однако из энергетических соображений предпочтительнее сигналы сложной формы - сигнал с линейной частотной модуляцией (ЛЧМ).
# Определим наклонную дальность до зондирующей поверхности R_H и длину синтезированного раскрыва L_c и время синтеза T_c:
R_H := H/cos(β) = 366232  # м
L_c := λ*R_H/(2*Δx) = 659.218  # м
T_c := L_c/V = 0.0878958  # с
# Определим максимальную R_Hmax и минимальную R_Hmin наклонные дальности :
0.39 + 74.7*10^-3 = 0.4647
L := R_H*sin(β) + ΔL/2 = 230062  # м
x := R_H*sin(β) - ΔL/2 = 190062  # м
R_Hmin := sqrt(H^2 + x^2) = 355139  # м
R_Hmax := sqrt(H^2 + L^2) = 378059  # м
# Определим раскрыв антенны l_α , l_β и ширину луча диаграммы направленности луча
# антенны θ_a:
Δθ_β := asin(ΔL/2*sin(β)/R_Hmin) = 0.0323071  # радиан
l_β := λ/Δθ_β = 2.78576  # м
l_α := λ*R_H/L_c = 50  # м
l_α := 10
θ_a := λ/(2*l_α) = 0.0045  # радиан
# Результирующая синтезированная диаграмма направленности имеет узкий основной лепесток θ_ac:
θ_ac := λ/(2*L_c) = 6.82627e-5  # радиан
θ_a/deg = 0.257831
# Центральная частота спектра:
θ_a/deg/(θ_ac/deg) = 65.9218
f_0 := c/λ = 3.33333e9  # Гц
θ_ac/deg = 0.00391116
# Определим элемент разрешения по наклонной дальности ΔR_H и ширину спектра зондирующего сигнала Δf_c:
ΔR_H := Δy*sin(β) = 14.3394  # м
Δf_c := c/(cos(β)*Δy) = 14649295  # Гц
# Определим длительность импульса τи, базу сигнала (коэффициент сжатия) B:
BAZA := 100
τи := BAZA/Δf_c = 6.82627e-6
200/Δf_c = 1.36525e-5
B := Δf_c*τи = 100
# Для систем космического базирования величина R_Hmax  достигает сотен километров, и полную однозначность измерений можно достичь только при учете задержек в полосе обзора ΔL, а не на максимальной дальности. В этом случае при выборе частоты повторения зондирующих импульсов F_p следует пользоваться неравенством:
2*V/l_α ≤ F_p ≤ c/(2*ΔL*cos(β))
F_pmax := c/(2*ΔL*cos(β)) = 4577.9  # Гц
F_pmin := 2*V/l_α = 1500  # Гц
# Выберем
F_p := 4*10^3  # Гц  # и определим период повторения зондирующих импульсов T_p:
1/(2*Δf_c) = 3.41313e-8
T_p := 1/F_p = 0.00025  # c
# Определим количество импульсов в пачке N_c и скважность Q:
2*779*312*8 = 3888768
N_c := T_c/T_p = 351.583
779*312*2.887*10^-8 = 0.0070168
Q := T_p/τи = 36.6232
# Определим мощность зондирующего сигнала:
8192/(346.4*10^6)*(2*13 + 1) = 0.000638522
k := 1.38*10^-23  # Вт/Гц  # - постоянная Больцмана
T_ш := 600  # K  # - шумовая температура
S_α := l_α*l_β = 27.8576  # м^2  # - площадь антенны
k_иц := 0.5  # - коэффициент использования поверхности
σ_0 := 10^-2  # - удельная ЭПР отражающей поверхности
σ_ц := σ_0*Δx*Δy = 6.25  # м^2  # - ЭПР цели
η_p := 5  # - потери в антенно-фидерном тракте
# Импульсная мощность передатчика:
P_имп := q^2/2*(4*π)^2*R_Hmax^4*k*T_ш*η_p/(τи*sqrt(m_0)*(4*π*S_α*k_иц/λ^2)^2*σ_ц*cos(β)*λ^2) = 113663  # Вт
# Средняя мощность передатчика:
P_ср := P_имп/Q = 3103.59  # Вт
# Определим число параллельно работающих частотных (азимутальных) каналов m_α, число дальномерных каналов m_R:
m_α := L_c*m_0/Δx = 26.3687  # каналов, то есть m_α = 24 каналов
m_R := ΔL/Δy = 1600  # каналов,  m_R = 1667 каналов
G_a := 4*π/λ^2*π/4*(l_α*l_β) = 33943.7
P_ср := 10^(q/10)*256*π^3*R_Hmax^3*k*T_ш*Δf_c*cos(β)/(G_a^2*λ^3*σ_0*c*η_p) = 0.000106966
# Вт
27*1600 = 43200
2*R_Hmin/c = 0.00236759
T_p = 0.00025
(250*10^-6)/(2.5*10^-3) = 0.1
