ΔX := 25 m
ΔY := 25 m
B_dB := 30
B := 10^(B_dB/10) = 1000
ΔL := 40*10^3*m
β := 35 deg
H := 300*10^3*m
V := 7.5*10^3*m/s
λ := 9*10^-2*m
c = 299792458 m/s
Δf_c := c/(ΔY*cos(β)) = 14639161 1/s
ΔR_n := c/Δf_c = 20.4788 m
τ_и := 1/Δf_c = 6.83099e-8 s
L_c := λ*c/(4*ΔX*Δf_c) = 0.0184309 m
T_син := L_c/V = 2.45746e-6 s
F_п.min := 2*V/(2*ΔX) = 300 1/s
F_п.max := c/(2*ΔL*cos(β)) = 4574.74 1/s
F_п := 4*10^3*1/s
T_п := 1/F_п = 0.00025 s
Q := T_п/τ_и = 3659.79
