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c := 3*10^8
β_05 := 1
d_β := 4
L := 50.8
λ := β_05*d_β/L = 0.0787402
f_0 := c/λ = 3810000000
r_max := 500*10^3
T := 1.2*2*r_max/c = 0.004
F := 1/T = 250
Δr := 100
τ_и := 2*Δr/c = 6.66667e-7
Ω := 10
M := β_05/(Ω*T) = 25
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k_ф := 1.37
П_эф := k_ф/τ_и = 2055000
Δf_0_f0 := 10^-5
Δf_г_fг := 10^-5
f_г := 7.66*10^9
f_0 = 3810000000
Δf_0 := f_0*Δf_0_f0 = 38100
Δf_г := f_г*Δf_г_fг = 76600
Δf := 2*sqrt(Δf_0^2 + Δf_г^2) = 171104
Δf_пр := П_эф + Δf = 2226104
Δf_ш := 1.1*Δf_пр = 2448715
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T_А := 200
T_0 := 290
k_ш_пр := 8
k_ш := T_А/T_0 + k_ш_пр - 1 = 7.68966
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ΔΘ_β := 90
Δβ := 1
m_β := ΔΘ_β/Δβ = 90
ΔΘ_ε := 50
m_ε := ΔΘ_ε/Δβ = 50
ΔR := 250*10^3
Δr = 100
m_r := ΔR/Δr = 2500
F_обз := 10^-3
D_обз := 0.95
D := D_обз = 0.95
F := F_обз/(m_β*m_ε*m_r) = 8.88889e-11
q_Σ_пор := 2/D*sqrt(M)*sqrt(2*ln(1/F)) - 2.8 = 68.8155
α_β := 1.5
α_ВЧ := 1.6
α_дет := 2
α_КФ := 1.21
α_диск := 1.9
α_пог := α_β*α_ВЧ*α_дет*α_КФ*α_диск = 11.0352
k_сж := 1
q_пот := q_Σ_пор
γ_Σ := q_пот*α_пог/(2*M*k_сж) = 15.1879
k := 1.38*10^-23
T_0 = 290
Δf_ш = 2448715
k_ш = 7.68966
γ_Σ = 15.1879
P_пр_min := k*T_0*Δf_ш*k_ш*γ_Σ = 1.14451e-12
