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c := 3*10^8
β_05 := 1
d_β := 1
L := 50.8
λ := β_05*d_β/L = 0.019685
f_0 := c/λ = 15240000000
r_max := 1000*10^3
T := 1.2*2*r_max/c = 0.008
F := 1/T = 125
N := 256
τ_и := 25.6*10^-6
Δr := c*τ_и/(2*N) = 15
Ω := 10
M := β_05/(Ω*T) = 12.5
M := 13
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k_ф := 1.37
П_эф := 0.72*N/τ_и = 7200000
Δf_0_f0 := 10^-5
Δf_г_fг := 10^-5
f_г := 7.66*10^9
f_0 = 15240000000
Δf_0 := f_0*Δf_0_f0 = 152400
Δf_г := f_г*Δf_г_fг = 76600
Δf := 2*sqrt(Δf_0^2 + Δf_г^2) = 341135
Δf_пр := П_эф + Δf = 7541135
Δf_ш := 1.1*Δf_пр = 8295249
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T_А := 190
T_0 := 290
k_ш_пр := 10
k_ш := T_А/T_0 + k_ш_пр - 1 = 9.65517
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ΔΘ_β := 60
Δβ := 1
m_β := ΔΘ_β/Δβ = 60
ΔΘ_ε := 30
m_ε := ΔΘ_ε/Δβ = 30
ΔR := 500*10^3
Δr = 15
m_r := ΔR/Δr = 33333.3
F_обз := 10^-3
D_обз := 0.99
D := D_обз = 0.99
F := F_обз/(m_β*m_ε*m_r) = 1.66667e-11
q_Σ_пор := 2/D*sqrt(M)*sqrt(2*ln(1/F)) - 2.8 = 48.517
α_пог := 10
k_сж := N
q_пот := q_Σ_пор
γ_Σ := q_пот*α_пог/(2*M*k_сж) = 0.0728922
k := 1.38*10^-23
T_0 = 290
Δf_ш = 8295249
k_ш = 9.65517
γ_Σ = 0.0728922
P_пр_min := k*T_0*Δf_ш*k_ш*γ_Σ = 2.3364e-14
