ΔΘ_ε := 20
ΔΘ_β := 50
r_max := 4*10^3
υ := 0.1
ε_05 := 1.5
β_05 := 1
σ_ц := 1
λ := 1
Δr := 100
V_r_max := 2*10^3
V_r_min := 1.85*10^3
D := 0.9
F := 10^-10
ε_0 := 10
k_ш := 10
T_ш := 300
r_п := 4*10^3
N_n := 3
γ_n := 0.5
α := 0.7
m := 1.5
c := 3*10^8
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T_обз.max := 15
t_ц := ΔΘ_ε/υ = 200
N_цик := t_ц/T_обз.max = 13.3333
N_цик := 14
T_обз := t_ц/N_цик = 14.2857
m_ε := ΔΘ_ε/ε_05 + 1 = 14.3333
m_ε := 15
Ω_A := ΔΘ_β/T_обз*m_ε = 52.5
t_обл := β_05/Ω_A = 0.0190476
T := 2*r_max/c = 2.66667e-5
M := t_обл/T = 714.286
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k := 1.38*10^-23
N_0 := k*k_ш*T_ш = 4.14e-20
N_0*10^20 = 4.14
q := 8.1
γ_0.dB := 10*log(q^2/2) = 15.1594
γ_i.dB := 15
γ_Σ.dB := γ_0.dB + γ_i.dB = 30.1594
γ_Σ := 10^(γ_Σ.dB/10) = 1037.39
Э_пр.min := γ_Σ*N_0 = 4.29477e-17
Э_пр.min*10^17 = 4.29477
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L_a := 50.8
L_b := 50.8
УБЛ_dB := -13.2
K_КИП := 1
a := L_a*λ/β_05 = 50.8
b := L_b*λ/ε_05 = 33.8667
# Расчет для зеркальной антенны
A_ЗА := π/4*a*b = 1351.22
G_ЗА := 4*π/λ^2*A_ЗА = 16979.9
# Расчет для ФАР
ε_max := ΔΘ_ε/2 = 10
β_max := ΔΘ_β/2 = 25
d_β := λ/(1 + sin(ΔΘ_β*deg/2)) = 0.702929
d_ε := λ/(1 + sin(ΔΘ_ε*deg/2)) = 0.852044
M_β := b/d_β + 1 = 49.1793
M_ε := b/d_ε + 1 = 40.7476
M_β := 50
M_ε := 41
M_Σ := M_ε*M_β = 2050
A_аг := a*b = 1720.43
A_ФАР := A_аг*K_КИП = 1720.43
G_ФАР := 4*π/λ^2*A_ФАР = 21619.5
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P_ср.ЗА := r_max^4*4*π*λ^2*Э_пр.min/(t_обл*A_ЗА*σ_ц) = 0.00536814
P_ср.ФАР := r_max^4*4*π*λ^2*Э_пр.min/(t_обл*A_ФАР*σ_ц) = 0.00421612
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f_0 := c/λ = 300000000
П := c/(2*Δr) = 1500000
τ_и := 1/П = 6.66667e-7
T = 2.66667e-5
n := П*τ_и = 1
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Q := T/τ_и = 40
P_и.ЗА := Q*P_ср.ЗА = 0.214725
P_и.ФАР := Q*P_ср.ФАР = 0.168645
E_пр := 3*10^6
l_a := λ/1.4 = 0.714286
l_b := 0.5*l_a = 0.357143
P_и.доп := 0.2*E_пр^2*l_a*l_b*sqrt(0.51)/(480*π) = 217460517
P_и1.ФАР := P_и.ФАР/(M_ε*M_β) = 8.22658e-5
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Δr = 100
ΔV_r := λ/(2*τ_и) = 750000
M = 714.286
T = 2.66667e-5
τ_с := M*T = 0.0190476
ΔF := 1/τ_с = 52.5
ΔV_r := λ/2*ΔF = 26.25
K_ух.r := 1.5
K_ух.Vr := 2
K_ух.ε := 2
K_ух.β := 2
Δε := ε_05 = 1.5
Δβ := β_05 = 1
Δr_р := Δr*K_ух.r = 150
ΔV_r.р := ΔV_r*K_ух.Vr = 52.5
Δε_р := Δε*K_ух.ε = 3
Δβ_р := Δβ*K_ух.β = 2
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П_эфф := sqrt(π)*П = 2658681
σ_τ0 := 1/(q*П_эфф) = 4.64354e-8
σ_r0 := c/2*σ_τ0 = 6.9653
σ_r := σ_r0 = 6.9653
τ_эфф := sqrt(π)*τ_и = 1.18164e-6
σ_F0 := 1/(q*τ_эфф) = 104480
σ_Vr0 := λ/2*σ_F0 = 52239.8
σ_Vr := σ_Vr0
k := 0
σ_ε.ЗА := Δε/(q*sqrt(π)) = 0.10448
σ_β.ЗА := Δβ/(q*sqrt(π)) = 0.069653
ε_max = 10
d_ε = 0.852044
M_ε = 41
l_эфф.н.ε := π*d_ε/λ*sqrt((M_ε^2 - 1)/3)*|cos(ε_max*deg)| = 62.3817
σ_ε.ФАР := 1/(q*l_эфф.н.ε) = 0.00197905
β_max = 25
d_β = 0.702929
M_β = 50
l_эфф.н.β := π*d_β/λ*sqrt((M_β^2 - 1)/3)*|cos(β_max*deg)| = 57.7643
σ_β.ФАР := 1/(q*l_эфф.н.β) = 0.00213725
σ_rр := 2*σ_r = 13.9306
σ_Vrр := 2*σ_Vr = 104480
σ_ε.ЗАр := 2*σ_ε.ЗА = 0.208959
σ_ε.ФАРр := 2*σ_ε.ФАР = 0.00395811
σ_β.ЗАр := 2*σ_β.ЗА = 0.139306
σ_β.ФАРр := 2*σ_β.ФАР = 0.0042745
r_min := c/2*τ_и = 100
N_д := r_max/r_min - 1 = 39
N_ск := (V_r_max - V_r_min)/ΔV_r = 5.71429
M*T = 0.0190476
M = 714.286
