F := [-a, 1; 0, -b]  # error: Эта переменная не определена.
F^2 → [a^2, -a - b; 0, b^2]
F^3 → [-a^3, b^2 + a*(a + b); 0, -b^3]
F^4 → [a^4, -a^2*(a + b) - b^2*(a + b); 0, b^4]
exp(F*T) → [e^(-T*a), e^(-T*b)/(a - b) - e^(-T*a)/(a - b); 0, e^(-T*b)]
4! = 24
I := [1, 0; 0, 1]
limit(I + sum(F^n*T^n/n!, n), n → ∞)
I + sum(F^n*T^n/n!, n = 1 .. ∞)
exp(T) series → 1 + T + T^2/2 + T^3/6 + T^4/24 + T^5/120
1 + T + T^2/2 + T^3/6 + T^4/24 + T^5/120
a := 1/2
b := 1/5
T := 0.1
Φ(T) := [e^(-a*T), (a + b)^-1*(1 - e^(-(a + b)*T)); 0, e^(-b*T)]
H := [0; 1]
G := [0; 1]
Φ*H*transpose(H)*transpose(Φ)
Φ*H*transpose(H)*transpose(Φ) → [0, 0; 0, transpose(function)*function]
S := 1
integral(Φ(τ)*G*transpose(G)*transpose(Φ(τ)), τ) → [
    100*τ/49 - 500*e^(-7*τ/5)/343 + 2000*e^(-7*τ/10)/343, 100*e^(-9*τ/10)/63 - 50*e^(-τ/5)/7;
    100*e^(-9*τ/10)/63 - 50*e^(-τ/5)/7, -5*e^(-2*τ/5)/2
]
integral(Φ(τ)*H*transpose(H)*transpose(Φ(τ)), τ = 0 .. T) → [0.000316390998523, 0.00482088157274; 0.00482088157274, 0.0980264021192]
Q := [0.000316390998523, 0.00482088157274; 0.00482088157274, 0.0980264021192]
P_11 := 0
P_12 := 0
P_22 := S*a*b = 0.1
P := [P_11, P_12; P_12, P_22]
G = [0; 1]
Φ(T)*P*transpose(Φ(T)) + G*Q*transpose(G)
Φ(T)*P*transpose(Φ(T)) = [0.000932775, 0.00946678; 0.00946678, 0.0960789]
G*transpose(G)*Q = [0, 0; 0.00482088, 0.0980264]
