k := 4
V_R := 2000
K_V := 9
T_y := 0.04
T_f := 0.4
T_AC := 0.1
ξ_AC := 0.5
R := 2000
S_d := 1
K_φpφa(p) := p*K_V/(p*(1 + p*T_y) + S_d*K_V)
K_φaWp(p) := k*V_R/(1 + p*T_f)*1/(1 + 2*ξ_AC*T_AC*p + T_AC^2*p^2)
K_Wph(p) := -(1/(p*R + 2*V_R)*R^2/V_R)
K_φph(p) := K_φpφa(p)*K_φaWp(p)*K_Wph(p)
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F_p := [
    0, 0.1, 0.2, 0.3, 0.4, 0.5, 0.6, 0.7, 0.8, 0.9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]
h_cr := [
    0, 0, -0.2, -0.5, -0.4, 0.3, -0.3, -0.3, -0.1, 0.2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]
σ_h := [
    0.1, 0.7, 2.5, 4.1, 3.9, 3.7, 2.8, 1.9, 1.6, 1.3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]
F_p := transpose(F_p)
h_cr := transpose(h_cr)
σ_h := transpose(σ_h)
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h_sko := sqrt(h_cr^2 + σ_h^2)
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T_f := [0, 0.1, 0.2, 0.3, 0.4, 0.5, 0.6, 0.7, 0.8, 0.9, 1, 1.1, 1.2]
h_cr := [604.4, 60.1, -0.1, 1.2, 1.7, 2.3, 1.7, 0.4, -1.9, -4.2, -5.5, -7, -7.2]
σ_h := [28, 11.6, 0.7, 0.3, 0.3, 0.6, 2.4, 4.2, 6.4, 7.5, 6.1, 8.9, 13.6]
T_f := transpose(T_f)
h_cr := transpose(h_cr)
σ_h := transpose(σ_h)
h_sko := sqrt(h_cr^2 + σ_h^2)
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T_f := [0, 0.1, 0.2, 0.3, 0.4, 0.5, 0.6, 0.7, 0.8, 0.9, 1]
h_cr := [275, 62.1, 6.1, 0.7, 1, 1.5, 1.7, 0, -1.7, -5.2, -9.6]
σ_h := [43.6, 27.6, 7.9, 3.3, 3.4, 3.7, 3.8, 3.8, 3.6, 4.6, 4.9]
T_f := transpose(T_f)
h_cr := transpose(h_cr)
σ_h := transpose(σ_h)
h_sko := sqrt(h_cr^2 + σ_h^2)
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h_cr4 := 93.9
h_cr8 := 1
h_cr20 := 4.6
σ_h.4 := 8.2
σ_h.8 := 3.6
σ_h.20 := 7.5
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