c := 1
c_x := 1
T_1 := 0.2
T_2 := 0.4
B(t_p, T) := t_p/T
N_3(t_p, T) := 6*B(t_p, T)^2*(e^(-B(t_p, T)) - 1 + B(t_p, T))/(2*B(t_p, T)^3 - 6*B(t_p, T)^2 + 6*B(t_p, T) + 3 - 12*B(t_p, T)*e^(-B(t_p, T)) - 3*e^(-2*B(t_p, T)))
q(t_p) := sqrt(c/2)*t_p
N_4(t_p) := 2*q(t_p)*(sinh(2*q(t_p)) + sin(2*q(t_p)))/(sinh(2*q(t_p)) - sin(2*q(t_p)))
N_6(t_p) := c*t_p/(1 + c*t_p)
N_7(t_p) := c_x*t_p^3/(1 + c_x*t_p^3/3)
400/(60*60) = 0.111111
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c := [0.01; 1; 100]
hA4a := [307.81; 78.11; 22.38]
hA6a := [0; 0; 0]
hA7a := [259.89; 19.96; 0.28]
sA4a := [12.21; 66.87; 74.32]
sA6a := [34.64; 49.39; 108.42]
sA7a := [6.51; 33.47; 39.80]
hA4b := [615.66; 183.28; 87.10]
hA6b := [0; 0; 0]
hA7b := [509.58; 13.31; 0.01]
sA4b := [19.39; 92.22; 101.54]
sA6b := [69.28; 78.33; 108.26]
sA7b := [14.18; 71.06; 79.70]
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c := [0.01; 0.1; 1; 10; 100]
sA7a := [34.63; 34.67; 36.03; 39.04; 39.80]
hA7a := [0.14; 0.15; 0.21; 0.27; 0.28]
hA7b := [0.28; 0.26; 0.14; 0.03; 0.01]
sA7b := [69.25; 69.34; 72.06; 78.16; 79.70]
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