T_ум := 0.01
T_ф := 0.1
K_у2 := 3.5
k_гп := 1
α := 0.4
T_1 := 0.5
β := 0.4
V := 0
A := 15
K_у1 := 3.5
a := 0.5
B := 7
F(θ) := A*sin(α*θ)
S_д(θ) := d/dθ(F(θ)) → 6.0*cos(0.4*θ)
S_д := S_д(0) = 6
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a_0 := S_д*K_у2*k_гп = 21
a_1 := S_д*K_у2*k_гп*T_1 = 10.5
a_2 := 1
a_3 := T_ум = 0.01
a_1*a_2 = 10.5
a_0*a_3 = 0.21
K_φθ(s) := s^2*(s*T_ум + 1)/(s^2*(s*T_ум + 1) + S_д*K_у2*k_гп*(s*T_1 + 1))
Φ(s) := V/s^2 + a/s^3
limit(s*K_φθ(s)*Φ(s), s → 0) → 0.0238095238095
θ_уст := a/(S_д*K_у2*k_гп) = 0.0238095
a_3 := T_ум
a_2 := 1
b_2 := 0
a_1 := S_д*K_у2*k_гп*T_1
b_1 := -K_у2*k_гп*T_1
b_0 := -K_у2*k_гп
a_0 := S_д*K_у2*k_гп
J_3 := (b_2^2*a_0*a_1 + (b_1^2 - 2*b_0*b_2)*a_0*a_3 + b_0^2*a_2*a_3)/(2*a_0*a_3*(a_1*a_2 - a_0*a_3)) = 0.177154
(0^2*S_д*K_у2*k_гп*S_д*K_у2*k_гп*T_1 + ((-K_у2*k_гп*T_1)^2 - 2*(-K_у2*k_гп)*0)*S_д*K_у2*k_гп*T_ум + (-K_у2*k_гп)^2*T_ум)/(2*S_д*K_у2*k_гп*T_ум*(S_д*K_у2*k_гп*T_1 - S_д*K_у2*k_гп*T_ум)) = 0.177154
((-K_у2*k_гп*T_1)^2*S_д*K_у2*k_гп*T_ум + (-K_у2*k_гп)^2*T_ум)/(2*S_д*K_у2*k_гп*T_ум*(S_д*K_у2*k_гп*T_1 - S_д*K_у2*k_гп*T_ум)) = 0.177154
(T_1^2*S_д*K_у2*k_гп + 1)/(2*S_д*(S_д*T_1 - S_д*T_ум)) = 0.177154
(T_1^2*S_д*K_у2*k_гп + 1)/(2*S_д^2*(T_1 - T_ум)) = 0.177154
S_ξ := 10^-4
D_θ := S_ξ*J_3 = 1.77154e-5
σ_θ := sqrt(D_θ) = 0.00420897
K_v(p) := K_у2*(p*T_1 + 1)/(p*(p*T_ум + 1))
K_f(p) := 1/(p*T_ф + 1)
K_uпu1(p) := K_v(p)*K_f(p)/(1 + S_д*K_v(p)*k_гп/p)
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