Z_B := 10*10^3
f := 10^6
a := 1
C := 4*10^-12
X_c := 1/(1j*2*π*f*C) = -39788.7i
U_B := Z_B/(Z_B + X_c) = 0.0594126 + 0.236395i
argU_c := atan(Im(U_B)/Re(U_B)) = 75.8922 deg
modU_c := sqrt(Im(U_B)^2 + Re(U_B)^2) = 0.243747
U_c := X_c/(Z_B + X_c) = 0.940587 - 0.236395i
argU_c := atan(Im(U_c)/Re(U_c)) = -14.1078 deg
modU_c := sqrt(Im(U_c)^2 + Re(U_c)^2) = 0.969839
I := 1/(Z_B + X_c) = 5.94126e-6 + 2.36395e-5i
modI := sqrt(Im(I)^2 + Re(I)^2) = 2.43747e-5
argI := atan(Im(I)/Re(I)) = 75.8922 deg
atan(1.105*10^-8/(8.333*10^-6)) = 0.0759772 deg
U := 1 + 1j*1.326*10^-3
ImI := [0; Im(I)]
ReU1 := [0; Re(U_B)]
ImU1 := [0; Im(U_B)]
ReI := [0; Re(I)]
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ReU2 := [0; Re(U_c)]
ImU2 := [0; Im(U_c)]
ImU3 := [0; 0]
ReU3 := [0; 1]
atan(Im(U_B)/Re(U_B)) = 75.8922 deg
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