# КР ЭМС 3 ВАРИАНТ
K_0 := 5
Δ := 0.1
f_0 := 32
# Транзистор - безынерционный, АМ/АМ
K1(Y)
K2(Y)
y := -2, -1.99 .. 2
i_n(y) := 2/π*atan(2*π*y)
i(y) := 2/π*exp(y)
IM5R(Y)
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# Входные сигналы: одночастотный y1(t) и двухчастотный y2(t)
# Модели сигналов
t := 0 .. 1000*50
YL := 30
Y := 10^(0.1*YL) = 1000
U(Y) := sqrt(2*Y)
y1[t] := U(Y)*cos(2*π*32/500*t)
y22[t] := U(Y)/sqrt(2)*(cos(2*π*((32 - 2*0.1/2)/500)*t) + cos(2*π*((32 + 2*0.1/2)/500)*t))
y2[t] := U(Y)/sqrt(2)*(cos(2*π*((32 - Δ/2)/500)*t) + cos(2*π*((32 + Δ/2)/500)*t))
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f := 0 .. 1000*50
Y22 := CFFT(y22)
Y1 := CFFT(y1)
Y2 := CFFT(y2)
Y22[f] := 10*log((2*|Y22[f]|)^2)
Y1[f] := 10*log((2*|Y1[f]|)^2)
Y2[f] := 10*log((2*|Y2[f]|)^2)
# 3.01 | 2.9545
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-0.090026 + 3 = 2.90997
-2.6489
K_0 = 5
z1N[t] := K_0*exp(y1[t])
z2N[t] := K_0*exp(y2[t])
z1[t] := K_0*(2/π)*atan(y1[t])
z2[t] := K_0*(2/π)*atan(y2[t])
z22[t] := K_0*(2/π)*atan(y22[t])
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Z1 := CFFT(z1)
Z2 := CFFT(z2)
Z22 := CFFT(z22)
Z1[f] := 10*log((2*|Z1[f]|)^2)
Z2[f] := 10*log((2*|Z2[f]|)^2)
Z22[f] := 10*log((2*|Z22[f]|)^2)
Z1N := CFFT(z1N)
Z2N := CFFT(z2N)
Z1N[f] := 10*log((2*|Z1N[f]|)^2)
Z2N[f] := 10*log((2*|Z2N[f]|)^2)
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# Выходная мощность на частоте 32
C1 := Z1[32*100] = 15.8249
# Выходная мощность на частоте 31.95 и 32.05
C2 := Z2[32.05*100] + 3 = 14.8212
# На частотах ИМ3 31.9 и 32.1
IM3 := Z2[32.1*100] + 3 = -19.0393
31.95*2 - 32.05 = 31.85
# На частотах ИМ5 31.85 и 32.15
IM5 := Z2[32.15*100] + 3 = 5.1534
# Сумма внеполосных продуктов
IM := 10*log((10^(0.1*IM3)) + (10^(0.1*IM5))) = 5.1699
# Относительный уровень внеполосных излучений
IM3R := IM3 - C2 = -33.8605
IM5R := IM5 - C2 = -9.66782
IMR := 10*log((10^(0.1*IM3R)) + (10^(0.1*IM5R))) = -9.65132
# Усиление
YL = 30
K1 := C1 - YL = -14.1751
K2 := C2 - YL = -15.1788
YL_i := [-40; -30; -20; -15; -10; -8; -6; -4; -2; 0; 3; 6; 10; 20; 30]
K1_i := [13.008; 13.004; 12.966; 12.875; 12.604; 12.39; 12.08; 11.644; 11.057; 10.3; 8.835; 7.002; 4.093; -4.595; -14.175]
K2_i := [12.942; 12.936; 12.878; 12.744; 12.361; 12.071; 11.667; 11.123; 10.423; 9.559; 7.963; 6.043; 3.077; -5.62; -15.179]
IM5R_i := [-40.244; -40.044; -38.297; -35.275; -30.114; -27.681; -25.227; -22.873; -20.71; -18.788; -16.391; -14.536; -12.753; -10.468; -9.668]
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