# КР ЭМС 3 ВАРИАНТ
K_0 := 5
Δ := 0.1
f_0 := 32
# Транзистор - безынерционный, АМ/АМ
K1(Y)
K2(Y)
y := -2, -1.99 .. 2
i_n(y) := 2/π*atan(2*π*y)
i(y) := 2/π*exp(y)
IM5R(Y)
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# Входные сигналы: одночастотный y1(t) и двухчастотный y2(t)
# Модели сигналов
t := 0 .. 1024*100
YL := 0
Y := 10^(0.1*YL) = 1
U(Y) := sqrt(2*Y)
y1[t] := U(Y)*cos(2*π*32/512*t)
y2[t] := U(Y)/sqrt(2)*(cos(2*π*(32 - Δ/2)/512*t) + cos(2*π*(32 + Δ/2)/512*t))
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f := 0 .. 1024*32
Y1 := CFFT(y1)
Y2 := CFFT(y2)
Y1[f] := 10*log((2*|Y1[f]|)^2)
Y2[f] := 10*log((2*|Y2[f]|)^2)
# 3.01 | 2.9545
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-0.090026 + 3 = 2.90997
-2.6489
K_0 = 5
z1N[t] := K_0*exp(y1[t])
z2N[t] := K_0*exp(y2[t])
z1[t] := K_0*(2/π)*atan(y1[t])
z2[t] := K_0*(2/π)*atan(y2[t])
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Z1 := CFFT(z1)
Z2 := CFFT(z2)
Z1[f] := 10*log((2*|Z1[f]|)^2)
Z2[f] := 10*log((2*|Z2[f]|)^2)
Z1N := CFFT(z1N)
Z2N := CFFT(z2N)
Z1N[f] := 10*log((2*|Z1N[f]|)^2)
Z2N[f] := 10*log((2*|Z2N[f]|)^2)
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f_0 - Δ/2 = 31.95
1.25*32*128 = 5120
# Выходная мощность на частоте 32
C1 := Z1[1.25*32*128] = -75.2552
31.95*128 = 4089.6
# Выходная мощность на частоте 31.95 и 32.05
C2 := Z2[1.25*32.05*128] + 3 = -70.7614
31.9*128 = 4083.2
# На частотах ИМ3 31.9 и 32.1
IM3 := Z2[1.25*32.1*128] + 3 = -70.7108
31.85*128 = 4076.8
31.9*128 = 4083.2
# На частотах ИМ5 31.85 и 32.15
IM5 := Z2[1.25*32.15*128] + 3 = -70.6598
# Сумма внеполосных продуктов
IM := 10*log((10^(0.1*IM3)) + (10^(0.1*IM5))) = -67.675
# Относительный уровень внеполосных излучений
IM3R := IM3 - C2 = 0.0506208
IM5R := IM5 - C2 = 0.101597
IMR := 10*log((10^(0.1*IM3R)) + (10^(0.1*IM5R))) = 3.08648
# Усиление
YL = 0
K1 := C1 - YL = -75.2552
K2 := C2 - YL = -70.7614
YL_i := [-40; -30; -20; -15; -10; -8; -6; -4; -2; 0; 3; 6; 10; 20; 30]
K1_i := [13.067; 13.063; 13.024; 12.933; 12.662; 12.449; 12.138; 11.702; 11.115; 10.358; 8.893; 7.058; 4.14; -4.595; -14.209]
K2_i := [10.409; 10.403; 10.345; 10.211; 9.826; 9.536; 9.13; 8.585; 7.883; 7.017; 5.417; 3.491; 0.51; -8.237; -17.829]
IM5R_i := [-26.637; -26.601; -26.249; -25.448; -23.366; -22.032; -20.464; -18.771; -17.077; -15.481; -13.392; -11.712; -10.052; -7.888; -7.148]
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