μ := 1
ε := 1
a := 1
b := 0.5
c := 3*10^10
m := 1
n := 2
λ_krE12 := 2/sqrt((m/a)^2 + (n/b)^2) = 0.485071
f_krE12 := c/(sqrt(μ*ε)*λ_krE12) = 6.18466e10  # Заданный тип волны
λ_krH10 := 2/sqrt((1/a)^2 + (0/b)^2) = 2
f_krH10 := c/(sqrt(μ*ε)*λ_krH10) = 15000000000  # Основной тип волны
λ_krE22 := 2/sqrt((2/a)^2 + (2/b)^2) = 0.447214
f_krE22 := c/(sqrt(μ*ε)*λ_krE22) = 6.7082e10  # Ближайшая соседняя волна
k := f_krE12/f_krH10 = 4.12311
ε1 := 6
μ1 := 2.5
f_kr1 := c/(sqrt(μ*ε)*λ_krE12) = 6.18466e10
f_kr2 := c/(sqrt(μ1*ε1)*λ_krE12) = 1.59687e10
v_ф1(f) := c/(sqrt(ε*μ)*sqrt(1 - (f_kr1/f)^2))
v_ф2(f) := c/(sqrt(ε1*μ1)*sqrt(1 - (f_kr2/f)^2))
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λ_в1(f) := c/f/(sqrt(ε*μ)*sqrt(1 - (f_kr1/f)^2))
λ_в2(f) := c/f/(sqrt(ε1*μ1)*sqrt(1 - (f_kr2/f)^2))
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h1(f) := 2*π*f/c*sqrt(μ*ε)*sqrt(1 - (f_kr1/f)^2)
h2(f) := 2*π*f/c*sqrt(μ1*ε1)*sqrt(1 - (f_kr2/f)^2)
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ε_0 := 10^-9/(36*π) = 8.84194e-12  # μ_а
ε_а := ε_0*ε1
μ_0 := 4*π*10^-7
μ_ам := 1
σ_м := 1
μ_а := 1
ε_а := 1
h1_зат(f) := 2*sqrt(μ_ам*2*π*f/(2*σ_м))/(sqrt(μ/ε)*b*sqrt(1 - (f_kr1/f)^2))*((m^2*(b/a)^3 + n^2)/(m^2*(a/b)^3 + n^2))
h2_зат(f) := 2*sqrt(μ_ам*2*π*f/(2*σ_м))/(sqrt(μ/ε)*b*sqrt(1 - (f_kr2/f)^2))*((m^2*(b/a)^3 + n^2)/(m^2*(a/b)^3 + n^2))
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j := sqrt(-1)
m = 1
n = 2
a = 1
b = 0.5
εa := 1/(36*π)*10^-9
P := 4
f_0 := 1.6*f_krE12 = 9.89545e10
g := sqrt((m/a)^2 + (n/b)^2) = 4.12311
h := sqrt((2*π*f_0)^2/c^2 - g^2) = 20.3107
C := sqrt(g^2*P/(h*εa*π^3*f_0*a*b)) = 0.49681
Ex := h/g^2*C*m*π/a = 1.86473
Ey := h/g^2*C*n*π/b = 7.45893
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Ez := C = 0.49681
Hx := 2*π*f_0*εa*C*n*π/(g^2*b) = 2.0189
Hy := 2*π*f_0*εa*C*m*π/(g^2*a) = 0.504725
