fver := 120*10^3
Δ := 28
ωc := 50*10^3
R := 500
C := 1/(ωc*R) = 4e-8
KRC(p) := 1/(1 + p/ωc)
α := 1/ωc = 2e-5
L := R/(2*α) = 12500000
ω0 := sqrt(ωc^2 + α^2) = 50000
C := 1/(L*ω0^2) = 3.2e-17
Kp1p(ωn) := 1/(1 + ωn^2)
Kp2p(ωn) := 1/(1 + ωn^3)
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U_си := [7.5; 5; 2.5; 1.25; 0.25]
I_c := [1.8; 1.7; 1.6; 1.2; 0.6]
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U_зи := [0; 2.5; 5; 7.5; 10; 12.5]
I_c := [0; 0.1; 0.2; 2.5; 5.8; 9.8]
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