HH
Q1 := [
    0, 2;
    1, 1.92;
    2, 1.88;
    3, 1.82;
    4, 1.71;
    5, 1.56;
    6, 1.37;
    7, 1.18;
    8, 0.9;
    9, 0.6;
    10, 0.32;
    11, 0.1;
    12, 0.2;
    13, 0.44;
    14, 0.69;
    15, 0.96;
    16, 1.18;
    17, 1.4;
    18, 1.58;
    19, 1.75;
    20, 1.85
]
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KZ
Q2 := [
    0, 0;
    1, 0.25;
    2, 0.38;
    3, 0.61;
    4, 0.9;
    5, 1.1;
    6, 1.3;
    7, 1.5;
    8, 1.65;
    9, 1.75;
    10, 1.85;
    11, 2;
    12, 1.95;
    13, 1.9;
    14, 1.85;
    15, 1.8;
    16, 1.7;
    17, 1.5;
    18, 1.35;
    19, 1.15;
    20, 0.9
]
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Q3 := [0, 1.8; 20, 1.8]
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Q4 := [
    0, 1.2;
    1, 1.3;
    2, 1.4;
    3, 1.55;
    4, 1.7;
    5, 2;
    6, 2.4;
    7, 2.65;
    8, 2.9;
    9, 3.1;
    10, 3.25;
    11, 3.3;
    12, 3.25;
    13, 3.2;
    14, 3.15;
    15, 3.1;
    16, 3;
    17, 2.8;
    18, 2.5;
    19, 2.3;
    20, 1.9
]
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Q5 := [
    0, 2.05;
    1, 2;
    2, 1.95;
    3, 1.9;
    4, 1.8;
    5, 1.7;
    6, 1.55;
    7, 1.4;
    8, 1.25;
    9, 1.1;
    10, 0.9;
    11, 0.85;
    12, 0.9;
    13, 1;
    14, 1.15;
    15, 1.3;
    16, 1.5;
    17, 1.65;
    18, 1.8;
    19, 1.9;
    20, 2
]
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# 5 pynkt
# 50 mks
# 25 mks
