μ := 1
ε := 1
r_0 := 1.5
c := 3*10^10
μ_01 := 3.832
μ_11 := 1.840
μ_21 := 3.054
μ_02 := 7.016
μ_12 := 5.335
μ_22 := 6.705
# Номер 1
λ_krH01 := 2*π*r_0/μ_01 = 2.45949
f_krH01 := c/(sqrt(μ*ε)*λ_krH01) = 1.21976e10  # Заданный тип волны
λ_krH11 := 2*π*r_0/μ_11 = 5.12216
f_krH11 := c/(sqrt(μ*ε)*λ_krH11) = 5.8569e9  # Основной тип волны
λ_krH21 := 2*π*r_0/μ_21 = 3.08604
f_krH21 := c/(sqrt(μ*ε)*λ_krH21) = 9.72118e9
λ_krH02 := 2*π*r_0/μ_02 = 1.34333
f_krH02 := c/(sqrt(μ*ε)*λ_krH02) = 2.23326e10
k := f_krH01/f_krH11 = 2.08261
λ_krH12 := 2*π*r_0/μ_12 = 1.76659
f_krH12 := c/(sqrt(μ*ε)*λ_krH12) = 1.69818e10
λ_krH22 := 2*π*r_0/μ_22 = 1.40563
f_krH22 := c/(sqrt(μ*ε)*λ_krH22) = 2.13427e10
λ_krE21 := 2*π*r_0/5.136 = 1.83504
f_krE21 := c/(sqrt(μ*ε)*λ_krE21) = 1.63484e10  # Ближайшая соседняя волна
# Номер 2
ε1 := 6.5
μ1 := 2.5
f_kr1 := c/(sqrt(μ*ε)*λ_krH01)
f_kr2 := c/(sqrt(μ1*ε1)*λ_krH01)
v_ф1(f) := c/(sqrt(ε*μ)*sqrt(1 - (f_kr1/f)^2))
v_ф2(f) := c/(sqrt(ε1*μ1)*sqrt(1 - (f_kr2/f)^2))
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λ_в1(f) := c/f/(sqrt(ε*μ)*sqrt(1 - (f_kr1/f)^2))
λ_в2(f) := c/f/(sqrt(ε1*μ1)*sqrt(1 - (f_kr2/f)^2))
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h1(f) := 2*π*f/c*sqrt(μ*ε)*sqrt(1 - (f_kr1/f)^2)
h2(f) := 2*π*f/c*sqrt(μ1*ε1)*sqrt(1 - (f_kr2/f)^2)
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ε_0 := 10^-9/(36*π) = 8.84194e-12  # μ_а
ε_а := ε_0*ε1
μ_0 := 4*π*10^-7
μ_ам := 1
σ_м := 1
μ_а := 1
ε_а := 1
h1_зат(f) := sqrt(μ_ам*f*2*π/(2*σ_м))/(r_0*sqrt(μ_0/ε_0))*(f_kr1/f)^2/sqrt(1 - (f_kr1/f)^2)
h2_зат(f) := sqrt(μ_ам*f*2*π/(2*σ_м))/(r_0*sqrt(μ_0*μ1/(ε_0*ε1)))*(f_kr2/f)^2/sqrt(1 - (f_kr2/f)^2)
h1_dB_зат(f) := 10*log(h1_зат(f))
h2_dB_зат(f) := 10*log(h2_зат(f))
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# 4 номер
f_0 := 1.6*f_kr1 = 1.95162e10
C(f) := 1/f^2
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