# 1. Углы Брюстера и угол ПВО для различных типов поляризаций:
f := 80*10^6  # Гц
E := 0.67  # В/м
ε_0 := 1/(36*π)*10^-9 = 8.84194e-12  # Ф/м
ε_1 := 6.5
ε_2 := 1
μ_0 := 4*π*10^-7 = 1.25664e-6  # Гн/м
w_э.ср := 40*10^-12
μ_2 := 1
μ_1 := 2.5
ϕ_b_par := asin(sqrt(ε_2*(μ_1*ε_2 - ε_1*μ_2)/(μ_1*(ε_2^2 - ε_1^2))))*180/π = 11.3584
k := 1/sqrt(ε_1*μ_1) = 0.248069
ϕ_b_per := asin(sqrt(μ_2*(ε_1*μ_2 - μ_1*ε_2)/(ε_1*(μ_2^2 - μ_1^2))))*180/π = 19.2519i  # => такой угол не существует
ϕ_пво := asin(sqrt(μ_2*ε_2/(μ_1*ε_1)))*180/π = 14.3633
# 2. Амплитуды векторов в падающей, отраженной и прошедшей волнах для различных типов поляризаций:
Z_c1 := sqrt(μ_0/ε_0)*sqrt(μ_1/ε_1) = 233.8
Z_c2 := sqrt(μ_0/ε_0)*sqrt(μ_2/ε_2) = 376.991
Z_c1 = 233.8  # Ом
Z_c2 = 376.991  # Ом
E_пад := 0.67  # В/м
H_пад := E_пад/Z_c1 = 0.0028657  # А/м
Π_пад := E_пад^2/(2*Z_c1) = 0.000960009  # Вт/м^2
ψ(ϕ) := asin(sin(ϕ)*sqrt(μ_1*ε_1/(μ_2*ε_2)))
T_пер(ϕ) := 2*Z_c2*cos(ϕ)/(Z_c2*cos(ϕ) + Z_c1*cos(ψ(ϕ)))
T_пар(ϕ) := 2*Z_c2*cos(ϕ)/(Z_c1*cos(ϕ) + Z_c2*cos(ψ(ϕ)))
R_пер(ϕ) := (Z_c2*cos(ϕ) - Z_c1*cos(ψ(ϕ)))/(Z_c2*cos(ϕ) + Z_c1*cos(ψ(ϕ)))
R_пар(ϕ) := (Z_c1*cos(ϕ) - Z_c2*cos(ψ(ϕ)))/(Z_c1*cos(ϕ) + Z_c2*cos(ψ(ϕ)))
# Формулы для проекций и ампитуд векторов для перпендикулярной поляризации падающей волны:
E_пад_пер_y(ϕ) := -E_пад
H_пад_пер_x(ϕ) := E_пад/Z_c1*cos(ϕ)
Π_отр_пер_z(ϕ) := -Π_пад*R_пер(ϕ)^2*cos(ϕ)
H_пад_пер_z(ϕ) := -E_пад/Z_c1*sin(ϕ)
E_пр_пер_y(ϕ) := -E_пад*T_пер(ϕ)
Π_пад_пер_x(ϕ) := Π_пад*sin(ϕ)
H_пр_пер_x(ϕ) := E_пад/Z_c2*cos(ψ(ϕ))*T_пер(ϕ)
Π_пад_пер_z(ϕ) := Π_пад*cos(ϕ)
E_отр_пер_y(ϕ) := -E_пад*R_пер(ϕ)
H_пр_пер_z(ϕ) := -E_пад/Z_c2*sin(ψ(ϕ))*T_пер(ϕ)
H_отр_пер_x(ϕ) := -E_пад/Z_c1*R_пер(ϕ)*cos(ϕ)
Π_пр_пер_x(ϕ) := Π_пад*T_пер(ϕ)^2*Z_c1/Z_c2*sin(ψ(ϕ))
H_отр_пер_z(ϕ) := -E_пад/Z_c1*R_пер(ϕ)*sin(ϕ)
Π_пр_пер_z(ϕ) := Π_пад*T_пер(ϕ)^2*Z_c1/Z_c2*cos(ψ(ϕ))
Π_отр_пер_x(ϕ) := Π_пад*R_пер(ϕ)^2*sin(ϕ)
E_отр_пер(ϕ) := |E_отр_пер_y(ϕ)|
H_отр_пер(ϕ) := sqrt(H_отр_пер_x(ϕ)^2 + H_отр_пер_z(ϕ)^2)
Π_отр_пер(ϕ) := sqrt(Π_отр_пер_x(ϕ)^2 + Π_отр_пер_z(ϕ)^2)
E_пр_пер(ϕ) := |E_пр_пер_y(ϕ)|
H_пр_пер(ϕ) := sqrt(H_пр_пер_x(ϕ)^2 + H_пр_пер_z(ϕ)^2)  # E_пад
Π_пр_пер(ϕ) := sqrt(Π_пр_пер_x(ϕ)^2 + Π_пр_пер_z(ϕ)^2)
# Формулы для проекций и ампитуд векторов для параллельной поляризации падающей волны:
E_пад_пар_x(ϕ) := E_пад*cos(ϕ)
E_пад_пар_z(ϕ) := -E_пад*sin(ϕ)
H_отр_пар_y(ϕ) := E_пад/Z_c1*R_пар(ϕ)
H_пад_пар_y(ϕ) := E_пад/Z_c1
Π_отр_пар_x(ϕ) := Π_пад*R_пар(ϕ)^2*sin(ϕ)
Π_пад_пар_z(ϕ) := Π_пад*cos(ϕ)
Π_отр_пар_z(ϕ) := -Π_пад*R_пар(ϕ)^2*cos(ϕ)
E_пр_пар_x(ϕ) := E_пад*cos(ψ(ϕ))*T_пар(ϕ)
Π_пад_пар_x(ϕ) := Π_пад*sin(ϕ)
E_пр_пар_z(ϕ) := -E_пад*sin(ψ(ϕ))*T_пар(ϕ)
E_отр_пар_x(ϕ) := -E_пад*cos(ϕ)*R_пар(ϕ)
H_пр_пар_y(ϕ) := E_пад/Z_c2*T_пар(ϕ)
E_отр_пар_z(ϕ) := -E_пад*sin(ϕ)*R_пар(ϕ)
Π_пр_пар_x(ϕ) := Π_пад*T_пар(ϕ)^2*Z_c1/Z_c2*sin(ψ(ϕ))
Π_пр_пар_z(ϕ) := Π_пад*T_пар(ϕ)^2*Z_c1/Z_c2*cos(ψ(ϕ))
E_отр_пар(ϕ) := sqrt(E_отр_пар_x(ϕ)^2 + E_отр_пар_z(ϕ)^2)
H_отр_пар(ϕ) := |H_отр_пар_y(ϕ)|
Π_отр_пар(ϕ) := sqrt(Π_отр_пар_x(ϕ)^2 + Π_отр_пар_z(ϕ)^2)
E_пр_пар(ϕ) := sqrt(E_пр_пар_x(ϕ)^2 + E_пр_пар_z(ϕ)^2)
H_пр_пар(ϕ) := |H_пр_пар_y(ϕ)|
Π_пр_пар(ϕ) := sqrt(Π_пр_пар_x(ϕ)^2 + Π_пр_пар_z(ϕ)^2)
# Для перпендикулярной поляризации: | Для параллельной поляризации:
# Для угла 0 градусов: | Для угла 0 градусов:
E_отр_пер(0) = 0.157072  # В/м
E_отр_пар(0) = 0.157072  # В/м
H_отр_пер(0) = 0.000671821  # А/м
H_отр_пар(0) = 0.000671821  # А/м
Π_отр_пер(0) = 5.27621e-5  # Вт/м^2
Π_отр_пар(0) = 5.27621e-5  # Вт/м^2
E_пр_пер(0) = 0.827072  # В/м
E_пр_пар(0) = 0.827072  # В/м
H_пр_пер(0) = 0.00219388  # А/м
H_пр_пар(0) = 0.00219388  # А/м
Π_пр_пер(0) = 0.000907247  # Вт/м^2
Π_пр_пар(0) = 0.000907247  # Вт/м^2
# Для угла падения 12 градусов:
π*12/180 = 0.20944
# Для угла падения 12 градусов:
π*12/180 = 0.20944
E_отр_пер(0.209) = 0.324431  # В/м
|E_отр_пар(0.209)| = 0.0339617  # В/м
|H_отр_пер(0.209)| = 0.00138764  # А/м
H_отр_пар(0.209) = 0.000145259  # А/м
|Π_отр_пер(0.209)| = 0.000225097  # Вт/м^2
|Π_отр_пар(0.209)| = 2.46663e-6  # Вт/м^2
E_пр_пер(0.209) = 0.994431  # В/м
|E_пр_пар(0.209)| = 1.1351  # В/м
|H_пр_пер(0.209)| = 0.00263781  # А/м
H_пр_пар(0.209) = 0.00301096  # А/м
|Π_пр_пер(0.209)| = 0.00131156  # Вт/м^2
|Π_пр_пар(0.209)| = 0.00170887  # Вт/м^2
# 3. Зависимости коэффициентов отражения и преломления от угла падения:
Arg(x) := arg(x)*180/π
Π_отр_пер(ϕ) := Π_пад*R_пер(ϕ)^2
Π_отр_пар(ϕ) := Π_пад*R_пар(ϕ)^2
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# 4. Зависимости векторов E и H от координаты z:
j := sqrt(-1)
β := sqrt(μ_1*ε_1)*2*π*f/c = 6.7589 s/m
λ := 2*π/β = 0.929617 m/s
E(z) :=
    res ← E_пад*T_пар(0) if z ≥ 0
    res ← E_пад*|cos(β*z)*(1 - R_пар(0)) - j*sin(β*z)*(1 + R_пар(0))| if z < 0
    res
H(z) :=
    res ← E_пад/Z_c2*T_пар(0) if z ≥ 0
    res ← E_пад/Z_c1*|cos(β*z)*(1 + R_пар(0)) - j*sin(β*z)*(1 - R_пар(0))| if z < 0
    res
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