f := 10^10
c := 2.998*10^8
a1 := 12.5*10^-3
ε := 1
μ := 1
λкр := 2*a1 = 0.025
Q := [0, 100; 2, 83; 4, 59; 6, 38; 8, 22; 10, 14; 12, 8; 14, 6; 16, 5; 18, 4; 20, 4]
λ := c/f = 0.02998
αz := 2*π*f/c*sqrt(μ*ε)*sqrt((λ/λкр)^2 - 1)
f(z) := e^(-αz*z)
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X(x) := sin(π*x/a1)
Q := [
    0, 15;
    2, 15.6;
    4, 17.4;
    6, 21.3;
    8, 25.2;
    10, 27.6;
    12, 28.2;
    14, 27;
    16, 23.4;
    18, 19.4;
    20, 16.2;
    22, 15.3
]
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k_el(x) := |cot(π*x/a1)|
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Q := [2.5, 5; 5.5, 3; 8.5, 2.4; 11.5, 1.4]
a := 11.5*10^-3
λкр := 4*a = 0.046
λ/sqrt(1 - (λ/λкр)^2) = 0.0395283
