# 1.3 Построение графиков
Grf(z) := exp(-z)
grf(z) := 1 - Grf(z)
Y(t) := -4*t*(t^2 - 1)/(t^2 + 1)
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X(t) := (t^2 - 1)/(t^2 + 1)
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# Описание функций
f(x) :=
    exp(-x) if x ≥ 0
    0 otherwise
F(x) :=
    (0.8*exp(-3*x)) if x ≥ 0
    (-0.8*exp(3*x)) if x < 0
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f(fi) := 3*sqrt(2*cos(2*fi))
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x(t) := cos(t)*(1 + cos(t))
y(t) := sin(t)*(1 + cos(t))
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