# 1.5 Использование графиков для решения алгебраических уравнений
Y(x) := x^2 - x - 1
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x1 := 1.68034
x2 := -0.618034
F1(x) := sin(x)
F2(x) := (x + 1)/3
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# 4 | 10
f(x) := (1 + 0.5*cos(0.2*π*x))*cos(2*π*x)
h(x) := x - x^3/6
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x1 := 1.4279
(sin(x1) - h(x1))/h(x1) = 4.99976 %
10
# Интервал, на котором разница в точной функции и приближенной меньше 5 % - от 0 до 1.4279
T1 := 10
T2 := 1
