# zadanie 5
R := 10^3
C := 10^-6
N := 3
B := N*10^3 = 3000
T := 0.0005
e(t) := exp(-B*t)*Φ(t) - exp(-B*t)*Φ(t - T)
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e(p) := 1/(p + B)*Φ(p) - 1/(p + B)*Φ(p)*exp(-p*T)
K(p) := 1/(p*(p + B))*Φ(p) - 1/(p*(p + B))*Φ(p)*exp(-p*T)
