# 3.4 Преобразование Фурье и спектральный анализ
N := 1024
ORIGIN := 0
n := 0 .. N - 1
x[n] :=
    1 if 1 ≤ n ≤ 64
    0 otherwise
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SpRec := CFFT(x)
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dt := 0.01
T := 64*dt
t[n] :=
    ((n - N/2)*dt) if 0 ≤ n ≤ N
    0 otherwise
F[n] :=
    (T + t[n])/T if -T ≤ t[n] ≤ 0
    (T - t[n])/T if 0 ≤ t[n] ≤ T
    0 otherwise
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df := 1/(N*dt)
Fmax := 1/(2*dt)
f[n] := df*n
SpTr := CFFT(F)/df
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Y := ICFFT(SpRec)
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S[n] :=
    (T - t[n])/T if 0 ≤ t[n] ≤ T
    0 otherwise
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SpTr1 := CFFT(S)/df
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j := sqrt(-1)
Fcut := 1
K(f) := 1/(1 + j*f/Fcut)
Filtr[n] :=
    K(f[n]) if 0 ≤ f[n] ≤ Fmax
    K(f[n] - 2*Fmax) if Fmax < f[n] ≤ 2*Fmax
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Sp[n] := SpTr1[n]*Filtr[n]
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YY := ICFFT(Sp)
YY1 := YY*df
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