j := sqrt(-1)
R := 2200
I := 7*10^-3
τ := 85*10^-6
ω := 1/τ = 11764.7
C := τ/R = 3.86364e-8
R1 := 0.5*R = 1100
τ1 := R1*C = 4.25e-5
z1 := R1
z2 := R1 + 1/(j*ω*C)
U12 := I*z1*z2/(z1 + z2) = 5.775 - 1.925i
Iz2 := U12/z2 = 0.00175 + 0.00175i
U := Iz2*1/(j*ω*C) = 3.85 - 3.85i
K1(jω) := I*R1*(R1 + 1/(jω*C))/(R1 + (R1 + 1/(jω*C)))/(R1 + 1/(jω*C))*1/(jω*C)/I
AK2(ω) := 1/sqrt(1 + ω^2*τ^2)
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