τ := 85*10^-6
R1 := 1100
C := 3.864*10^-8
τ1 := R1*C = 4.2504e-5
A1(ω) := 1/sqrt(1 + (ω*τ1)^2)
φ1(ω) := -180/π*atan(τ1*ω)
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R2 := 4400
L := 1.87
τ2 := L/R2 = 0.000425
A2(ω) := ω*L/sqrt((1 + R2)^2 + (L*ω)^2)
φ2(ω) := -180/π*atan(τ2*ω) + 90
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τ1 = 4.2504e-5
α1 := 1/τ1 = 23527.2
g1(t) := 1 - e^(-α1*t)
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g1(9.78e-5) = 0.899837
9.78e-5 = 9.78e-5
τ2 = 0.000425
α2 := 1/τ2 = 2352.94
g2(t) := e^(-α2*t)
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T := 100*10^-6
T1 := T/2
e1(t) := t - t*Φ(t - T1)
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h := 5*10^-5
A1(t) := t*Φ(t)
A2(t) := t*Φ(t - T1)
e(t) := A1(t) - A2(t)
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