# Типовой расчет по Программным средствам моделирования
# Вариант 3
# Жеребин В.Р. ЭР-15-15
#
# Задание 3. Модель развития эпидемии описывается системой дифференциальных уравнений
h(x) := sin(x)
n[0] := 3000
α := 2.6*10^-4
ni(t) := 50
β := 0.2
γ := 0.015
ns(t) := 800
Ni(t) := α*ni(t)*ns(t) - β*ni(t)
Ns(t) := γ*(n[0] - ns(t)) - α*ni(t)*ns(t)
