# Типовой расчет по Программным средствам моделирования
# Вариант 3
# Жеребин В.Р. ЭР-15-15
#
# Задание 5. В таблице приведены результаты измерения количества тепла, которое надо сообщить 1 кг железа для нагревание его от температуры 0оС до температуры Т,оС,
# Подберите эмпирическую формулу, описывающую экспериментальные результаты. Определите теплоемкость алмаза как функцию температуры.
T := [0; 100; 200; 300; 400; 500; 600; 700; 800; 900]
Q := [0; 57; 153; 284; 449; 642; 862; 1106; 1370; 1652]
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X := T
Y := Q
y(x, a, b) := a*x^b
d/da(y(x, a, b)) → x^b
d/db(y(x, a, b)) → a*x^b*ln(x)
k := [0; 0]
F(x, k) := [k[0]*x^k[1]; x^k[1]; k[0]*x^k[1]*ln(x)]
K := genfit(X, Y, k, F)  # error: Функция не определена в одной или нескольких указанных точках.
