# Типовой расчет по Программным средствам моделирования
# Вариант 3
# Жеребин В.Р. ЭР-15-15
#
# Задание 6.
# Вводим заданные значения RC-цепи:
R := 100*10^3
j := sqrt(-1)
e(t) := 5*exp(-3*10^3*t)
C := 10*10^-9
# Расчитываем τ:
τ := R*C = 0.001
# Вычисляем с помощью интеграла Дюамеля
h(t) := Φ(t)*exp(-t/τ)/τ
Uc(t) := integral(e(t)*h(t - x), x = 0 .. t)
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