f1 := 400*10^6
f2 := 3000*10^6
λ1 := c/f1
λ2 := c/f2
r1 := λ1/(2*π) = 0.119284 m/s
r2 := λ2/(2*π) = 0.0159045 m/s
r01 := 1.6
E1(r) := (r01/r)^3
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Q2 := [
    10, 3.950;
    11, 3.500;
    12, 3.100;
    13, 2.500;
    14, 1.900;
    15, 1.600;
    16, 1.360;
    17, 1.240;
    18, 1.120;
    19, 1.000
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]
r02 := 10
E2(r) := r02/r
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Q2 := [
    4, 9.200;
    5, 8.000;
    6, 7.200;
    7, 6.300;
    8, 5.500;
    9, 4.600;
    10, 3.950;
    11, 3.500;
    12, 3.100;
    13, 2.500
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]
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E3(r) := 1
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