j := sqrt(-1)
Z0 := 120*π
σ := 0.002
π := 3.14
c := 3*10^8
ε0 := 10^-9/(36*π) = 8.84643e-12
f1 := 0.08*10^9
ε := 6.5
f2 := 0.0015*10^9
μ := 2.5
tgδ1 := σ/(f1*2*π*ε*ε0) = 0.0692308
δ1 := 3.947
f3 := sqrt(f1*f2) = 10954451
tgδ2 := σ/(f2*2*π*ε*ε0) = 3.69231
δ2 := 74.845
tgδ(f) := σ/(f*2*π*ε*ε0)
tgδ3 := σ/(f3*2*π*ε*ε0) = 0.50559
δ(f) := atan(tgδ(f))
tgδ(f1) = 0.0692308
tgδ(f2) = 3.69231
δ(f2) = 1.30631
δ(f1) = 0.0691205
β(f) := 2*π*f/c*sqrt(ε*μ)*sqrt(1/2 + 1/2*sqrt(1 + tgδ(f)^2))
λ(f) := 2*π/β(f)
α(f) := 2*π*f/c*sqrt(ε*μ)*sqrt(-1/2 + 1/2*sqrt(1 + tgδ(f)^2))
f := σ/(2*π*ε*ε0*50) = 110769
β(f1) = 6.75484
α(f1) = 0.233542
λ(f1) = 0.929704
β(f2) = 0.19661
α(f2) = 0.150444
λ(f2) = 31.9415
β(f3) = 0.951841
α(f3) = 0.226942
λ(f3) = 6.59774
ZC(f) := exp(j*δ(f)/2)
Zc(f) := Z0*sqrt(μ/ε)*(tgδ(f)^2 + 1)^(-1/4)
Zc(f1) = 233.521
Zc(f2) = 119.539
Zc(f3) = 220.866
