ε_0 := 10^-9/(36*π) = 8.84194e-12
μ_0 := 4*π*10^-7
c := 3*10^8
Z_0 := 120*π
j := sqrt(-1)
# Исходные данные:
ε := 6.5
μ := 2.5
σ := 0.002
φ_Hy := -60
f1 := 8*10^7
f2 := 1.5*10^6
f3 := sqrt(f1*f2) = 10954451
tgδ1 := 0.02
f1d := σ/(tgδ1*2*π*ε*ε_0) = 276923077
tgδ2 := 1
f2d := σ/(tgδ2*2*π*ε*ε_0) = 5538462
tgδ3 := 50
f3d := σ/(tgδ3*2*π*ε*ε_0) = 110769
# Расчет по полным формулам:
β_точн.(f) := 2*π*f/c*sqrt(μ*ε)*sqrt(1/2 + 1/2*sqrt(1 + (σ/(2*π*f*ε*ε_0))^2))  # — коэффициент фазы
α_точн.(f) := 2*π*f/c*sqrt(μ*ε)*sqrt(-1/2 + 1/2*sqrt(1 + (σ/(2*π*f*ε*ε_0))^2))  # — коэффициент ослабления
λ_точн.(f) := 2*π/β_точн.(f)  # — длина волны
V_точн.(f) := 2*π*f/β_точн.(f)  # — фазовая скорость
# Расчет по приближенным формулам для сред с малыми потерями:
β_м.п.(f) := 2*π*f/c*sqrt(μ*ε)  # — коэффициент фазы
α_м.п.(f) := σ/2*Z_0*sqrt(μ/ε)  # — коэффициент ослабления
λ_м.п.(f) := c/(f*sqrt(ε*μ))  # — длина волны
V_м.п.(f) := c/sqrt(μ*ε)  # — фазовая скорость
# Расчет по приближенным формулам для магнитодиэлектрических сред без потерь:
β_б.п.(f) := sqrt(2*π*f*μ*μ_0*σ/2)  # — коэффициент фазы
α_б.п.(f) := sqrt(2*π*f*μ*μ_0*σ/2)  # — коэффициент ослабления
λ_б.п.(f) := 2*π*sqrt(2/(2*π*f*μ*μ_0*σ))  # — длина волны
V_б.п.(f) := sqrt((4*π*f)/(μ*μ_0*σ))  # — фазовая скорость
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β_точн.(f1) = 6.75826
β_точн.(f2) = 0.196709
β_точн.(f3) = 0.952324
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α_точн.(f1) = 0.23366
α_точн.(f2) = 0.150521
α_точн.(f3) = 0.227057
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V_точн.(f1) = 74376348
V_точн.(f2) = 47912203
V_точн.(f3) = 72274620
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λ_точн.(f1) = 0.929704
λ_точн.(f2) = 31.9415
λ_точн.(f3) = 6.59774
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β_точн.(f1) = 6.75826
β_точн.(f2) = 0.196709
β_точн.(f3) = 0.952324
α_точн.(f1) = 0.23366
α_точн.(f2) = 0.150521
α_точн.(f3) = 0.227057
λ_точн.(f1) = 0.929704
λ_точн.(f2) = 31.9415
λ_точн.(f3) = 6.59774
tg(f) := σ/(2*π*f*ε*ε_0)
δ(f) := atan(tg(f))
Z_c(f) := Z_0*sqrt(μ/ε)*(1 + tg(f)^2)^(-1/4)*exp(j*δ(f)/2)
arg(Z_c(f1))*180/π = 1.98016
|Z_c(f1)| = 233.521
|Z_c(f2)| = 119.539
arg(Z_c(f2))*180/π = 37.423
|Z_c(f3)| = 220.866
arg(Z_c(f3))*180/π = 13.4104
t := 0
e11(x) := 0.014*e^(-1.232*x)
e22(x) := -0.014*e^(-1.232*x)
e1(x) := 0.672*e^(-1.232*x)
e2(x) := -0.672*e^(-1.232*x)
E_z1(x) := -0.672*e^(-1.232*x)*cos(2*π*4*10^6*t - 1.536*x + 0.78 - 0.5)
H_y1(x) := 0.014*e^(-1.232*x)*cos(2*π*4*10^6*t - 1.536*x - 0.5)
П_ср1(x) := 3.661*10^-3*e^(-2.464*x)
e121(x) := 6.515*10^-3*e^(-2.062*x)
e212(x) := -6.515*10^-3*e^(-2.062*x)
e12(x) := -0.672*e^(-2.062*x)
e21(x) := 0.672*e^(-2.062*x)
E_z2(x) := -0.672*e^(-2.062*x)*cos(2*π*3*10^8*t - 68.86*x + 0.99 - 0.5)
H_y2(x) := 6.515*10^-3*e^(-2.062*x)*cos(2*π*3*10^8*t - 68.86*x - 0.5)
П_ср2(x) := 2.167*10^-3*e^(-4.124*x)
e131(x) := 6.909*10^-3*e^(-2*x)
e313(x) := -6.909*10^-3*e^(-2*x)
e13(x) := -0.672*e^(-2*x)
e31(x) := 0.672*e^(-2*x)
E_z3(x) := -0.672*e^(-2*x)*cos(2*π*3.463*10^7*t - 8.192*x + 0.9714 - 0.5)
H_y3(x) := 6.909*10^-3*e^(-2*x)*cos(2*π*3.463*10^7*t - 8.192*x - 0.5)
П_ср3(x) := 2.255*10^-3*e^(-4*x)
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