l := 123*10^-3
r0 := 40*10^-3
p1 := 1
p2 := 2
η := 2.405
μ := 1.84
fE1 := c/(2*π)*sqrt((p1*π/l)^2 + (η/r0)^2) = 3.11689e9 m/s
fE2 := c/(2*π)*sqrt((p2*π/l)^2 + (η/r0)^2) = 3.76437e9 m/s
fH1 := c/(2*π)*sqrt((p1*π/l)^2 + (μ/r0)^2) = 2.51045e9 m/s
fH2 := c/(2*π)*sqrt((p2*π/l)^2 + (μ/r0)^2) = 3.27991e9 m/s
Q1 := [
    5, 0.06;
    10, 0.12;
    15, 0.15;
    20, 0.24;
    25, 0.3;
    30, 0.42;
    35, 0.48;
    40, 0.6;
    45, 0.66;
    50, 0.72;
    55, 0.78;
    60, 0.81;
    65, 0.81;
    70, 0.78;
    75, 0.72;
    80, 0.63;
    85, 0.54;
    90, 0.45;
    95, 0.36;
    100, 0.27;
    105, 0.21;
    110, 0.15;
    115, 0.09
]
f2(z) := sin(p2*π/l*z)
f1(z) := sin(p1*π/l*z)
a := 1/0.81
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Q1[0, 0]/1000 = 0.005
f1(0.01) = 0.252646
i := 0 .. 22
Q := 1822
f_рез := 3106
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f_нижн := 3105
(f1(Q1[i, 0]/1000) - Q1[i, 1])/f1(Q1[i, 0]/1000) = [0.528895; 0.525027; 0.598734; 0.509102; 0.496661; 0.394317; 0.384261; 0.296578; 0.276715; 0.247784; 0.209126; 0.189405; 0.186753; 0.20125; 0.23497; 0.292474; 0.345621; 0.39723; 0.451; 0.512848; 0.526728; 0.539836; 0.556459]
f_верх := 3107
П := f_верх - f_нижн = 2
Q_нагр := f_рез/П = 1553
K_с := (Q - Q_нагр)/Q_нагр = 0.173213
Q2 := [
    5, 5;
    10, 18;
    15, 30;
    20, 45;
    25, 50;
    30, 54;
    35, 50;
    40, 40;
    45, 30;
    50, 18;
    55, 8;
    60, 1;
    65, 2;
    70, 16;
    75, 32;
    80, 46;
    85, 51;
    90, 42;
    95, 54;
    100, 52;
    105, 44;
    110, 32;
    115, 14
]
a := 1/55
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Q := 2002
f_рез := 3742
f_нижн := 3736
f_верх := 3746
П := f_верх - f_нижн = 10
Q_нагр := f_рез/П = 374.2
K_с := (Q - Q_нагр)/Q_нагр = 4.35008
Q3 := [
    35, 0.18;
    30, 0.21;
    25, 0.24;
    20, 0.54;
    15, 1.11;
    10, 1.62;
    5, 2.01;
    0, 2.04;
    -5, 2.01;
    -10, 1.92;
    -15, 1.68;
    -20, 1.32;
    -25, 0.84;
    -30, 0.48;
    -35, 0.24
]
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Q := 1869
f_рез := 3270
f_нижн := 3269
f_верх := 3270.5
П := f_верх - f_нижн = 1.5
Q_нагр := f_рез/П = 2180
K_с := |(Q - Q_нагр)/Q_нагр| = 0.142661
