E_vn2 := [600; 730; 900; 800; 790]
l := [1; 2; 3; 4; 5]
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z := 1.1
k := 1.4
N := 3
S := 200
U_oy := 0.62
Φ(E_n) := E_n*k*S*z/(N*U_oy)
Φ(600) = 99354.8
Φ(400) = 66236.6
Φ(1000) = 165591
Φ_sv := 5000
N(E_n) := E_n*k*S*z/(N*U_oy)/Φ_sv
N(600) = 19.871
N(400) = 13.2473
N(1000) = 33.1183
