писька
Большаях(φ) := (5 + 7*sin(φ))*sqrt(|-7*sin(φ) - 5|/(-7*sin(φ) - 5))
Малаях(φ) := (5 + 6*sin(φ))*sqrt(|-6*sin(φ) - 5|/(-6*sin(φ) - 5))
Большаяу(φ) := 7*cos(φ)
КрПлотьх(φ) := 0.6*sin(φ)
Малаяу(φ) := 6*cos(φ)*sqrt(|3.1 - 6*cos(φ)|/(3.1 - 6*cos(φ)))
КрПлотьу(φ) := (2*cos(φ) + 2)*sqrt(|2*cos(φ) - 0.1|/(2*cos(φ) - 0.1))
Клиторх(φ) := 0.5*sin(φ)
Каналу(φ) := 0.4*cos(φ) + 1.5
Входу(φ) := 0.8*cos(φ) - 1
Клитору(φ) := (cos(φ) + 4)*sqrt(|-cos(φ) - 0.5|/(-cos(φ) - 0.5))
Каналх(φ) := 0.4*sin(φ)
Входх(φ) := 0.6*sin(φ)
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