RealRange(□, □) == real == □
# задание 1
f(x) := cos(2*π*x)^3
g(x) := d/dx(f(x))
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# С помощью трассиоровки нашел экстремумы c координатами: (0,1)  (0,0)  (1,1)
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# задание 4
h(X) := X^4 + X^3 + 9*X^2 + 3*X - 3
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# увеличил масштаб и с помощью трассировки нашел два корня на отрезке от -5 до 5
#
# первый корень: (-0,75904;-0,19749)
# второй корень: (0,38874,-0,39216)
a4 := 1
a3 := 1
a2 := 9
a1 := 3
a0 := -3
f(y) := a4*y^4 + a3*y^3 + a2*y^2 + a1*y + a0
# вычисление первого корня
y := -0.76
y1 := root(f(y), y)
y1 = -0.777185
|f(y1)| = 4.61853e-14
# вычисление второго корня
y2 := root(f(y)/(y - y1), y)
y2 = 0.424128
|f(y2)| = 2.26485e-12
# вычисление третьего корня
y3 := root(f(y)/((y - y1)*(y - y2)), y)
y3 = -0.323471 + 2.99943i
|f(y3)| = 1.4349e-14
# вычисление четвертого корня
y4 := root(f(y)/((y - y1)*(y - y2)*(y - y3)), y)
y4 = -0.323471 - 2.99943i
|f(y4)| = 1.34406e-14
# задание 3
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t := 2
y(0) := 1  # error: Здесь необходимо указать имя.
y'' + (cos(2*t) + 1)*y = 0  # error: Эта переменная не определена.
y'(0) := 0  # error: Здесь необходимо указать имя.
y := [1; 0]  # задание начальных условий
[y(0); y'(0)] := [y[0]; y[1]] = [1; 0]  # error: Значение должно быть действительным.
