T := [20; 19; 18; 17; 16; 15; 14; 13; 12; 11; 10; 9; 8; 7; 6; 5; 4; 3; 2; 1; 0]
A1 := [1.9; 2.3; 2.5; 3; 2.5; 2.4; 2.8; 2.5; 2.8; 2.8; 2.6; 2.5; 2.5; 2.8; 2.8; 2.5; 2.7; 2.3; 2.3; 2.3; 2.1]
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A2 := [1.8; 2.2; 2.4; 3; 2.4; 2.5; 2.7; 2.8; 3; 2.8; 2.6; 2.5; 2.6; 2.8; 2.9; 2.4; 2.7; 2.4; 2.2; 2.2; 2.1]
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A3 := [1.9; 2.3; 2.4; 2.7; 2.5; 2.5; 2.7; 2.8; 2.9; 2.6; 2.7; 2.4; 2.5; 2.7; 2.8; 2.4; 2.7; 2.3; 2.3; 2.4; 2.5]
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Umax := 2.9
Umin := 1.9
КСВ := Umax/Umin = 1.52632
k := (1 - КСВ)/(1 + КСВ) = -0.208333
