L := 2.3*10^-3
C := 3000*10^-12
Um := 2
f := 10*10^3
2*π*f*sqrt(L*C) = 0.165046
β := -atan(2*π*f*sqrt(L*C)) = -0.163571  # РАДИАН
9, 3693  # ГРАДУСЫ
r1 := 350
r2 := 1900
Z := sqrt(L/C) = 875.595
U1(z) := |Um|*2*|cos(β*z)|  # разомкнутая линия
d2 := (r2 - Z)/(r2 + Z) = 0.369076
d1 := (r1 - Z)/(r1 + Z) = -0.428849
U2(z) := |Um|*2*|sin(β*z)|  # кз
U3(z) := |Um|*1
# активное сопротивление R=Z
m := |Um|*(1 - |d2|) = 1.26185
M := |Um|*(1 - |d1|) = 1.1423
U4(z) := |Um|*1*sqrt(1 + |d1|^2 + 2*|d1|*cos(2*β*z)) + M  # активное сопротивление R меньше Z
KCV1 := (1 + |d1|)/(1 - |d1|) = 2.5017
U5(z) := |Um|*1*sqrt(1 + |d2|^2 + 2*|d2|*cos(2*β*z)) + m  # активное сопротивление R2 больше Z
KCV2 := (1 + |d2|)/(1 - |d2|) = 2.16995
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1/KCV2 = 0.460839
