# Типовой расчет по Програмным средствам моделирования
# Вариант 11
# Группа Эр-15-15
# Студент: Салин Г А
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# построил график заданной функции | построил график производной
f(x) := cos(2*π*x)^3
g(x) := d/dx(f(x))
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# с помощью трассировки и увеличения масштаба нашел экстремумы данной функции
# на интервале [0,1]
# существует три экстремума с координатами (0,1),(0.5,-1),(1,1)
# построил функцию и ее производную на одном графике
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h(X) := X^4 + X^3 + 9*X^2 + 3*X - 3
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# увеличил масштаб и с помощью трассировки нашел два корня на отрезке от -1 до 1
#
# первый корень: (-0.776,-0.013089)
# второй корень: (0.422,-0.024379)
# Теперь найду корни не графически, а с помощью встроенной функции root
a4 := 1
a3 := 1
a2 := 9
a1 := 3
a0 := -3
f(y) := a4*y^4 + a3*y^3 + a2*y^2 + a1*y + a0
# вычисление первого корня
y := -0.76
y1 := root(f(y), y)
y1 = -0.777185
|f(y1)| = 4.61853e-14
# вычисление второго корня
y2 := root(f(y)/(y - y1), y)
y2 = 0.424128
|f(y2)| = 2.26485e-12
# вычисление третьего корня
y3 := root(f(y)/((y - y1)*(y - y2)), y)
y3 = -0.323471 + 2.99943i
|f(y3)| = 1.4349e-14
# вычисление четвертого корня
y4 := root(f(y)/((y - y1)*(y - y2)*(y - y3)), y)
y4 = -0.323471 - 2.99943i
|f(y4)| = 1.34406e-14
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Given
y''(t) + (cos(2*t) + 1)*y(t) == 0
y(0) == 1
y'(0) == 0
y := Odesolve(t, 10)
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# на интервале от 0 до 10 существует 3 корня
#
# с помощью увеличения масштаба и трассировки найду их координаты
# координаты (2.13,-1.06)
# (4.9, 1.8587),(7.92,-3.7611)
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ORIGIN := 1
QT := [
    0, 0;
    22.8, 50;
    47.05, 100;
    72.8, 150;
    10, 200;
    12.88, 250;
    15.9, 300;
    19.07, 350;
    22.4, 400;
    25.86, 450
]
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