# 3.2 Решение обыкновенных дифференциальных уравнений с помощью преобразований Лапласа.
alfa := 1
f(x) := exp(-alfa*x)
y(x) := Φ(x)*f(x)
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R := 10^3
C := 10^-6
alfa := (R*C)^-1
f(x) := 10*(1 - exp(-alfa*x))
y(x) := Φ(x)*f(x)
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R := 10^3
C := 10^-6
alfa := (R*C)^-1
T := 0.002
e(t) := 10*(Φ(t) - Φ(t - T))
f(x) := 10*(1 - exp(-alfa*x))
uc(t) := Φ(t)*f(t) - Φ(t - T)*f(t - T)
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# Задание к разделу
1.
alfa := (R*C)^-1
R := 10^3
C := 10^-6
β := 4000
e(t) := (Φ(t) - Φ(t - T))
f(x) := (1 - exp(-alfa*x))
T := 0.002
uc(t) := Φ(t)*f(t) - Φ(t - T)*f(t - T)
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# 3.3 Решение обыкновенных дифференциальных уравнений с помощью интеграла наложений(Дюамеля).
R := 10^3
C := 10^-6
tay := R*C
a := 10^3
e(t) := exp(-a*t)
h(t) := Φ(t)*exp(-t/tay)/tay
uc(t) := integral(e(t)*h(t - x), x = 0 .. t)
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# Задание к разделу
2.
e(t) := cos(a*t)
R := 2.75*10^3
C := 2*10^-6
a := 3
tay := R*C
h(t) := Φ(t)*exp(-t/tay)/tay
uc(t) := integral(e(t)*h(t - x), x = 0 .. t)
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# 3.4 Преобразование Фурье и спектральный анализ
N := 1024
ORIGIN := 0
n := 0 .. N - 1
x[n] :=
    1 if 1 ≤ n ≤ 64
    0 otherwise
SpRec := CFFT(x)
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dt := 0.01
T := 64*dt
t[n] :=
    ((n - N/2)*dt) if 0 ≤ n ≤ N
    0 otherwise
F[n] :=
    (T + t[n])/T if -T ≤ t[n] ≤ 0
    (T - t[n])/T if 0 ≤ t[n] ≤ T
    0 otherwise
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df := 1/(N*dt)
f[n] := df*n
Fmax := 1/(2*dt)
SpTr := CFFT(F)/df
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Y := ICFFT(SpRec)
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S[n] :=
    (T - t[n])/T if 0 ≤ t[n] ≤ T
    0 otherwise
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SpTr1 := CFFT(S)/df
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j := sqrt(-1)
Fcut := 1
K(f) := 1/(1 + j*f/Fcut)
Filtr[n] :=
    K(f[n]) if 0 ≤ f[n] ≤ Fmax
    K(f[n] - 2*Fmax) if Fmax < f[n] ≤ 2*Fmax
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Sp[n] := SpTr1[n]*Filtr[n]
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YY := ICFFT(Sp)
YY1 := YY*df
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# задание к разделу
# 1
dt := 0.011
T := 1.45*dt
t[n] :=
    ((n - N/2)*dt) if 0 ≤ n ≤ N
    0 otherwise
F[n] :=
    (T + t[n])/T if -T ≤ t[n] ≤ 0
    (T - t[n])/T if 0 ≤ t[n] ≤ T
    0 otherwise
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