# Электромагнитная волна типа Н21 в прямоугольном волноводе с размерами а=30мм b=18 мм. Волновод заполнен воздухом, стенки выполнены из латуни. Средняя мощность, переносимая волной заданного типа в сечении z=0, равна P0=390 мВт.
# Соседняя волна H30
a := 30*10^-3
ε := 5.5
j := sqrt(-1)
m2 := 3
b := 18*10^-3
μ := 1.5
n2 := 0
m := 2
ε_0 := 10^-9/(36*π)
n := 1
μ_0 := 4*π*10^-7
P_0 := 390*10^-3
c := 3*10^8
σ := 1.4*10^7
Z_0 := 120*π
# 1 пункт: Определите критическую частоту для волны Н21 fкр и ближайшую критическую частоту fкр.сос для соседней волны (fкр.сос>fкр). Запишите условие распространения волны заданного типа: а) в виде соотношения для частоты колебаний;
# б) в виде соотношения для длины волны генератора. Сделайте вывод, во сколько раз fкр. заданного типа превышает критическую частоту волны основного типа в данном волноводе.
g := sqrt((m*π/a)^2 + (n*π/b)^2)
g_сос := sqrt((m2*π/a)^2 + (n2*π/b)^2)
f_кр := c/2*sqrt((m/a)^2 + (n/b)^2) = 1.30171e10
f_кр.сос := c/2*sqrt((m2/a)^2 + (n2/b)^2) = 15000000000
f_кр.осн := c/2*sqrt((1/a)^2 + (0/b)^2) = 5000000000
f_кр/f_кр.осн = 2.60342
λ_кр.сос := 2/sqrt((m2/a)^2 + (n2/b)^2) = 0.02
λ_кр := 2/sqrt((m/a)^2 + (n/b)^2) = 0.0230466
λ_кр.осн := 2/sqrt((1/a)^2 + (0/b)^2) = 0.06
# 2 пункт: Запишите формулы, расчитайте и постройте для волны заданного типа частостные зависимости продольного волнового числа, фазовой скорости, длины волны и коэффециента затухания за счет потерь в металических стенках.
h(f) := sqrt((2*π*f)^2*μ_0*ε_0 - g^2)
V_ф(f) := c/sqrt(1 - (f_кр/f)^2)
λ_в(f) := c/(f*sqrt(1 - (f_кр/f)^2))
α(f) := 2*sqrt(2*π*f*μ_0/(2*σ))*sqrt(ε_0)/(sqrt(μ_0)*b*sqrt(1 - (f_кр/f)^2))*((1 + b/a)*(f_кр/f)^2 + (1 - (f_кр/f)^2)*b/a*(b/a*m^2 + n^2)/((b/a*m)^2 + n^2))
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# 3 пункт: повторите пп.1 и 2 для случая, когда волновод заполнен средой без потерь с параметрами ε и μ (см. задание к части 1 данного ТР).
f_кр.ср := g*c/(2*π*sqrt(μ*ε)) = 4.53197e9
g_сос := sqrt((m2*π/a)^2 + (n2*π/b)^2)
f_кр.сос.ср := c/(2*sqrt(μ*ε))*sqrt((m2/a)^2 + (n2/b)^2) = 5.22233e9
h_ср(f) := sqrt((2*π*f)^2/c^2*μ*ε - g^2)
λ_кр.сос.ср := 2/sqrt((m2/a)^2 + (n2/b)^2) = 0.02
V_ф.ср(f) := c/(sqrt(μ*ε)*sqrt(1 - (f_кр/f)^2))
λ_в.ср(f) := c/(f*sqrt(μ*ε)*sqrt(1 - (f_кр/f)^2))
α_ср(f) := 2*sqrt(μ_0*μ*2*π*f/(2*σ))*sqrt(ε*ε_0)/(sqrt(μ*μ_0)*b*sqrt(1 - f_кр.ср^2/f^2))*((1 + b/a)*(f_кр.ср/f)^2 + (1 - (f_кр.ср/f)^2)*b/a*(b/a*m^2 + n^2)/(b^2/a^2*m^2 + n^2))
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