# Домашняя работа #1 по ФПЭЦ
#
# Выполнил: Капитанов А.А
# Группа: ЭР-13-07
# Преподаватель: Хандурин А.В.
# Дано:
# Схема из двух стабилизаторов напряжения:
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U_1 := 7.8  # В  # входное напряжение
R_c := 1.2*10^3  # Ом
R_n := 600  # Ом
T_1 := 290  # К  # начальная температура
T_2 := 350  # К  # конечная
I_so := 10^-13  # А  # ток насыщения
r_d := 10  # Ом
ΔE := 1.12  # эВ
# Найти:
# 1. Uo, Io при Т1=290 и Т2=350 К (в рабочей точке)
#
# 2. график U2(U1) при Т1 и Т2
#
# 3. график U2(1/Rн) при Т1 и Т2
# Решение:
# 1. Определение Рабочей точки и значения тока и напряжения в Р.Т.
#
# Для начала построим эквивалентную схему:
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# Рассчитаем эквивалентные параметры:
U_1э := U_1*R_n/(R_n + R_c) = 2.6  # В
R_cэ := R_c*R_n/(R_n + R_c) = 400  # Ом
# Получим уравнение для описания ВАХ:
U_1э - U_2 == U_Rcэ
U_1э == i_д*R_cэ + U_2
# получаем:
i_д == (U_1э - U_2)/R_cэ
# где:
U_2 == 2*U_д + 2*r_д*i_д
# В итоге имеем:
(i_д == i_d)
i_d == I_s*(exp(U_d/φ_t) - 1) == I_s*(exp((U_2 - 2*r_d*i_d)/(2*φ_t)) - 1)
# Если температура меняется, то меняется Is & φ:
# Для Т1=290 К:
I_so = 1e-13  # A
φ_0 := 25*10^-3  # В
φ_T1 := φ_0  # тепловой потенциал для Т1
# Для Т2=350 К:
φ_T2 := φ_0*T_2/T_1 = 0.0301724  # В  # тепловой потенциал для Т2
I_s2 := I_so*(T_2/T_1)^3*exp(ΔE/φ_0*(1 - T_1/T_2)) = 3.80533e-10  # A
# Нашли Is & φ при разных температурах, теперь можно построить ВАХ:
i_d(T, I_s, φ, U_2) == I_s*(exp((U_2 - 2*r_d*i_d)/(2*φ)) - 1)
# Т.к. функция обращается сама к себе, решим задачу численным методом, для этого выразим напряжение на выходе:
I[0] := 0
i := 0 .. 5000
I[i + 1] := I[i] + 0.1*10^-3
U11(I) := 2*φ_T1*ln(I/I_so + 1) + 2*r_d*I
U1[i] := U11(I[i])
# Построим прямую стабилизации, зная, что U_1э = 2.6и  U_1э/R_cэ = 0.0065
# Для этого можно решить уравнение линейного типа: у = ах+b
y(x) := -6.5/2.6*x + 6.5
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290
U22(I) := 2*φ_T2*ln(I/I_s2 + 1) + 2*r_d*I
U2[i] := U22(I[i])
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350
# Таким образом, графически определяем рабочую точку для двух графиков.
# Ответ для первого пункта:
# При Т1=290К: | При Т2=350К:
U_o1 := 1.27  # В
U_o2 := 1.05  # В
I_o1 := 3.3  # мA
I_o2 := 3.8  # мA
# 2. Зависимость выходного напряжения от входного:
# Строим несколько прямых стабилизации, при U1 от 0 до 11 В. Дабы не загромождать график, менялось значение напряжения (параметр а), и с помощью функции "маркер" определялись точки пересечения, затем заносились в таблицу. Далее строится график.
u(x, a) := -a/400*10^3/a*x + a/400*10^3
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U1э := [0; 0.5; 1; 1.5; 2; 2.6; 3; 3.5; 4]
g1 := [0; 0.48; 0.964; 1.16; 1.224; 1.27; 1.31; 1.34; 1.37]
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350
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g2 := [0; 0.47; 0.85; 0.94; 1; 1.05; 1.09; 1.12; 1.16]
U1э = [0; 0.5; 1; 1.5; 2; 2.6; 3; 3.5; 4]
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# 3. Зависимость выходного напряжения от проводимости нагрузки (1/Rн):
# Аналогично предыдущему пункту ищем зависимость напряжения от нагрузочной проводимости, для этого меняем сопротивление нагрузки и смотрим за изменениями на графике:
U3[i] := U11(I[i])
R_n := 500
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y(x) := -1/(R_c*R_n/(R_n + R_c))*10^3*x + 6.5
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# Составляем массивы значений, по которым строятся графики:
# Ответ для третьего пункта:
Rn := [1; 10; 20; 30; 40; 50; 100; 200; 300; 400; 500; 1000]
U_2 := [0.0065; 0.062; 0.126; 0.186; 0.246; 0.308; 0.592; 1.078; 1.206; 1.232; 1.2625; 1.304]
290
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Rn := [1; 10; 20; 30; 40; 50; 100; 200; 300; 400; 500; 1000]
U_2 := [0.0067; 0.064; 0.128; 0.19; 0.25; 0.306; 0.6; 0.928; 0.978; 1.0183; 1.05; 1.0728]
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350
