# Волна типа E_11
ε := 30
a := 0.04  # м
P_0 := 0.08  # Вт
ε_0 := 10^-9/(36*π)  # Ф/м
c := 3*10^8  # м/с
μ := 1.5
b := 0.02  # м
σ_м := 1.5*10^7  # См/м
μ_0 := 4*π*10^-7  # Гн/м
# 1)
g := sqrt((π/a)^2 + (2*π/b)^2)
f_кр := g*c/(2*π) = 1.54616e10  # Гц
λ_кр := 2*π/g = 0.0194029  # м
# Соседней волной будет E_21
# Если  волновод заполнен средой без потерь с параметрами ε и μ
f_кр_ср := g*c/(2*π*sqrt(μ*ε)) = 2.30489e9  # Гц
g_сос := sqrt((2*π/a)^2 + (2*π/b)^2)
f_кр_сос := g_сос*c/(2*π) = 1.67705e10  # Гц
f_кр_сос_ср := g_сос*c/(2*π*sqrt(μ*ε)) = 2.5e9  # Гц
# Условия распространения волны E_11 :
# Волна распространяется при
# 1)
f > 5.59*10^9  # Гц
# 2)
λ_0 < 0.054  # м
# Для основного типа волны
f_кр.осн := c/(2*a) = 3750000000
f_кр/f_кр.осн = 4.12311
# Критическая частота для волны типа E_11 больше критической частоты волны основного типа в 2.236 раз
# 2)
# Если волновод заполнен воздухом:
# Если волновод заполнен средой без потерь с параметрами ε и μ
h(f) := sqrt((2*π*f)^2/c^2 - g^2)
h_ср(f) := sqrt((2*π*f)^2*ε*μ/c^2 - g^2)
λ_в(f) := 2*π/h(f)
λ_в_ср(f) := 2*π/h_ср(f)
v_ф(f) := λ_в(f)*f
v_ф_ср(f) := λ_в_ср(f)*f
h_пот_мет_ср(f) := 2*sqrt(μ*μ_0*2*π*f/(2*σ_м))*sqrt(ε*ε_0)/(b*sqrt(μ*μ_0)*sqrt(1 - (f_кр/f)^2))*((b/a)^3 + 1)/((b/a)^2 + 1)
h_пот_мет(f) := 2*sqrt(μ_0*2*π*f/(2*σ_м))*sqrt(ε_0)/(b*sqrt(μ_0)*sqrt(1 - (f_кр/f)^2))*((b/a)^3 + 1)/((b/a)^2 + 1)
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# Если волновод заполнен средой без потерь, то h, v_ф, λ_в зависят от частоты так же, как и у плоской волны.
# Если волновод заполнить веществом с бо'льшими магнитными и диэлектрическими проницаемостями, то  критическая частота уменьшится, что приведёт к расширению диапазона частот, в котором данная волна  будет распространяться. Но одновременно с этим затухание волн увеличится.
# 4)
f_0 := 1.6*f_кр = 2.47386e10  # Гц
h := sqrt(4*π^2*f_0^2/c^2 - g^2)
# Амплитудный коэффициент обратно пропорционален размерам поперечного сечения волновода
E_x(x, y, z) := -1i*h/g^2*C_1*π/a*cos(π/a*x)*sin(π/b*y)*exp(-1i*h*z)  # error: Эта переменная не определена.
H_x(x, y, z) := 1i*2*π*f_0*ε_0/g^2*C_1*π/b*sin(π/a*x)*cos(π/b*y)*exp(-1i*h*z)  # error: Эта переменная не определена.
E_y(x, y, z) := -1i*h/g^2*C_1*π/b*sin(π/a*x)*cos(π/b*y)*exp(-1i*h*z)  # error: Эта переменная не определена.
H_y(x, y, z) := -1i*2*π*f_0*ε_0/g^2*C_1*π/a*cos(π/a*x)*sin(π/b*y)*exp(-1i*h*z)  # error: Эта переменная не определена.
E_z(x, y, z) := C_1*sin(π/a*x)*sin(π/b*y)*exp(-1i*h*z)  # error: Эта переменная не определена.
C_1 := sqrt(4*g^2*P_0/(2*π*f_0*ε_0*h*a*b)) = 274.697  # А/м
E_xmax := h/g^2*C_1*π/a = 83.2132  # В/м
H_xmax := 2*π*f_0*ε_0/g^2*C_1*π/b = 0.565521  # А/м
E_ymax := h/g^2*C_1*π/b = 166.426  # В/м
H_уmax := 2*π*f_0*ε_0/g^2*C_1*π/a = 0.282761  # А/м
E_zmax := C_1 = 274.697  # В/м
C_1a(a, b) := sqrt(4*g^2*P_0/(2*π*f_0*ε_0*h*a*b))
C_1(f) := sqrt(4*g^2*P_0/(2*π*f*ε_0*h*a*b))
# Зависимость от частоты:
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# Амплитудный коэффициент обратно пропорционален частоте колебаний
# Зависимость от размеров:
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