U_1 := 7.8
R_c := 1000
R_n := 1000
T_1 := 290
T_2 := 350
I_so := 10^-13
r_d := 10
U_1э := U_1*R_n/(R_n + R_c) = 3.9
R_cэ := R_c*R_n/(R_n + R_c) = 500
i_d(T, I_s, φ, U_2) == I_s*(exp((U_2 - 2*r_d*i_d)/(2*φ)) - 1)
φ_T1 := 25*10^-3
φ_T2 := φ_T1*T_2/T_1 = 0.0301724
I[0] := 0
i := 0 .. 5000
I[i + 1] := I[i] + 0.1*10^-3
U11(I) := 2*φ_T1*ln(I/I_so + 1) + 2*r_d*I
U1[i] := U11(I[i])
y(x) := -7.8/3.9*x + 7.8
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u(x, a) := -a/500*10^3/a*x + a/500*10^3
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U1э := [0; 0.5; 1; 1.5; 2; 2.5; 3; 3.5; 3.9]
g1 := [0; 0.4875; 0.9555; 1.1475; 1.2129; 1.2519; 1.287; 1.3143; 1.3338]
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U3[i] := U11(I[i])
R_n := 1000
y(x, R_n) := -1/(R_c*R_n/(R_n + R_c))*10^3*x + 7.8
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U_22 := [0; 0.062; 0.126; 0.23; 0.3; 0.372; 0.704; 1.164; 1.2431; 1.276; 1.3; 1.3348]
Rn := [1; 10; 20; 30; 40; 50; 100; 200; 300; 400; 500; 1000]
U_2 := [0.0065; 0.062; 0.126; 0.186; 0.246; 0.308; 0.592; 1.078; 1.206; 1.232; 1.2625; 1.304]
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