# Часть 2.
# Проведено по N  измерений частот F1 и F2 на границах полосы пропускания одноконтурного резонансного усилителя  . Погрешности измерения частот распределены по Гаусовскому закону c неизвестным заранее СКО. Систематические погрешности отсутствуют .
ORIGIN := 1
Nгр := 15
Nж := 3
N := Nгр + |Nж - 11| = 23
μ_1 := (50*Nгр + Nж) = 753  # кГц
μ_2 := μ_1 + 20 = 773  # кГц
σ := 0.05  # кГц
F_1 := rnorm(N, μ_1, σ)
F_2 := rnorm(N, μ_2, σ)
F_1 = [752.988; 753.004; 753.063; 752.965; 753; 753.055; 753.045; 752.855; 752.892; 753.01; 752.969; 752.94; 753.005; 753.039; 753.015; 753.001; 752.962; 752.98; 752.966; 752.993; 753.051; 753.009; 753.026]
F_2 = [772.95; 772.954; 772.956; 773.014; 772.98; 773.065; 772.931; 773.019; 773.022; 773.088; 772.968; 773.028; 773.077; 772.909; 773.065; 772.948; 773.023; 772.947; 772.938; 773.021; 772.904; 772.994; 773.021]
i := [1; 2; 3; 4; 5; 6; 7; 8; 9; 10; 11; 12; 13; 14; 15; 16; 17; 18; 19; 20; 21; 22; 23]
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# 2. Оценки результатов.
# Расчет оценки частот F1ср и F2ср.
F1_ср := 1/N*sum(F_1[i], i = 1 .. N) = 752.993  # кГц
F2_ср := 1/N*sum(F_2[i], i = 1 .. N) = 772.992  # кГц
# Расчет CКО  F1 и F2.
S_F1 := sqrt(1/(N - 1)*sum((F_1[i] - F1_ср)^2, i = 1 .. N)) = 0.0498559  # кГц
S_F2 := sqrt(1/(N - 1)*sum((F_2[i] - F2_ср)^2, i = 1 .. N)) = 0.0538265  # кГц
# Оценка СКО:
σ1 := S_F1/sqrt(N) = 0.0103957  # кГц
σ2 := S_F2/sqrt(N) = 0.0112236  # кГц
# Оценки результатов измерений:
# 1) Точечная.
# F1 = 757.988 кГц ; 0.012 кГц; 18
# F2 = 778.017 кГц ; 0.011 кГц; 18
# 2) Интервальная.
# Для интервальной оценки погрешности требуется вычислить ширину доверительного интервала.Поскольку СКО изначально неизвестно, будем использовать распределение Стьюдента. Коэффициент Стьюдента при N=18 и P=0.95 равен 2.11 (в таблице указаны значения tст для f - числа степеней свободы, f=N-1)
t_ст := 2.0739
t_ст*σ1 = 0.0215596  # кГц
t_ст*σ2 = 0.0232766  # кГц
# F1 = (757.988±0.024)кГц ; 0.95 ; 18
# F2 = (778.017±0.024)кГц ; 0.95 ; 18
# Интервальная и точечная оценки:
#
# F1=757.988 кГц;  σ1= 0.012 кГц; N=18
#
# F2=778.017 кГц;  σ2=0.011  кГц; N=18
#
# F1=(757.988±0.024) кГц ; Рд=0.95;  N=18
#
# F2=(778.017±0.024) кГц ; Рд=0.95;  N=18
# Коэффициент корреляции:
r := sum((F_1[i] - F1_ср)*(F_2[i] - F2_ср)/((N - 1)*S_F1*S_F2), i = 1 .. N) = -0.218495
r := corr(F_1, F_2) = -0.218495
# Коэффициент корреляции не равен нулю,то есть величины коррелированы.
# 3. | a) | Выборка значений величины | Π[i]
Π := F_2 - F_1
# Что бы закон распределения был гаусовским необходимо и достаточно , равенство нулю оценочных коэффициентов ассиметри и эксцеса (Ао=0, Ео=0). Но поскольку  эти величины случайные, то сравнение проводят с СКО оценки этих величин.
Π_ср := sum(Π[i]/N, i = 1 .. N) = 19.9995  # кГц  # - среднее значение выборки полосы пропускания
S_Π := sqrt(sum((Π[i] - Π_ср)^2/(N - 1), i = 1 .. N)) = 0.0809666  # кГц  # - СКО полосы пропускания
A := sum((Π[i] - Π_ср)^3/(N*S_Π^3), i = 1 .. N) = 0.0336335  # - среднее значение коэффициента ассиметрии
Π = [19.9619; 19.9492; 19.893; 20.0492; 19.9798; 20.0097; 19.8865; 20.1641; 20.1297; 20.0777; 19.9984; 20.0874; 20.0724; 19.8704; 20.0501; 19.947; 20.0612; 19.9678; 19.9716; 20.0278; 19.8533; 19.9848; 19.995]
E := sum((Π[i] - Π_ср)^4/(N*S_Π^4), i = 1 .. N) - 3 = -0.754885  # - среднее значение коэффициента эксцесса
σ_A := sqrt(6*(N - 1)/((N + 1)*(N + 3))) = 0.459933  # - оценка СКО коэффициента асимметрии
σ_E := sqrt(24*N*(N - 2)*(N - 3)/((N - 1)^2*(N + 3)*(N + 5))) = 0.811159  # - оценка СКО коэффициента эксцесса
2*σ_A = 0.919866
|A| < 2*σ_A  # где 2*σ_A = 0.919866
# Точечная и интервальная оценки величины полосы пропускания:
# Гипотезу о нормальном законе распределения принимаем.
|E| < 2*σ_E
# где 2*σ_E = 1.62232
2*σ_E = 1.62232
σ_Π == sqrt(sum((Π[i] - Π_ср)^2/(N*(N - 1)), i = 1 .. N)) == 0.01569  # кГц
σ := sqrt(sum((Π[i] - Π_ср)^2/(N*(N - 1)), i = 1 .. N)) = 0.0168827  # кГц  # - оценка СКО полосы пропускания
# Точечная оценка:
# П = 20.029 кГц ; 0.016 кГц ; 18
# Для интервальной оценки погрешности требуется вычислить ширину доверительного интервала.Поскольку СКО изначально неизвестно, будем использовать распределение Стьюдента. Из таблицы, приведенной в литературе: коэффициент Стьюдента при N=18 и P=0.98 равен 2.5668 (в таблице указаны значения tст для f - числа степеней свободы, f=N-1)
t_cт := 2.5083  # - коэффициент Стьюдента для нашего случая
t_cт*σ = 0.0423469  # кГц  # - доверительный интервал для результатов измерения полосы пропускания
# П = (20.03 ± 0,04) кГц ; 0.98 ; 18
# б) | Величина | Π[i] | как результат косвенного измерения.
Π_ср == F2_ср - F1_ср
Π_ср = 19.9995
# C учетом корреляции:
k_1 := d/dF1_ср(F2_ср - F1_ср) = -1
k_1 == -1
k_2 == 1
k_2 := d/dF2_ср(F2_ср - F1_ср) = 1
σ_Π == sqrt(k_1^2*σ_1^2 + k_2^2*σ_2^2 + 2*k_1*k_2*r*σ_1*σ_2)
σ_Π := sqrt(σ2^2 + σ1^2 - 2*r*σ2*σ1) = 0.0168827  # кГц
# Точечная оценка:
# П = 20.029 кГц ; 0.016 кГц ; 18
# Интервальная оценка:
t_cт = 2.5083
d := σ_Π/sqrt(N)*t_cт = 0.00882994
# П = (20.029 ± 0.009) кГц ; 0.98 ; 18
# в) Результаты, полученные косвенным путем, более точные, чем полученные путем прямых измерений (для интервальной оценки).
# 4. Оценка величины добротности резонансного усилителя.
Q := 0.5*(F2_ср + F1_ср)/(F2_ср - F1_ср) = 38.1506  # - добротность резонансного контура
k_1 := F2_ср/(F2_ср - F1_ср)^2 = 1.93258
k_2 := -F1_ср/(F2_ср - F1_ср)^2 = -1.88258
σ_Q := sqrt(k_1^2*σ1^2 + k_2^2*σ2^2 + 2*k_1*k_2*r*σ1*σ2) = 0.0321804  # - оценка значения добротности
# Оценки результатов измерений:
# 1) Точечная.
# Q = 38.34 ; 0.03 ; 18
# 2) Интервальная.
# Для интервальной оценки погрешности требуется вычислить ширину доверительного интервала.Поскольку СКО изначально неизвестно, будем использовать распределение Стьюдента. Коэффициент Стьюдента при N=18 и P=0.99 равен 2.8982
t_ст := 2.8188
t_ст*σ_Q = 0.0907101
# Q = (38.34 ± 0.09); 0.99 ; 18
