# 1.3 Построение графиков
# Выполним описание этих функций
f(x) :=
    exp(-x) if x ≥ 0
    0 otherwise
F(x) :=
    (0.8*exp(-3*x)) if x ≥ 0
    (-0.8*exp(3*x)) if x < 0
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# Опишем эту функцию
f(fi) := 3*sqrt(2*cos(2*fi))
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# Задания к разделу
y(x) := cosh(x)
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x1(t) := cos(t)*(1 + cos(t))
y1(t) := sin(t)*(1 + cos(t))
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