L := 2.9*10^-3
C := 2700*10^-12
Z_в := sqrt(L/C) = 1036.38
f_1 := 10*10^3
β_1(f) := -atan(2*π*f*sqrt(L*C))
β_1(f_1)/deg = -9.97166
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# для одной ячейки
τ := sqrt(L*C) = 2.79821e-6  # c
# для 20 ячеек
τ := 20*sqrt(L*C) = 5.59643e-5  # c
f_2 := 0.7*f_1 = 7000
f_3 := 1.3*f_1 = 13000
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c := 3*10^8
l := c*20*sqrt(L*C)
U_вх(t) := 2*cos(2*π*f_1*t)
U_вых(t) := 2*cos(2*π*f_1*t - 20*β_1(f_1)*l)
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