U_min := [0.05; 0.1; 0.1; 0.2; 0.2; 0.2; 0.2]
U_max := [1.85; 1.8; 1.9; 1.85; 1.8; 1.85; 1.85]
Q := 10.8
fr := 46.49
U_min1 := [0.55; 0.5; 0.45; 0.4; 0.4; 0.25; 0.23; 0.2; 0.2; 0.15; 0.25; 0.15; 0.05]
U_max1 := [0.85; 0.9; 0.9; 0.95; 1; 0.75; 0.8; 0.85; 0.85; 0.85; 1.15; 1.2; 1.3]
f1 := [9; 8; 7; 6; 5; 4.8; 4.6; 4.4; 4.2; 4; 3; 2; 1]
M := (U_max - U_min)/(U_max + U_min)
M = [0.947368; 0.894737; 0.9; 0.804878; 0.8; 0.804878; 0.804878]
f := [4.6; 4.8; 5; 6; 7; 9; 10]
M2(x) := 1/sqrt(1 + (2*Q*x/fr)^2)
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M1 := (U_max1 - U_min1)/(U_max1 + U_min1)
M1 = [0.214286; 0.285714; 0.333333; 0.407407; 0.428571; 0.5; 0.553398; 0.619048; 0.619048; 0.7; 0.642857; 0.777778; 0.925926]
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M := □  # error: Пустой местозаполнитель.
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