Um := 0.6
U0 := 0.6
Tи := 0.6*10^-2
T := 3*10^-2
Ti := 0.6*10^-2
ω0 := 120*π*2/Tи
Tp := 3*10^-2
j := sqrt(-1)
w0 := 120*2*π/Ti
sv(t) := Um*Φ(t) - 2*Um/(3*Tи)*t*Φ(t) + 2*Um/(3*Tи)*(t - Tи)*Φ(t - Tи) - Um/3*Φ(t - Tи)
w0g := w0/10
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srg(t) := sv(t)*cos(w0g*t)
srg2(t) := srg(t) + srg(t - Tp)
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Ω := 2*π/Tp = 209.44
10*Ω = 2094.4
Sk(ω) := Um - 2*Um/3*sin(ω*Tи/2)/(ω*Tи/2)*exp(-1i*ω*Tи/2) - Um/3*exp(-1i*ω*Tи)
Sv(ω) := Sk(ω)/(1i*ω)
hts := integral(sv(t), t = 0 .. Tи) = 0.0024
S(ω) :=
    hts if ω == 0
    |Sv(ω)| otherwise
|Sv(1)| = 0.0024
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n := 0 .. 100
Cv(n) := 2/T*Sv(n*2*π/T)
A0 := 2/T*integral(sv(t), t = 0 .. Tи) = 0.16
A(n) :=
    A0/2 if n == 0
    |Cv(n)| otherwise
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w0 = 125664
Sr(ω) := Sv(ω - ω0)/2 + conj(Sv(ω + ω0))/2
|Sr(1.5*w0)| = 2.54648e-6
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w0/Ω = 600
Cr(n) :=
    2/Tp*|Sr(n*Ω)| if n ≠ 600
    0.12 otherwise
n := 0 .. 1000
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n := 1000
i := 0 .. n
# Часть 2
U0 := 0.9
Kp := 5
Q := 60
Ti := 3*10^-2
Tp := 15*10^-2
w0 := 120*2*π/Ti
sv(t) := Um*Φ(t) - 2*Um/(3*Tи)*t*Φ(t) + 2*Um/(3*Tи)*(t - Tи)*Φ(t - Tи) - Um/3*Φ(t - Tи)
w0g := w0/10
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srg(t) := sv(t)*cos(w0g*t)
srg2(t) := srg(t) + srg(t - Tp)
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a := w0/(2*Q) = 209.44
K(p) := Kp*a/(p + a)
p := 1i*w0
s_v(p) := U0/(3*p) + 2*U0/(3*Ti)*1/p^2 - 2*U0/(3*Ti)*1/p^2*exp(-p*Ti) - U0/p*exp(-p*Ti)
Ue(t) := Kp*U0*(1/3*(1 - exp(-a*t))*Φ(t) + 2/(3*a*Ti)*(a*t - (1 - exp(-a*t)))*Φ(t) - 2/(3*Ti*a)*(a*(t - Ti) - (1 - exp(-a*(t - Ti))))*Φ(t - Ti) + 0 - 1*(1 - exp(-a*(t - Ti)))*Φ(t - Ti))
Ue2(t) := Ue(t)
Ue3(t) := Re(Ue(t)*exp(1i*w0*t))
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erg(t) := Ue(t)*cos(w0g*t)
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srg2(t) := srg(t) + srg(t - Tp)
erg2(t) := erg(t) + erg(t - Tp)
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Sve2(w) := Kp*a/(a + 1i*w)*(U0/(3*1i*w) - 2*U0/(3*Ti)*1/w^2 + 2*U0/(3*Ti)*1/w^2*exp(-1i*w*Ti) - U0/(1i*w)*exp(-1i*w*Ti))
hts := integral(sv(t), t = 0 .. Ti) = 0.00240053
htse2 := integral(Sve2(t), t = 0.000001 .. Ti) = 0.00269991 - 9.02123e-7i
S(w) :=
    hts if w == 0
    |Sv(w)| otherwise
Se2(w) :=
    htse2 if w == 0
    |Sve2(w)| otherwise
|Sv(1)| = 0.0024
|Sve2(1)| = 0.0899959
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Sr(w) := Sv(w - w0)/2 + conj(Sv(w + w0))/2
Sre2(w) := Sve2(w - w0)/2 + conj(Sve2(w + w0))/2
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|Sr(1.5*w0)| = 1.27324e-5
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Cr2(n) :=
    2/Tp*|Sre2(n*Ω)| if n ≠ 600
    0.6 otherwise
w0/Ω = 120
Cr(n) :=
    2/Tp*|Sr(n*Ω)| if n ≠ 500
    0.12 otherwise
w0/Ω = 120
n := 0 .. 1000
n := 0 .. 1000
htse2/2 = 0.00134996 - 4.51062e-7i
htse2 := integral(Sve2(t), t = 0 .. Ti) = 0.0027 - 9.02123e-7i
2/Tp*|htse2/2| = 0.018
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