ε_0 := 1/(36*π)*10^-9
ε := 3
a := 72*10^-3
μ := 1.2
μ_0 := 4*π*10^-7
b := 34*10^-3
c := 3*10^8
P_0 := 700*10^-3
σ_м := 5.7*10^7
m := 2
n := 2
# Задание №1,2,3
g := sqrt((2*π/a)^2 + (2*π/b)^2)
g_сос := sqrt((3*π/a)^2 + (2*π/b)^2)
f_кр := g*c/(2*π) = 9.75786e9
f_кр_ср := g*c/(2*π*sqrt(μ*ε)) = 5.14284e9
f_кр_сос := g_сос*c/(2*π) = 1.08128e10
f_кр_сос_ср := g_сос*c/(2*π*sqrt(μ*ε)) = 5.69886e9
h(f) := sqrt((2*π*f)^2/c^2 - g^2)
h_ср(f) := sqrt((2*π*f)^2/c^2*(μ*ε) - g^2)
λ_в(f) := 2*π/h(f)
λ_в_ср(f) := 2*π/h_ср(f)
v_ф(f) := λ_в(f)*f
v_ф_ср(f) := λ_в_ср(f)*f
h_пот_мет(f) := sqrt(μ_0*2*π*f/(2*σ_м))*sqrt(ε_0/μ_0)*2/sqrt(1 - (f_кр/f)^2)*((m^2*(b/a)^3 + n^2)/(m^2*(b/a)^2 + n^2))
h_пот_мет_ср(f) := sqrt(μ_0*2*π*f/(2*σ_м))*sqrt(ε_0/μ_0)*sqrt(ε/μ)*2/sqrt(1 - (f_кр_ср/f)^2)*((m^2*(b/a)^3 + n^2)/(m^2*(b/a)^2 + n^2))
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# Задание №4
f_0 := 1.4*f_кр = 1.3661e10
h_1 := sqrt((2*π*f_0)^2/c^2 - g^2) = 200.239
C_1 := sqrt((P_0*g^4*b)/(2*π*h_1*π^2*a*ε_0*f_0)) = 620.039
H_x_max := 2*π*f_0*ε_0/g^2*C_1*2*π/b = 2.08211
H_y_max := 2*π*f_0*ε_0/g^2*C_1*2*π/a = 0.983219
Е_z_max := C_1 = 620.039
Е_x_max := h(f_0)/g^2*C_1*2*π/a = 259.411
Е_y_max := h(f_0)/g^2*C_1*2*π/b = 549.342
