ε_0 := 1/(36*π)*10^-9
ε := 1.8
a := 12*10^-3
μ := 1.1
μ_0 := 4*π*10^-7
b := 8*10^-3
c := 3*10^8
P_0 := 600*10^-3
σ_м := 5.7*10^7
m := 1
n := 1
# Задание №1,2,3
g := sqrt((1/a)^2 + (1/b)^2) = 150.231
g_сос := sqrt((2/a)^2 + (1/b)^2) = 208.333
f_кр := g*c/2 = 2.25347e10
f_кр_ср := g*c/(2*sqrt(μ*ε)) = 1.60147e10
c/(2*a*sqrt(ε*μ)) = 8.88336e9
f_кр_сос := g_сос*c/2 = 3.125e10
f_кр_сос_ср := g_сос*c/(2*sqrt(μ*ε)) = 2.22084e10
h(f) := sqrt((2*π*f)^2/c^2 - g^2)
h_ср(f) := sqrt((2*π*f)^2/c^2*(μ*ε) - g^2)
λ_в(f) := 2*π/h(f)
λ_в_ср(f) := 2*π/h_ср(f)
v_ф(f) := λ_в(f)*f
v_ф_ср(f) := λ_в_ср(f)*f
h_пот_мет(f) := sqrt(μ_0*2*π*f/(2*σ_м))*sqrt(ε_0/μ_0)*2/sqrt(1 - (f_кр/f)^2)*((1 + b/a)*(f_кр/f)^2 + (1 - (f_кр/f)^2)*b*((b*m^2/a) + n^2)/(a*((b^2*m^2/a^2) + n^2)))
h_пот_мет_ср(f) := sqrt(μ_0*2*π*f/(2*σ_м))*sqrt(ε_0/μ_0)*sqrt(ε/μ)*2/sqrt(1 - (f_кр_ср/f)^2)*((1 + b/a)*(f_кр_ср/f)^2 + (1 - (f_кр_ср/f)^2)*b*((b*m^2/a) + n^2)/(a*((b^2*m^2/a^2) + n^2)))
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# Задание №4
f_0 := 1.4*f_кр = 3.15486e10
h_1 := sqrt((2*π*f_0)^2/c^2 - g^2) = 643.447
C_1 := sqrt(4*(P_0*g^4*b)/(2*π*f_0*ε_0*h_1*π^2*a)) = 270.596
H_x_max := 2*π*f_0*ε_0/g^2*C_1*2*π/b = 16.5043
H_y_max := 2*π*f_0*ε_0/g^2*C_1*2*π/a = 11.0029
Е_z_max := C_1 = 270.596
Е_x_max := h(f_0)/g^2*C_1*2*π/a = 4039.35
Е_y_max := h(f_0)/g^2*C_1*2*π/b = 6059.02
