Um := 0.6
Tи := 3*10^-2
T := 15*10^-2
j := sqrt(-1)
ω0 := 120*π*2/Tи
Ω := 2*π/T
S1(ω) := (-2/3*Um*e^(-j*ω*Tи) - Um/3 + Um*sin(ω*Tи/2)/(ω*Tи/2)*e^(-j*ω*Tи/2))/(j*ω)
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A1(ω) := 2/T*S1(ω)
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Ω := 2*π/T
S2(ω) := (-2/3*Um*e^(-j*(ω - ω0)*Tи) - Um/3 + Um*sin(((ω - ω0)*Tи)/2)/((ω - ω0)*Tи/2)*e^(-j*(ω - ω0)*Tи/2))/(j*(ω - ω0))/2 + (-2/3*Um*e^(j*(ω + ω0)*Tи) - Um/3 + Um*sin((ω + ω0)*Tи/2)/((ω + ω0)*Tи/2)*e^(j*(ω + ω0)*Tи/2))/(j*(ω + ω0))/2
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σ(t) :=
    0 if t < 0
    1/2 if t == 0
    1 if t > 0
U1(t) :=
    -Um/3*σ(t) + Um*t*σ(t)/Tи - Um/Tи*(t - Tи)*σ(t - Tи) - 2/3*Um*σ(t - Tи) if |t| ≤ Tи
    0 if |t| > Tи
U(t) := -Um/3*σ(t) + Um*t*σ(t)/Tи - Um/Tи*(t - Tи)*σ(t - Tи) - 2/3*Um*σ(t - Tи)
S5(t) := U(t)*cos(ω0/10*t)
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T := 15*10^-2
S6(t) := (S5(t)*σ(t) + S5(t - Tи)*σ(t - T) + S5(t - 2*Tи))
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Ω := 2*π/T
S22(ω) := S2(ω) + S2(ω - ω0) + S2(ω - 2*ω0)
n := 0 .. 1000
С(n) := 1/T*S22(n*Ω - ω0)
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n := -100 .. 1000
S11(ω) := S1(ω) + S1(ω - ω0)
A11(ω) := 2/T*S11(ω)
C1(n) := 1/T*S11(n*Ω)
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