U := 0.6
T_i := 0.6*10^-2
T_p := 3*10^-2
w_0 := 120*2*π/T_i = 125664
n := 2*π/T_p, 4*π/T_p .. 10000*2*π/T_p
s_v(t) := U*Φ(t) - 2*U/(3*T_i)*t*Φ(t) + 2*U/(3*T_i)*(t - T_i)*Φ(t - T_i) - U/3*Φ(t - T_i)
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w_1 := w_0/10
s_r(t) := (U*Φ(t) - 2*U/(3*T_i)*t*Φ(t) + 2*U/(3*T_i)*(t - T_i)*Φ(t - T_i) - U/3*Φ(t - T_i))*cos(w_1*t)
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s_vn(t) := sum(s_v(t - n*T_p), n = 0 .. 2)
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s_rn(t) := sum(s_r(t - n*T_p), n = 0 .. 2)
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S_v(w) := U/(1i*w)*(1 - 2/3*sin(w*T_i/2)/(w*T_i/2)*e^(-1i*w*T_i/2) - e^(-1i*w*T_i)*1/3)
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U/2*T_i/2 + U/2*T_i/4 = 0.00135
C_nv(n) := 1/T_p*(U/(1i*n*2*π)*(1 - e^(-1i*n*π*T_i/T_p) + sin(n*π*T_i/(2*T_p))/(n*π*T_i/(2*T_p))*e^(-1i*(n*3*π*T_i/(2*T_p))) - e^(-1i*(n*2*π*T_i/T_p))))
k := 0.00000001
C_nv(n) := 2/T_p*(U/(1i*n)*(1/2 - sin(n*T_i/4)/(n*T_i/4)*e^(-1i*n*3*T_i/4) + e^(-1i*n*T_i)/2))
C_nv1(k) := 1/T_p*(U/(1i*k)*(1/2 - sin(k*T_i/4)/(k*T_i/4)*e^(-1i*k*3*T_i/4) + e^(-1i*k*T_i)/2))
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S_r(w) := U/(1i*2*(w - w_0))*(1 - 2/3*sin((w - w_0)*T_i/2)/((w - w_0)*T_i/2)*e^(-1i*(w - w_0)*T_i/2) - e^(-1i*(w - w_0)*T_i)*1/3) + U/(-1i*2*(w + w_0))*(1 - 2/3*sin((w + w_0)*T_i/2)/((w + w_0)*T_i/2)*e^(1i*(w + w_0)*T_i/2) - e^(1i*(w + w_0)*T_i)*1/3)
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w_0 = 125664
С_np(n) := 1/T_p*U/(1i*(n - w_0))*(1/2 - sin((n - w_0)*T_i/4)/((n - w_0)*T_i/4)*e^(-1i*(n - w_0)*3*T_i/4) + e^(-1i*(n - w_0)*T_i)/2) + 1/T_p*U/(1i*(n + w_0))*(1/2 - sin((n + w_0)*T_i/4)/((n + w_0)*T_i/4)*e^(-1i*(n + w_0)*3*T_i/4) + e^(-1i*(n + w_0)*T_i)/2)
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K_p := 2
Q := 60
Δw := w_0/(2*Q) = 1047.2
w_0 = 125664
S_ue(w) := K_p*Δw/(Δw + 1i*w)*S_v(w)
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S_e(w) := K_p/(1 + 1i*(w - w_0)/Δw)*S_r(w)
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C_ne(n) := K_p/(1 + 1i*(n - w_0)/Δw)*С_np(n)
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w_0 = 125664
U = 0.6
T_i = 0.006
U_e(t) := K_p*U/2*(1 - e^(-Δw*t))*Φ(t) - 2*K_p*U/(T_i*Δw)*(Δw*(t - T_i/2) - (1 - e^(-Δw*(t - T_i/2))))*Φ(t - T_i/2) + 2*K_p*U/(T_i*Δw)*(Δw*(t - T_i) - (1 - e^(-Δw*(t - T_i))))*Φ(t - T_i) + K_p*U/2*(1 - e^(-Δw*(t - T_i)))*Φ(t - T_i)
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U_e(T_i/2) = 0.574072
e_p(t) := U_e(t)*cos(w_0/10*t)
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e_rn(t) := sum(e_p(t - n*T_p), n = 0 .. 2)
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