# Исходные данные:
E_п := 12  # В  # - напряжение питания усилителя.
U_пульс := 1.5*10^-3  # В
ΔE_п/Е_п == "+- 0,02"  # - относительная нестабильность напряжения питания.
I_y1 := 8*10^-3  # А
U_пульс == 1.5  # мВ  # - допустимая амплитуда пульсации напряжения питания.
I_y := 100*10^-3  # А
100*10^-3 = 0.1
I_y == 100  # мА  # - ток, потребляемый усилителем от источника питания.
U_г := 1*10^-3  # В
I_y1 == 8  # мА  # - ток, потребляемый 1-м каскадом усилителя.
# Тип транзистора в 1-м каскаде усилителя - КТ325.
R_г := 3*10^3  # Ом
U_г == 1  # мВ  # - амплитуда напряжения генератора сигнала.
f_н := 6*10^3  # Гц
R_г == 3  # кОм  # - выходное сопротивление генератора сигнала.
R_вх := 3*10^3  # Ом
f_н == 6  # кГц  # - нижняя граничная частота полосы усиления.
δE_п := 0.02
R_вх == 3  # кОм  # - входное сопротивление 2-го каскада усилителя.
f_c := 50  # Гц  # - частота напряжения сети.
δU_c := 0.2
ΔE_п := 0.02*E_п
ΔU_c/U_c == "+- 20"  # %  # - относительная нестабильность напряжения сети.
# Часть 1. Расчет стабилизатора напряжения.
# С целью увеличения коэффициента стабилизации будем использовать схему стабилизатора напряжения с эмиттерным повторителем
# 1. Выбираем транзистор
# Эквивалентная схема стабилизатора:
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# Для кремниевых транзисторов
U_бэ := 0.6  # В
β := 80
# Эквивалентное сопротивление нагрузки:
R_эн := E_п/I_y
R_эн = 120  # Ом
# Напряжение, которое должно быть подано на базу транзистора:
U_б := E_п + U_бэ
U_б = 12.6  # В
# При работе биполярного транзистора в активной области ток базы:
I_б := I_y/(1 + β)
# β - минимальное значение усиления по току в схеме с общим эмиттером.
# Выбираем транзистор с достаточно большим коэффициентом усиления по току.
β := 80
I_б = 0.00123457  # А
U_кэ ≥ U_кэ.мин  # - транзистор работает в активной области
U_кэ.мин := 2  # В
R_б := U_б/I_б
R_б == R_б1 + R_б2
# Полное сопротивление нагрузки стабилитрона:
R_нс := R_б*(U_б/I_б)/(R_б + U_б/I_б)
R_нс = 5103  # Ом
# 2. | Выбираем стабилитрон:
# Он должен удовлетворять условию
U_ст.мин := E_п + U_бэ
U_ст.мин = 12.6  # В
# Эквивалентная схема диодного стабилизатора:
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# Выбран стабилитрон КС213Б, с параметрами:
U_ст.min := 12.1  # В
U_ст.макс := 13.9  # В
I_ст.мин := 3*10^-3  # А
I_ст.макс := 10*10^-3  # А
r_диф := 25  # Ом
P := 0.15  # Вт  # - максимальная рассеиваемая мощность
# Если выбрать сопротивление потерциометра Rб1 так, что
R_б1 := R_б*(U_ст.макс - U_ст.min)/U_ст.макс = 1321.64  # Ом
# то регулировкой потенциометра можно установить требуемое значение выходного напряжения Eп при любом допустимом значении рабочего напряжения стабилитрона.
R_б2 := R_б - R_б1
R_б2 = 8884.36  # Ом
3.
# Расчитываем сопротивление стабилизации и среднее значение напряжения на выходе стабилизатора.
# Относительная нестабильность выходного напряжения выпрямителя равна относительной нестабильности амплитуды напряжения сети, т. е.
δUв := δU_c
δUв = 0.2
# Начинаем с выбора области, где рабочая точка стабилитрона будет находиться при всех допустимых значениях напряжения на входе стабилизатора.Находим диапазон рабочих токов через стабилитрон:
U_Rc == U_в - U_ст  # где
U_Rc == I_Rc*R_с
# Так как ток через через сопротивление Rc будет мин. при макс. напряжениеи на стабилитроне и мин. его токе, и наоборот,то получаем:
I_Rc.min := I_ст.мин + U_ст.макс/R_нс
I_Rc.min = 0.00572389  # А
I_Rc.max := I_ст.макс + U_ст.min/R_нс
I_Rc.max = 0.0123712  # А
# Максимальный ток через Rс протекает при наибольшем значении входного напряжения и наименьшем допустимом значении напряжения на стабилитроне, а минимальный  при наименьшем значении входного напряжения и наибольшем допустимом напряжении стабилитрона:
U_в*(1 - δUв) == R_c*I_Rc.min + U_ст.макс
U_в*(1 + δUв) == R_c*I_Rc.max + U_ст.min
γ := (1 - δUв)/(1 + δUв)
R_c := (U_ст.макс - γ*U_ст.min)/(γ*I_Rc.max - I_Rc.min)  # где
γ = 0.666667
R_c = 2311.56  # Ом
Uв := (R_c*I_Rc.min + U_ст.макс)/(1 - δUв)
Uв = 33.9139  # В  # - напряжение на входе стабилизатора
# Входной ток стабилизатора и его входное сопротивление изменяются в зависимости от величины входного напряжения и параметров стабилитрона.
r_ст.ср := U_ст.min/I_ст.макс
ΔE_п = 0.24
r_ст.ср = 1210
4.
# Расчет коэффициента стабилизации и коэффициента передачи пульсаций выпрямительного напряжения.
K_ст0 := 0.2/(ΔE_п/(E_п + U_бэ)) = 10.5
K_ст := (1/r_диф + 1/R_c + 1/R_нс)/(1/r_ст.ср + 1/R_c + 1/R_нс)
K_ст = 27.9231
# где
r_ст.ср == U_ст.мин/I_ст.макс == 1.21*10^3  # Ом - среднее сопротивление стабилитрона в рабочей точке.
# Коэффициент  стабилизации  рекомендуется  оценивать  при  максимальном  значении  тока  через  стабилитрон,  где  rст. ср  и  Kст  имеют  наименьшие  значения.
# Средннее значение коэффициента стабилизации Кст.о:
K_ст0 == ΔU_c/U_c/(ΔE_п/(E_п + U_бэ))
K_ст0 = 10.5
K_ст > K_ст0  # , следовательно схема выбрана правильно.
I_Rc := 0.5*(I_Rc.max + I_Rc.min)
# Расчет коэффициента передачи пульсации Кп.
K_п := 1/R_c/(1/r_диф + 1/R_c + 1/R_нс)
K_п = 0.0106479
# Допустимая амплитуда пульсаций на выходе рассчитывается по формуле:
U_пульс.В := U_пульс/K_п
U_пульс.В = 0.140873  # В
# Формула полного тока, потребляемого входом стабилизатора:
I_вх.ст := (β/(β + 1))*I_y + I_Rc
I_вх.ст = 0.107813  # А
# где
I_Rc == 0.5*(I_Rc.max + I_Rc.min)
# Эквивалентное входное сопротивление:
R_вх.ст := Uв/I_вх.ст = 314.562  # Ом
# Мощность стабилизатора:
P_вх.ст := Uв*I_вх.ст = 3.65636  # Вт
# КПД стабилизатора:
η_ст := E_п*I_y/P_вх.ст = 0.328196
η_ст == 32.8  # %
U_КЭmin := (1 - δUв)*Uв - E_п
U_КЭmin = 15.1311  # В
# Мы выбрали схему и рассчитали параметры стабилизатора напряжения,учли что,напряжение стабилизации каждого типа стабилитрона может имет разброс порядка +-10%,и поэтому необходимо обеспечивать регулиравку выходного значения Еп.Введение стабилитрона в простой диодной схеме приводит к большим потерям мощности,поэтому мы используем усилитель тока на биполярном транзисторе и вводим цепь регулировки выходного напряжения,состоящую из патенциометра и сопротивления.При использовании этой схемы достигаются более высокие значения коэффицента стабилизации и более высокие значения КПД. При заданном коэффиценте стабилизации также были найдены постоянное напряжение Uв=33.914В,которое должно быть обеспечено на выходе выпрямителя,постоянный ток Iвх.ст=0.108А,потребляемый входом стабилизатора напряжения,и допустимый уровень пульсации на выходе выпрямителя Uпульс.в=0.141В, КПД равно 32.8%
# Часть 2. Расчет выпрямителя.
# Схема выпрямителя:
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# Исходные данные для расчета:
# Требуемое постоянное напряжение на выходе выпрямителя
U_н := Uв
U_н = 33.9139  # В
# Сопротивление нагрузки
R_н := R_вх.ст
R_н = 314.562  # Ом
# Уровень пульсаций
U_пульс.В = 0.140873  # В
# Ток через нагрузку
I_н := I_вх.ст
I_н = 0.107813  # А
# Выходная мощность
# (входная мощность стабилитрона):
P_вых := P_вх.ст = 3.65636  # Вт
# Выбор диода:
5*I_н = 0.539065
# Выбераем диод так чтобы Iдmax>>Iвых.выпр (так как в момент включения выпрямителя,  конденсатор Сн не заряжен и все входное напряжение подается на диоды, то есть угол отсечки оказывается близким к 90 градусам, а затем напряжение нанагрузки запирает диод, уменьшая импульсы через него) и Uобр>>Uвых.выпр
# Возьмем диод Д229Л, с параметрами:
# Предельное обратное напряжение:
U_обр.макс := 400  # В
# Предельный средний прямой ток:
I_ср.пр.макс == 700  # мА
I_ср.пр.макс := 700*10^-3
# Предельный импульстый прямой ток:
I_и.пр.макс := 10  # А
# Напряжение отсечки:
E_д := 0.6  # В
# Используем кусочно-линейную аппроксимацию ВАХ диода.
i_д.max == 5*I_н == 539*мА
# Крутизна:
S_д == i_д.max/E_д == 0.539/0.6 == 0.898  # А/В
0.539/0.6 = 0.898333
# В схеме для формирования импульсов тока используются не отдельные диоды, а их последовательное соединение. Следовательно, для получения ВАХ последовательных диодов нужна ВАХ двух диодов. Тогда параметры будут определяться:
S_0 := 0.898/2  # А/В
E'_д0 := 0.6*2  # = 1.2 В
β_0 := 1/(S_0*R_н*(1 + 2*E'_д0/Uв))
# 1. Коэффициенты Берга и угол отсечки θ:
β_0 == 1/(S_0*R_н*(1 + 2*E'_д0/U_н)) == 6.612*10^-3
β_0 = 0.00661229
θ := nthroot(3*β_0*π, 3)
θ == nthroot(3*β_0*π, 3) == 22.716  # градусов
# Функции Берга:
θ = 0.396468
θ = 22.7159 deg
γ_0 := (sin(θ) - θ*cos(θ))/π
γ_1 := (θ - sin(θ)*cos(θ))/π
γ_2 := 1/(2*π)*(sin(θ) - sin(3*θ)/3)
U_c := (Uв + E'_д0)/cos(θ)
γ_0 = 0.00650893
γ_1 = 0.012815
γ_2 = 0.0122199
U_пульс = 0.0015
# 2. Напряжение на вторичной обмотке трансформатора:
U_c = 38.0667
U_c == (U_B + E'_д0)/cos(θ) == 38.067  # В
I_c := S_0*U_c*γ_1
# 3. Расчет емкости Сн: | Ф
I_c = 0.219033
C_н == 2*S_0*γ_2*U_c/(2*π*f_c*2*U_пульс.В) == 4.719  # мФ
# 4. Потребляемая мощность и КПД выпрямителя.
C := 2*S_0*γ_2*U_c/(2*π*f_c*2*U_пульс.В) = 0.00471935
P_1 := S_0*U_c^2*γ_1
P_1 = 8.33787  # Вт
ω := 2*π*f_c
η := P_вых/P_1
η = 0.438524
η == 43.9 %
# 5. Проверка выпрямителя.
# Для надежной работы выпрямителя должно выполняться неравенство iд max<Iд имп
# Максимальный то к можно по формуле:
i_д.max := S_0*U_c*(1 - cos(θ))
i_д.max = 1.32581  # А
# Для выбранного диода предельный импульсный прямой ток - 10А, неравенство  выполняется.
U_обр := 2*(U_н + U_c)
U_обр = 143.961
143.961*B < 400*B
# Видно максимальные токи и напряжения меньше допустимых для данного диода, следовательно  он подходит для данной схемы.
T == 1/f_c == 0.02*c
T == 2*π
θ == 0.396
θ := 0.02*0.396/(2*π) = 0.00126051  # с
θ == 1.261*мс
# При расчете использовалась мостовая схема диодного выпрямителя. Были найдены амплитуда переменного напряжения Uc=38 В  на вторичной обмотке сетевого трансформатора,  амплитуда потребляемого от сети переменного тока Iдмах=1.326 А и потребляемая мощность P=8.3 Вт, кпд равен 44 %. КПД показывает отношение мощности выпрямителя к мощности потребляемой на обмотке трансформатора, в нашем случае мощность теряется в половину.
