ε_0 := 10^-9/(36*π)
μ_0 := 4*π*10^-7
c := 3*10^8
Z_0 := 120*π
j := sqrt(-1)
# Исходные данные:
ε := 40
μ := 3
f_1 := 0.004*10^9
φ_Hy := -60
tgδ1 := 4.496
σ := f_1*(2*π*ε*ε_0*tgδ1) = 0.0399644
tgδ2 := 0.06
f_2 := σ/(2*π*ε*ε_0*tgδ2) = 299733333
tgδ3 := 0.02
f_3 := σ/(2*π*ε*ε_0*tgδ3) = 899200000
tgδ4 := 50
f_4 := σ/(2*π*ε*ε_0*tgδ4) = 359680
f_5 := sqrt(f_1*f_2) = 34625617
tgδ5 := σ/(2*π*ε*ε_0*f_5) = 0.519384
# Расчет по полным формулам:
β_точн.(f) := 2*π*f/c*sqrt(μ*ε)*sqrt(1/2 + 1/2*sqrt(1 + (σ/(2*π*f*ε*ε_0))^2))  # — коэффициент фазы
α_точн.(f) := 2*π*f/c*sqrt(μ*ε)*sqrt(-1/2 + 1/2*sqrt(1 + (σ/(2*π*f*ε*ε_0))^2))  # — коэффициент ослабления
λ_точн.(f) := 2*π/β_точн.(f)  # — длина волны
V_точн.(f) := 2*π*f/β_точн.(f)  # — фазовая скорость
# Расчет по приближенным формулам для сред с малыми потерями:
β_м.п.(f) := 2*π*f/c*sqrt(μ*ε)  # — коэффициент фазы
α_м.п.(f) := σ/2*Z_0*sqrt(μ/ε)  # — коэффициент ослабления
λ_м.п.(f) := c/(f*sqrt(ε*μ))  # — длина волны
V_м.п.(f) := c/sqrt(μ*ε)  # — фазовая скорость
# Расчет по приближенным формулам для магнитодиэлектрических сред без потерь:
β_х.п.(f) := sqrt(2*π*f*μ*μ_0*σ/2)  # — коэффициент фазы
α_х.п.(f) := sqrt(2*π*f*μ*μ_0*σ/2)  # — коэффициент ослабления
λ_х.п.(f) := 2*π*sqrt(2/(2*π*f*μ*μ_0*σ))  # — длина волны
V_х.п.(f) := sqrt((4*π*f)/(μ*μ_0*σ))  # — фазовая скорость
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f_1 = 4000000
f_2 = 299733333
β_точн.(f_1) = 1.53644
β_точн.(f_2) = 68.7986
β_точн.(f_5) = 8.19217
α_точн.(f_1) = 1.23225
α_точн.(f_2) = 2.0621
α_точн.(f_5) = 2.00057
λ_точн.(f_1) = 4.08944
λ_точн.(f_2) = 0.0913273
λ_точн.(f_5) = 0.766975
tg(f) := σ/(2*π*f*ε*ε_0)
δ(f) := atan(tg(f))
Z_c(f) := Z_0*sqrt(μ/ε)*(1 + tg(f)^2)^(-1/4)*exp(j*δ(f)/2)
arg(Z_c(f_1))*180/π = 38.7302
|Z_c(f_1)| = 48.1068
|Z_c(f_2)| = 103.151
arg(Z_c(f_2))*180/π = 1.71682
|Z_c(f_5)| = 97.2593
arg(Z_c(f_5))*180/π = 13.7233
e11(x) := 0.014*e^(-1.232*x)
e22(x) := -0.014*e^(-1.232*x)
t := 0
e1(x) := 0.672*e^(-1.232*x)
e2(x) := -0.672*e^(-1.232*x)
E_z1(x) := -0.672*e^(-1.232*x)*cos(2*π*4*10^6*t - 1.536*x + 0.78 - 0.5)
H_y1(x) := 0.014*e^(-1.232*x)*cos(2*π*4*10^6*t - 1.536*x - 0.5)
П_ср1(x) := 3.661*10^-3*e^(-2.464*x)
e121(x) := 6.515*10^-3*e^(-2.062*x)
e212(x) := -6.515*10^-3*e^(-2.062*x)
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e12(x) := -0.672*e^(-2.062*x)
e21(x) := 0.672*e^(-2.062*x)
E_z2(x) := -0.672*e^(-2.062*x)*cos(2*π*3*10^8*t - 68.86*x + 0.99 - 0.5)
H_y2(x) := 6.515*10^-3*e^(-2.062*x)*cos(2*π*3*10^8*t - 68.86*x - 0.5)
П_ср2(x) := 2.167*10^-3*e^(-4.124*x)
e131(x) := 6.909*10^-3*e^(-2*x)
e313(x) := -6.909*10^-3*e^(-2*x)
e13(x) := -0.672*e^(-2*x)
e31(x) := 0.672*e^(-2*x)
E_z3(x) := -0.672*e^(-2*x)*cos(2*π*3.463*10^7*t - 8.192*x + 0.9714 - 0.5)
H_y3(x) := 6.909*10^-3*e^(-2*x)*cos(2*π*3.463*10^7*t - 8.192*x - 0.5)
П_ср3(x) := 2.255*10^-3*e^(-4*x)
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