U0 := 0.6
Ti := 0.6*10^-2
Tp := 3*10^-2
w0 := 120*2*π/Ti = 125664
sv(t) := U0*Φ(t) - 2*U0/(3*Ti)*t*Φ(t) + 2*U0/(3*Ti)*(t - Ti)*Φ(t - Ti) - U0/3*Φ(t - Ti)
w0g := w0/10
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srg(t) := sv(t)*cos(w0g*t)
srg2(t) := srg(t) + srg(t - Tp)
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Ω := 2*π/Tp = 209.44
10*Ω = 2094.4
Sk(w) := U0 - U0*2/3*sin(w*Ti/2)/(w*Ti/2)*exp(-1i*w*Ti/2) - U0/3*exp(-1i*w*Ti)
Sv(w) := Sk(w)/(1i*w)
hts := integral(sv(t), t = 0 .. Ti) = 0.0024
S(w) :=
    hts if w == 0
    |Sv(w)| otherwise
|Sv(1)| = 0.0024
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n := 0 .. 100
Cv(n) := 2/Tp*Sv(n*2*π/Tp)
A0 := 2/Tp*integral(sv(t), t = 0 .. Ti) = 0.16
S2(n) :=
    A0/2 if n == 0
    |Cv(n)| otherwise
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Sr(w) := Sv(w - w0)/2 + conj(Sv(w + w0))/2
|Sr(1.5*w0)| = 2.54648e-6
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w0/Ω = 600
Cr(n) :=
    2/Tp*|Sr(n*Ω)| if n ≠ 600
    0.08 otherwise
n := 0 .. 1000
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n := 1000
i := 0 .. n
# Часть 2
U0 := 0.6
Kp := 2
Q := 60
Ti := 0.6*10^-2
Tp := 3*10^-2
w0 := 120*2*π/Ti = 125664
sv(t) := U0*Φ(t) - 2*U0*Φ(t)*t/(3*Ti) + 2*U0/(3*Ti)*(t - Ti)*Φ(t - Ti) - U0/3*Φ(t - Ti)
w0g := w0/10
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srg(t) := sv(t)*cos(w0g*t)
srg2(t) := srg(t) + srg(t - Tp)
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a := w0/(2*Q) = 1047.2
K(p) := Kp*a/(p + a)
p := 1i*w0
s_v(p) := U0/p - 2*U0/(3*Ti)*1/p^2 + 2*U0/(3*Ti)*1/p^2*exp(-p*Ti) - U0/(3*p)*exp(-p*Ti)
Ue(t) := Kp*U0*(1*(1 - exp(-a*t))*Φ(t) - 2/(3*a*Ti)*(a*t - (1 - exp(-a*t)))*Φ(t) + 2/(3*Ti*a)*(a*(t - Ti) - (1 - exp(-a*(t - Ti))))*Φ(t - Ti) + 0 - 1/3*(1 - exp(-a*(t - Ti)))*Φ(t - Ti))
Ue2(t) := Ue(t)
Ue3(t) := Re(Ue(t)*exp(1i*w0*t))
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erg(t) := Ue(t)*cos(w0g*t)
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srg2(t) := srg(t) + srg(t - Tp)
erg2(t) := erg(t) + erg(t - Tp)
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Sve2(w) := Kp*a/(a + 1i*w)*(U0/(1i*w) + 2*U0/(3*Ti)*1/w^2 - 2*U0/(3*Ti)*1/w^2*exp(-1i*w*Ti) - U0/(3*1i*w)*exp(-1i*w*Ti))
hts := integral(sv(t), t = 0 .. Ti) = 0.0024
htse2 := integral(Sve2(t), t = 0.000001 .. Ti) = 2.87957e-5 - 2.98506e-10i
S(w) :=
    hts if w == 0
    |Sv(w)| otherwise
Se2(w) :=
    htse2 if w == 0
    |Sve2(w)| otherwise
|Sv(1)| = 0.0024
|Sve2(1)| = 0.00479999
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Sr(w) := Sv(w - w0)/2 + conj(Sv(w + w0))/2
Sre2(w) := Sve2(w - w0)/2 + conj(Sve2(w + w0))/2
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|Sr(1.5*w0)| = 2.54648e-6
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w0/Ω = 600
Cr(n) :=
    2/Tp*|Sr(n*Ω)| if n ≠ 500
    0.12 otherwise
Cr2(n) :=
    2/Tp*|Sre2(n*Ω)| if n ≠ 600
    0.16 otherwise
w0/Ω = 600
n := 0 .. 1000
n := 0 .. 1000
htse2 := integral(Sve2(t), t = 0.00001 .. Ti) = 2.87514e-5 - 2.98505e-10i
htse2/2 = 1.43757e-5 - 1.49253e-10i
2/Tp*|htse2/2| = 0.000958379
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