z := [
    0, 6;
    5, 11;
    10, 15;
    15, 24;
    20, 26;
    25, 30;
    30, 24;
    35, 11;
    40, 24;
    45, 56;
    50, 77;
    55, 30;
    60, 14;
    65, 70;
    70, 93;
    75, 14;
    80, 24;
    85, 92;
    90, 12
]
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x := [
    0, 6;
    5, 9;
    10, 12;
    15, 14;
    20, 16;
    25, 21;
    30, 30;
    35, 26;
    40, 20;
    45, 32;
    50, 58;
    55, 45;
    60, 26;
    65, 70;
    70, 66;
    75, 27;
    80, 58;
    85, 74;
    90, 15
]
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z1 := [30, 73; 32, 56; 34, 59; 36, 39; 38, 52; 40, 30; 42, 45; 44, 26; 46, 33; 48, 27; 50, 18]
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x1 := [30, 49; 32, 39; 34, 42; 36, 29; 38, 37; 40, 21; 42, 25; 44, 21; 46, 27; 48, 21; 50, 16]
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