N := 16
c := 3*10^8
f1 := 2570*10^6
f2 := 2620*10^6
h1 := 10 + 5*log(N) = 16.0206
P1 := 5 + (N - 1)*2 = 35
G1 := 10 + (16 - 1) = 25
r := (1 + 3*log(16))*1000 = 4612.36
D := 10^(G1/10) = 316.228
λ1 := c/f1
λ2 := c/f2
λ1 = 0.116732
λ2 = 0.114504
P2(R[n], λ1)/P2(r, λ1)
P2(R, λ0) := P1*D^2*λ0^2/(4*π*R)^2
P2(r, λ1) = 1.41964e-5
P2(r, λ2) = 1.36597e-5
n := 0, 1 .. 200
R[n] := sqrt(r^2 + (3*n - h1)^2)
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E(h) := sqrt(60*P1*D)/sqrt(r^2 + (h - h1)^2)
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ε := 2.6
2.
Θ(h) := atan(r*(1 - 1/(1 + h/h1))/h)
Rв(h) := |(ε*cos(Θ(h)) - sqrt(ε - sin(Θ(h))^2))/(ε*cos(Θ(h)) + sqrt(ε - sin(Θ(h))^2))|
E2(h, λ0) := sqrt(60*P1*D)/sqrt(r^2 + (h - h1)^2)*sqrt(1 + Rв(h)^2 + 2*Rв(h)*cos(4*π*h1/λ0*cos(Θ(h))))*sin(Θ(h))
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