# zadanie 5
R := 10^3
C := 10^-6
N := 3
B := N*10^3 = 3000
T := 0.0005
alfa := (R*C)^-1 = 1000
f(t) := 10*(1 - exp(-alfa*t))
Uc(t) := Φ(t)*f(t) - Φ(t - T)*f(t - T)
e(t) := Φ(t)*{
    exp(-B*t) if t ≤ T
    0 if t > T
}
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E(p) := 1/(p + alfa)^2
T1 := 0.0005
e1(t) := exp(-B*t)*Φ(t) - exp(-B*t)*Φ(t - T1)
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