# Типовой расчет по Программным средствам моделирования
# Вариант 3
# Жеребин В.Р. ЭР-15-15
#
# Задание 5. В таблице приведены результаты измерения количества тепла, которое надо сообщить 1 кг железа для нагревание его от температуры 0оС до температуры Т,оС,
# Подберите эмпирическую формулу, описывающую экспериментальные результаты. Определите теплоемкость алмаза как функцию температуры.
T := [0; 100; 200; 300; 400; 500; 600; 700; 800; 900]
Q := [0; 57; 153; 284; 449; 642; 862; 1106; 1370; 1652]
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Qemp(T) := dnorm(T, 0, 900)
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