U_pw := 5
R1 := 100
R2 := 1000
U := 4.57
k1 := R1/(R1 + R2) = 0.0909091
k2 := R2/(R1 + R2) = 0.909091
k3 := U/U_pw = 0.914
Udel1 := U_pw*k1 = 0.454545
Udel2 := U_pw*k2 = 4.54545
R_вх := R1*R2/(R1*(1 - k3)/k3 - R2) = -100.95
D(A) := 25*10^-6*A + 6*10*10^-6
Nizkoomniy
D(5.0001) = 0.000185002  # Ni
D(4.54) = 0.0001735
D(5.04) = 0.000186  # CM
D(4.57) = 0.00017425
Visokoomniy
D(5.0001) = 0.000185002
D(2.4) = 0.00012  # Ni
D(5.04) = 0.000186
CM
D(2.42) = 0.0001205
