# Часть 2.
# Проведено по N  измерений частот F1 и F2 на границах полосы пропускания одноконтурного резонансного усилителя  . Погрешности измерения частот распределены по Гаусовскому закону c неизвестным заранее СКО. Систематические погрешности отсутствуют .
ORIGIN := 1
Nгр := 15
Nж := 1
N := Nгр + |Nж - 11| = 25
μ_1 := (50*Nгр + Nж) = 751  # кГц
μ_2 := μ_1 + 20 = 771  # кГц
σ := 0.05  # кГц
F_1 := rnorm(N, μ_1, σ)
F_2 := rnorm(N, μ_2, σ)
F_1 = [751.027; 751.011; 751.02; 750.942; 750.945; 750.945; 750.98; 750.934; 750.858; 751.064; 751.04; 751.007; 750.95; 750.954; 750.956; 751.014; 750.98; 751.065; 750.931; 751.019; 751.022; 751.088; 750.968; 751.028; 751.077]
F_2 = [770.909; 771.065; 770.948; 771.023; 770.947; 770.938; 771.021; 770.904; 770.994; 771.021; 771.073; 770.939; 770.981; 771.024; 771.009; 771.01; 771.026; 771.041; 771.047; 771.045; 771.013; 770.965; 771.023; 770.992; 770.957]
i := [1; 2; 3; 4; 5; 6; 7; 8; 9; 10; 11; 12; 13; 14; 15; 16; 17; 18; 19; 20; 21; 22; 23]
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# 2. Оценки результатов.
# Расчет оценки частот F1ср и F2ср.
F1_ср := 1/N*sum(F_1[i], i = 1 .. N) = 750.993  # кГц
F2_ср := 1/N*sum(F_2[i], i = 1 .. N) = 770.997  # кГц
# Расчет CКО  F1 и F2.
S_F1 := sqrt(1/(N - 1)*sum((F_1[i] - F1_ср)^2, i = 1 .. N)) = 0.0549963  # кГц
S_F2 := sqrt(1/(N - 1)*sum((F_2[i] - F2_ср)^2, i = 1 .. N)) = 0.0469638  # кГц
# Оценка СКО:
σ1 := S_F1/sqrt(N) = 0.0109993  # кГц
σ2 := S_F2/sqrt(N) = 0.00939276  # кГц
# Оценки результатов измерений:
# 1) Точечная.
# F1 = 757.988 кГц ; 0.012 кГц; 18
# F2 = 778.017 кГц ; 0.011 кГц; 18
# 2) Интервальная.
# Для интервальной оценки погрешности требуется вычислить ширину доверительного интервала.Поскольку СКО изначально неизвестно, будем использовать распределение Стьюдента. Коэффициент Стьюдента при N=18 и P=0.95 равен 2.11 (в таблице указаны значения tст для f - числа степеней свободы, f=N-1)
t_ст := 2.0790
t_ст*σ1 = 0.0228675  # кГц
t_ст*σ2 = 0.0195275  # кГц
# F1 = (757.988±0.024)кГц ; 0.95 ; 18
# F2 = (778.017±0.024)кГц ; 0.95 ; 18
# Интервальная и точечная оценки:
#
# F1=757.988 кГц;  σ1= 0.012 кГц; N=18
#
# F2=778.017 кГц;  σ2=0.011  кГц; N=18
#
# F1=(757.988±0.024) кГц ; Рд=0.95;  N=18
#
# F2=(778.017±0.024) кГц ; Рд=0.95;  N=18
# Коэффициент корреляции:
r := sum((F_1[i] - F1_ср)*(F_2[i] - F2_ср)/((N - 1)*S_F1*S_F2), i = 1 .. N) = 0.0717454
r := corr(F_1, F_2) = 0.0717454
# Коэффициент корреляции не равен нулю,то есть величины коррелированы.
# 3. | a) | Выборка значений величины | Π[i]
Π := F_2 - F_1
# Что бы закон распределения был гаусовским необходимо и достаточно , равенство нулю оценочных коэффициентов ассиметри и эксцеса (Ао=0, Ео=0). Но поскольку  эти величины случайные, то сравнение проводят с СКО оценки этих величин.
Π_ср := sum(Π[i]/N, i = 1 .. N) = 20.0037  # кГц  # - среднее значение выборки полосы пропускания
S_Π := sqrt(sum((Π[i] - Π_ср)^2/(N - 1), i = 1 .. N)) = 0.0697107  # кГц  # - СКО полосы пропускания
A := sum((Π[i] - Π_ср)^3/(N*S_Π^3), i = 1 .. N) = -0.20558  # - среднее значение коэффициента ассиметрии
Π = [19.882; 20.0545; 19.9273; 20.0808; 20.0026; 19.9931; 20.0416; 19.9698; 20.1358; 19.9569; 20.0337; 19.9314; 20.0311; 20.0702; 20.0532; 19.9959; 20.0461; 19.976; 20.1155; 20.0258; 19.9911; 19.8773; 20.0556; 19.9649; 19.8795]
E := sum((Π[i] - Π_ср)^4/(N*S_Π^4), i = 1 .. N) - 3 = -0.755321  # - среднее значение коэффициента эксцесса
σ_A := sqrt(6*(N - 1)/((N + 1)*(N + 3))) = 0.44475  # - оценка СКО коэффициента асимметрии
σ_E := sqrt(24*N*(N - 2)*(N - 3)/((N - 1)^2*(N + 3)*(N + 5))) = 0.792136  # - оценка СКО коэффициента эксцесса
2*σ_A = 0.889499
|A| < 2*σ_A  # где 2*σ_A = 0.889499
# Гипотезу о нормальном законе распределения принимаем.
|E| < 2*σ_E  # где 2*σ_E = 1.58427
# Точечная и интервальная оценки величины полосы пропускания:
2*σ_E = 1.58427
σ_Π == sqrt(sum((Π[i] - Π_ср)^2/(N*(N - 1)), i = 1 .. N)) == 0.01569  # кГц
σ := sqrt(sum((Π[i] - Π_ср)^2/(N*(N - 1)), i = 1 .. N)) = 0.0139421  # кГц  # - оценка СКО полосы пропускания
# Точечная оценка:
# П = 20.029 кГц ; 0.016 кГц ; 18
# Для интервальной оценки погрешности требуется вычислить ширину доверительного интервала.Поскольку СКО изначально неизвестно, будем использовать распределение Стьюдента. Из таблицы, приведенной в литературе: коэффициент Стьюдента при N=18 и P=0.98 равен 2.5668 (в таблице указаны значения tст для f - числа степеней свободы, f=N-1)
t_cт := 2.5170  # - коэффициент Стьюдента для нашего случая
t_cт*σ = 0.0350924  # кГц  # - доверительный интервал для результатов измерения полосы пропускания
# П = (20.03 ± 0,04) кГц ; 0.98 ; 18
# б) | Величина | Π[i] | как результат косвенного измерения.
Π_ср == F2_ср - F1_ср
Π_ср = 20.0037
# C учетом корреляции:
k_1 := d/dF1_ср(F2_ср - F1_ср) = -1
k_1 == -1
k_2 == 1
k_2 := d/dF2_ср(F2_ср - F1_ср) = 1
σ_Π == sqrt(k_1^2*σ_1^2 + k_2^2*σ_2^2 + 2*k_1*k_2*r*σ_1*σ_2)
σ_Π := sqrt(σ2^2 + σ1^2 - 2*r*σ2*σ1) = 0.0139421  # кГц
# Точечная оценка:
# П = 20.029 кГц ; 0.016 кГц ; 18
# Интервальная оценка:
t_cт = 2.517
d := σ_Π/sqrt(N)*t_cт = 0.00701847
# П = (20.029 ± 0.009) кГц ; 0.98 ; 18
# в) Результаты, полученные косвенным путем, более точные, чем полученные путем прямых измерений (для интервальной оценки).
# 4. Оценка величины добротности резонансного усилителя.
Q := 0.5*(F2_ср + F1_ср)/(F2_ср - F1_ср) = 38.0428  # - добротность резонансного контура
k_1 := F2_ср/(F2_ср - F1_ср)^2 = 1.92678
k_2 := -F1_ср/(F2_ср - F1_ср)^2 = -1.87679
σ_Q := sqrt(k_1^2*σ1^2 + k_2^2*σ2^2 + 2*k_1*k_2*r*σ1*σ2) = 0.0265763  # - оценка значения добротности
# Оценки результатов измерений:
# 1) Точечная.
# Q = 38.34 ; 0.03 ; 18
# 2) Интервальная.
# Для интервальной оценки погрешности требуется вычислить ширину доверительного интервала.Поскольку СКО изначально неизвестно, будем использовать распределение Стьюдента. Коэффициент Стьюдента при N=18 и P=0.99 равен 2.8982
t_ст := 2.8188
t_ст*σ_Q = 0.0749133
# Q = (38.34 ± 0.09); 0.99 ; 18
