f := 15.01*10^3
# Гц
R := 511  # Ом
R_к := 1000
U_1 := 2.151  # В
U_2 := 815.1*10^-3
# В
U_кU1 := 10
U_x1 := U_1/sqrt(2) = 1.52099  # В
t := 19  # o  # C
U_c := 219  # В
U_кU2 := 1
δ_0 := 1*10^-7
T := 0.1  # c
U_x2 := U_2/sqrt(2) = 0.576363  # В
δ_оп := (δ_0 + 1/(f*T)) = 0.000666323  # Основная погрешность частотомера
Δ_дпt := |t - 20|*10^-9 = 1e-9  # Дополнительная погрешность от температуры окр. среды
Δ_fп := Δ_дпt + δ_оп*f = 10.0015  # Предельная инструментальная погрешность измерения частоты
δ_опR := (0.2 + 0.02*R_к/R)/100 = 0.00239139  # Основная погрешность измерения сопротивления
δ_дпtR := 0.5*δ_опR*|20 - t|/10 = 0.000119569  # Дополнительная погрешность от температуры окр. среды
δ_дпUR := 0.02*R_к/R/100 = 0.000391389  # Дополнительная погрешность от изменения напряжения сети
δ_пR := δ_опR + δ_дпtR + δ_дпUR = 0.00290235  # Предельная относительная погрешность измерения сопротивления
Δ_пR := R*δ_пR = 1.4831  # Ом  # Предельная инструментальная погрешность измерения сопротивления
δ_опU1 := (0.5 + 0.02*U_кU1/U_x1)/100 = 0.00631494  # Основная погрешность измерения напряжения
δ_дпtU1 := 0.5*δ_опU1*|20 - t|/10 = 0.000315747  # Дополнительная погрешность от температуры окр. среды
δ_дпU1 := 0.02*U_кU1*sqrt(2)/U_1/100 = 0.00131494  # Дополнительная погрешность от изменения напряжения сети
δ_пU1 := δ_опU1 + δ_дпtU1 + δ_дпU1 = 0.00794562  # Предельная относительная погрешность измерения напряжения
Δ_пU1 := U_1*δ_пU1 = 0.017091  # В  # Предельная инструментальная погрешность измерения напряжения
δ_опU2 := (0.5 + 0.02*U_кU2/U_x2)/100 = 0.005347  # Основная погрешность измерения напряжения
δ_дпtU2 := 0.5*δ_опU2*|20 - t|/10 = 0.00026735  # Дополнительная погрешность от температуры окр. среды
δ_дпU2 := 0.02*U_кU2*sqrt(2)/U_2/100 = 0.000347004  # Дополнительная погрешность от изменения напряжения сети
δ_пU2 := δ_опU2 + δ_дпtU2 + δ_дпU2 = 0.00596136  # Предельная относительная погрешность измерения напряжения
Δ_пU2 := U_2*δ_пU2 = 0.0048591  # Предельная инструментальная погрешность измерения напряжения
C := 1/(2*π*f*R)*sqrt((U_1/U_2)^2 - 1) = 5.06743e-8  # Ф
k_Cf := d/df(C)
k_Cf := |-(1/(2*π*f^2*R)*sqrt((U_1/U_2)^2 - 1))| = 3.37603e-12
k_CR := d/dR(C)
k_CR := |-(1/(2*π*f*R^2)*sqrt((U_1/U_2)^2 - 1))| = 9.91669e-11
k_CU1 := d/dU_1(C)
k_CU1 := |U_1/(2*π*U_2^2*f*R*sqrt(U_1^2/U_2^2 - 1))| = 2.75086e-8
k_CU2 := d/dU_2(C)
k_CU2 := |-U_1^2/(2*π*U_2^3*f*R*sqrt(U_1^2/U_2^2 - 1))| = 7.25935e-8
Δ_пU2 = 0.0048591
Δ_С := |k_Cf*Δ_fп| + |k_CR*Δ_пR| + |k_CU1*Δ_пU1| + |k_CU2*Δ_пU2| = 1.00373e-9  # Ф
Δ_С := |3.392*10^-12*10.002| + |33.917*10^-12*3.583| + |27.877*10^-9*(17.091*10^-3)| + |65.527*10^-9*(10.603*10^-3)|
Δ_C := |k_Cf*Δ_fп| + |k_CR*Δ_пR| + |k_CU1*Δ_пU1| + |k_CU2*Δ_пU2| = 1.00373e-9
Δ_С = 1.32668e-9  # Ф
C := 1/(2*π*f*R)*sqrt((U_1/U_2)^2 - 1) = 5.06743e-8  # Ф
A(U_1, U_2) := (U_1/U_2)^2 - 1
A(U_1, U_2) = 5.964
K_U1 := d/dU_1(A(U_1, U_2)) = 6.47513  # Коэффициент влияния U_1
K_U2 := d/dU_2(A(U_1, U_2)) = -17.0875  # Коэффициент влияния U_2
ΔA := |K_U1*Δ_пU1| + |K_U2*Δ_пU2| = 0.193696  # Предельная погрешность A
δ_A := ΔA/A(U_1, U_2) = 0.0324776  # Предельная относительная погрешность формулы A
δ_пf := Δ_fп/f = 0.000666323  # Предельная относительная погрешность частоты
δ_С := δ_A + δ_пf + δ_пR = 0.0360463  # Предельная относительная погрешность косвенного измерения C
ΔС := δ_С*C = 1.82662e-9  # Предельная погрешность косвенного измерения C
C = 5.06743e-8  # Ф
