f := 15.11*10^3
# Гц
R := 1511  # Ом
R_к := 1000
U_1 := 2.151  # В
U_2 := 915.1*10^-3
# В
U_кU1 := 10
U_x1 := U_1/sqrt(2) = 1.52099  # В
t := 19  # o  # C
U_c := 209  # В
U_кU2 := 1
δ_0 := 1*10^-7
T := 0.1  # c
U_x2 := U_2/sqrt(2) = 0.647073  # В
δ_оп := (δ_0 + 1/(f*T)) = 0.000661913  # Основная погрешность частотомера
Δ_дпt := |t - 20|*10^-9 = 1e-9  # Дополнительная погрешность от температуры окр. среды
Δ_fп := Δ_дпt + δ_оп*f = 10.0015  # Предельная инструментальная погрешность измерения частоты
δ_опR := (0.2 + 0.02*R_к/R)/100 = 0.00213236  # Основная погрешность измерения сопротивления
δ_дпtR := 0.5*δ_опR*|20 - t|/10 = 0.000106618  # Дополнительная погрешность от температуры окр. среды
δ_дпUR := 0.02*R_к/R/100 = 0.000132363  # Дополнительная погрешность от изменения напряжения сети
δ_пR := δ_опR + δ_дпtR + δ_дпUR = 0.00237134  # Предельная относительная погрешность измерения сопротивления
Δ_пR := R*δ_пR = 3.5831  # Ом  # Предельная инструментальная погрешность измерения сопротивления
δ_опU1 := (0.5 + 0.02*U_кU1/U_x1)/100 = 0.00631494  # Основная погрешность измерения напряжения
δ_дпtU1 := 0.5*δ_опU1*|20 - t|/10 = 0.000315747  # Дополнительная погрешность от температуры окр. среды
δ_дпU1 := 0.02*U_кU1*sqrt(2)/U_1/100 = 0.00131494  # Дополнительная погрешность от изменения напряжения сети
δ_пU1 := δ_опU1 + δ_дпtU1 + δ_дпU1 = 0.00794562  # Предельная относительная погрешность измерения напряжения
Δ_пU1 := U_1*δ_пU1 = 0.017091  # В  # Предельная инструментальная погрешность измерения напряжения
δ_опU2 := (0.5 + 0.02*U_кU2/U_x2)/100 = 0.00530908  # Основная погрешность измерения напряжения
δ_дпtU2 := 0.5*δ_опU2*|20 - t|/10 = 0.000265454  # Дополнительная погрешность от температуры окр. среды
δ_дпU2 := 0.02*U_кU2*sqrt(2)/U_2/100 = 0.000309084  # Дополнительная погрешность от изменения напряжения сети
δ_пU2 := δ_опU2 + δ_дпtU2 + δ_дпU2 = 0.00588362  # Предельная относительная погрешность измерения напряжения
Δ_пU2 := U_2*δ_пU2 = 0.0053841  # Предельная инструментальная погрешность измерения напряжения
С := 1/(R*f*ln(U_1/U_2)) = 5.12484e-8  # Ф
k_Сf := d/df(С)
k_Сf := |-1/(R*f^2*ln(U_1/U_2))| = 3.39169e-12
k_СR := d/dR(С)
k_СR := |-1/(R^2*f*ln(U_1/U_2))| = 3.39169e-11
k_СU1 := d/dU_1(С)
k_СU1 := |-1/(R*U_1*f*ln(U_1/U_2)^2)| = 2.78772e-8
k_СU2 := d/dU_2(С)
k_СU2 := |1/(R*U_2*f*ln(U_1/U_2)^2)| = 6.55271e-8
Δ_пU2 = 0.0053841
Δ_С := |k_Сf*Δ_fп| + |k_СR*Δ_пR| + |k_СU1*Δ_пU1| + |k_СU2*Δ_пU2| = 9.84704e-10  # Ф
Δ_С := |3.392*10^-12*10.002| + |33.917*10^-12*3.583| + |27.877*10^-9*(17.091*10^-3)| + |65.527*10^-9*(10.603*10^-3)|
Δ_С = 1.32668e-9  # Ф
С := 1/(R*f*ln(U_1/U_2))
A(U_1, U_2) := ln(U_1/U_2)
A(U_1, U_2) = 0.854655
K_U1 := d/dU_1(A(U_1, U_2)) = 0.4649  # Коэффициент влияния U_1
K_U2 := d/dU_2(A(U_1, U_2)) = -1.09278  # Коэффициент влияния U_2
ΔA := |K_U1*Δ_пU1| + |K_U2*Δ_пU2| = 0.0138292  # Предельная погрешность A
δ_A := ΔA/A(U_1, U_2) = 0.0161811  # Предельная относительная погрешность формулы A
δ_пf := Δ_fп/f = 0.000661913  # Предельная относительная погрешность частоты
δ_С := δ_A + δ_пf + δ_пR = 0.0192143  # Предельная относительная погрешность косвенного измерения C
ΔС := δ_С*С = 9.84704e-10  # Предельная погрешность косвенного измерения C
С = 5.12484e-8  # Ф
