# Часть 2.
# Проведено по N  измерений частот F1 и F2 на границах полосы пропускания одноконтурного резонансного усилителя  . Погрешности измерения частот распределены по Гаусовскому закону c неизвестным заранее СКО. Систематические погрешности отсутствуют .
ORIGIN := 1
Nгр := 15
Nж := 15
N := Nгр + |Nж - 11| = 19
μ_1 := (50*Nгр + Nж) = 765  # кГц
μ_2 := μ_1 + 20 = 785  # кГц
σ := 0.05  # кГц
F_1 := rnorm(N, μ_1, σ)
F_2 := rnorm(N, μ_2, σ)
F_1 = [764.945; 764.945; 764.98; 764.934; 764.858; 765.064; 765.04; 765.007; 764.95; 764.954; 764.956; 765.014; 764.98; 765.065; 764.931; 765.019; 765.022; 765.088; 764.968]
F_2 = [785.028; 785.077; 784.909; 785.065; 784.948; 785.023; 784.947; 784.938; 785.021; 784.904; 784.994; 785.021; 785.073; 784.939; 784.981; 785.024; 785.009; 785.01; 785.026]
i := [1; 2; 3; 4; 5; 6; 7; 8; 9; 10; 11; 12; 13; 14; 15; 16; 17; 18; 19; 20; 21; 22; 23]
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# 2. Оценки результатов.
# Расчет оценки частот F1ср и F2ср.
F1_ср := 1/N*sum(F_1[i], i = 1 .. N) = 764.985  # кГц
F2_ср := 1/N*sum(F_2[i], i = 1 .. N) = 784.997  # кГц
# Расчет CКО  F1 и F2.
S_F1 := sqrt(1/(N - 1)*sum((F_1[i] - F1_ср)^2, i = 1 .. N)) = 0.056921  # кГц
S_F2 := sqrt(1/(N - 1)*sum((F_2[i] - F2_ср)^2, i = 1 .. N)) = 0.0527268  # кГц
# Оценка СКО:
σ1 := S_F1/sqrt(N) = 0.0130586  # кГц
σ2 := S_F2/sqrt(N) = 0.0120963  # кГц
# Оценки результатов измерений:
# 1) Точечная.
# F1 = 757.988 кГц ; 0.012 кГц; 18
# F2 = 778.017 кГц ; 0.011 кГц; 18
# 2) Интервальная.
# Для интервальной оценки погрешности требуется вычислить ширину доверительного интервала.Поскольку СКО изначально неизвестно, будем использовать распределение Стьюдента. Коэффициент Стьюдента при N=18 и P=0.95 равен 2.11 (в таблице указаны значения tст для f - числа степеней свободы, f=N-1)
t_ст := 2.1009
t_ст*σ1 = 0.0274347  # кГц
t_ст*σ2 = 0.0254132  # кГц
# F1 = (757.988±0.024)кГц ; 0.95 ; 18
# F2 = (778.017±0.024)кГц ; 0.95 ; 18
# Интервальная и точечная оценки:
#
# F1=757.988 кГц;  σ1= 0.012 кГц; N=18
#
# F2=778.017 кГц;  σ2=0.011  кГц; N=18
#
# F1=(757.988±0.024) кГц ; Рд=0.95;  N=18
#
# F2=(778.017±0.024) кГц ; Рд=0.95;  N=18
# Коэффициент корреляции:
r := sum((F_1[i] - F1_ср)*(F_2[i] - F2_ср)/((N - 1)*S_F1*S_F2), i = 1 .. N) = -0.0429803
r := corr(F_1, F_2) = -0.0429803
# Коэффициент корреляции не равен нулю,то есть величины коррелированы.
# 3. | a) | Выборка значений величины | Π[i]
Π := F_2 - F_1
# Что бы закон распределения был гаусовским необходимо и достаточно , равенство нулю оценочных коэффициентов ассиметри и эксцеса (Ао=0, Ео=0). Но поскольку  эти величины случайные, то сравнение проводят с СКО оценки этих величин.
Π_ср := sum(Π[i]/N, i = 1 .. N) = 20.0115  # кГц  # - среднее значение выборки полосы пропускания
S_Π := sqrt(sum((Π[i] - Π_ср)^2/(N - 1), i = 1 .. N)) = 0.0792345  # кГц  # - СКО полосы пропускания
Π = [20.0828; 20.1325; 19.9293; 20.1311; 20.0896; 19.9591; 19.9078; 19.9307; 20.0715; 19.9505; 20.0377; 20.0068; 20.0934; 19.8735; 20.0497; 20.0048; 19.9874; 19.9218; 20.0584]
A := sum((Π[i] - Π_ср)^3/(N*S_Π^3), i = 1 .. N) = -0.0709928  # - среднее значение коэффициента ассиметрии
E := sum((Π[i] - Π_ср)^4/(N*S_Π^4), i = 1 .. N) - 3 = -1.3971  # - среднее значение коэффициента эксцесса
σ_A := sqrt(6*(N - 1)/((N + 1)*(N + 3))) = 0.495434  # - оценка СКО коэффициента асимметрии
σ_E := sqrt(24*N*(N - 2)*(N - 3)/((N - 1)^2*(N + 3)*(N + 5))) = 0.851486  # - оценка СКО коэффициента эксцесса
2*σ_A = 0.990867
|A| < 2*σ_A  # где 2*σ_A = 0.990867
# Гипотезу о нормальном законе распределения принимаем.
|E| < 2*σ_E  # где 2*σ_E = 1.70297
# Точечная и интервальная оценки величины полосы пропускания:
2*σ_E = 1.70297
σ_Π == sqrt(sum((Π[i] - Π_ср)^2/(N*(N - 1)), i = 1 .. N)) == 0.01569  # кГц
σ := sqrt(sum((Π[i] - Π_ср)^2/(N*(N - 1)), i = 1 .. N)) = 0.0181776  # кГц  # - оценка СКО полосы пропускания
# Точечная оценка:
# П = 20.029 кГц ; 0.016 кГц ; 18
# Для интервальной оценки погрешности требуется вычислить ширину доверительного интервала.Поскольку СКО изначально неизвестно, будем использовать распределение Стьюдента. Из таблицы, приведенной в литературе: коэффициент Стьюдента при N=18 и P=0.98 равен 2.5668 (в таблице указаны значения tст для f - числа степеней свободы, f=N-1)
t_cт := 2.5514  # - коэффициент Стьюдента для нашего случая
t_cт*σ = 0.0463784  # кГц  # - доверительный интервал для результатов измерения полосы пропускания
# П = (20.03 ± 0,04) кГц ; 0.98 ; 18
# б) | Величина | Π[i] | как результат косвенного измерения.
Π_ср == F2_ср - F1_ср
Π_ср = 20.0115
# C учетом корреляции:
k_1 := d/dF1_ср(F2_ср - F1_ср) = -1
k_1 == -1
k_2 == 1
k_2 := d/dF2_ср(F2_ср - F1_ср) = 1
σ_Π == sqrt(k_1^2*σ_1^2 + k_2^2*σ_2^2 + 2*k_1*k_2*r*σ_1*σ_2)
σ_Π := sqrt(σ2^2 + σ1^2 - 2*r*σ2*σ1) = 0.0181776  # кГц
# Точечная оценка:
# П = 20.029 кГц ; 0.016 кГц ; 18
# Интервальная оценка:
t_cт = 2.5514
d := σ_Π/sqrt(N)*t_cт = 0.0106399
# П = (20.029 ± 0.009) кГц ; 0.98 ; 18
# в) Результаты, полученные косвенным путем, более точные, чем полученные путем прямых измерений (для интервальной оценки).
# 4. Оценка величины добротности резонансного усилителя.
Q := 0.5*(F2_ср + F1_ср)/(F2_ср - F1_ср) = 38.7273  # - добротность резонансного контура
k_1 := F2_ср/(F2_ср - F1_ср)^2 = 1.96024
k_2 := -F1_ср/(F2_ср - F1_ср)^2 = -1.91027
σ_Q := sqrt(k_1^2*σ1^2 + k_2^2*σ2^2 + 2*k_1*k_2*r*σ1*σ2) = 0.0352142  # - оценка значения добротности
# Оценки результатов измерений:
# 1) Точечная.
# Q = 38.34 ; 0.03 ; 18
# 2) Интервальная.
# Для интервальной оценки погрешности требуется вычислить ширину доверительного интервала.Поскольку СКО изначально неизвестно, будем использовать распределение Стьюдента. Коэффициент Стьюдента при N=18 и P=0.99 равен 2.8982
t_ст := 2.8784
t_ст*σ_Q = 0.101361
# Q = (38.34 ± 0.09); 0.99 ; 18
