f := 15.03*10^3
# Гц
R := 513  # Ом
R_к := 1000
U_1 := 1.353  # В
U_2 := 635.3*10^-3
# В
U_кU1 := 10
t := 21  # o  # C
U_c := 217  # В
# В
U_кU2 := 10
U_x1 := U_1/sqrt(2) = 0.956715
# В
U_x2 := U_2/sqrt(2) = 0.449225
δ_0 := 1*10^-7
T := 0.1  # c
δ_оп := (δ_0 + 1/(f*T)) = 0.000665436  # Основная погрешность частотомера
Δ_дпt := |t - 20|*10^-9 = 1e-9  # Дополнительная погрешность от температуры окр. среды
Δ_fп := Δ_дпt + δ_оп*f = 10.0015  # Предельная инструментальная погрешность измерения частоты
δ_опR := (0.2 + 0.02*R_к/R)/100 = 0.00238986  # Основная погрешность измерения сопротивления
δ_дпtR := 0.5*δ_опR*|20 - t|/10 = 0.000119493  # Дополнительная погрешность от температуры окр. среды
δ_дпUR := 0.02*R_к/R/100 = 0.000389864  # Дополнительная погрешность от изменения напряжения сети
δ_пR := δ_опR + δ_дпtR + δ_дпUR = 0.00289922  # Предельная относительная погрешность измерения сопротивления
Δ_пR := R*δ_пR = 1.4873  # Ом  # Предельная инструментальная погрешность измерения сопротивления
δ_опU1 := (0.5 + 0.02*U_кU1/U_x1)/100 = 0.00709049  # Основная погрешность измерения напряжения
δ_дпtU1 := 0.5*δ_опU1*|20 - t|/10 = 0.000354524  # Дополнительная погрешность от температуры окр. среды
δ_дпU1 := 0.02*U_кU1*sqrt(2)/U_1/100 = 0.00209049  # Дополнительная погрешность от изменения напряжения сети
δ_пU1 := δ_опU1 + δ_дпtU1 + δ_дпU1 = 0.0095355  # Предельная относительная погрешность измерения напряжения
Δ_пU1 := U_1*δ_пU1 = 0.0129015  # В  # Предельная инструментальная погрешность измерения напряжения
δ_опU2 := (0.5 + 0.02*U_кU2/U_x2)/100 = 0.00945211  # Основная погрешность измерения напряжения
δ_дпtU2 := 0.5*δ_опU2*|20 - t|/10 = 0.000472606  # Дополнительная погрешность от температуры окр. среды
δ_дпU2 := 0.02*U_кU2*sqrt(2)/U_2/100 = 0.00445211  # Дополнительная погрешность от изменения напряжения сети
δ_пU2 := δ_опU2 + δ_дпtU2 + δ_дпU2 = 0.0143768  # Предельная относительная погрешность измерения напряжения
Δ_пU2 := U_2*δ_пU2 = 0.0091336  # Предельная инструментальная погрешность измерения напряжения
k_Cf := d/df(C)
k_Cf := |-1/(2*π*f^2*R*sqrt((U_1/U_2)^2 - 1))| = 7.30384e-13
C := 1/(2*π*f*R*sqrt((U_1/U_2)^2 - 1)) = 1.09777e-8  # Ф
x := 10
k_CR := d/dR(C)
k_CR := |-1/(2*π*f*R^2*sqrt((U_1/U_2)^2 - 1))| = 2.1399e-11
k_CU1 := d/dU_1(C)
k_CU1 := |-U_1/(π*f*R*U_2^2*((U_1/U_2)^2 - 1)^(3/2))| = 2.08168e-8
L := R/(2*π*f)*sqrt((U_1/U_2)^2 - 1) = 0.0102144  # Гн
k_CU2 := d/dU_2(C)
k_CU2 := |-U_1^2/(π*f*R*U_2^3*((U_1/U_2)^2 - 1)^(3/2))| = 4.43335e-8
k_Lf := d/df(L)
k_Lf := |-1/(2*π*f^2*R)*sqrt((U_1/U_2)^2 - 1)| = 2.58237e-12
k_LR := d/dR(L)
k_LR := |1/(2*π*f)*sqrt((U_1/U_2)^2 - 1)| = 1.99111e-5
k_LU1 := d/dU_1(L)
k_LU1 := |R*U_1/(2*π*U_2^2*f*sqrt(U_1^2/U_2^2 - 1))| = 0.00968467
k_LU2 := d/dU_2(L)
k_LU2 := |-R*U_1^2/(2*π*U_2^3*f*sqrt(U_1^2/U_2^2 - 1))| = 0.0206255
Δ_C := |k_Cf*Δ_fп| + |k_CR*Δ_пR| + |k_CU1*Δ_пU1| + |k_CU2*Δ_пU2| = 7.12624e-10  # Ф
Δ_L := |k_Lf*Δ_fп| + |k_LR*Δ_пR| + |k_LU1*Δ_пU1| + |k_LU2*Δ_пU2| = 0.000342946  # Гн
Δ_L := |3.402*10^-12*10.002| + |2.657*10^-5*1.807| + |8.577*10^-3*0.019| + |0.023*0.011| = 0.000463975
C := 1/(2*π*f*R*sqrt((U_1/U_2)^2 - 1)) = 1.09777e-8
L := R/(2*π*f)*sqrt((U_1/U_2)^2 - 1)
Y(U_1, U_2) := (U_1/U_2)^2 - 1
Y(U_1, U_2) = 3.53563
K_U1 := d/dU_1(Y(U_1, U_2))
K_U1 = 6.70456  # Коэффициент влияния U_1
K_U2 := d/dU_2(Y(U_1, U_2))
K_U2 = -14.2787  # Коэффициент влияния U_2
ΔY := |K_U1*Δ_пU1| + |K_U2*Δ_пU2| = 0.216915  # Предельная погрешность Y
δ_Y := ΔY/Y(U_1, U_2) = 0.0613511  # Предельная относительная погрешность формулы Y
δ_пf := Δ_fп/f = 0.000665436  # Предельная относительная погрешность частоты
δ_C := 1/2*δ_Y + δ_пf + δ_пR = 0.0342402  # Предельная относительная погрешность косвенного измерения С
ΔC := δ_C*C = 3.75878e-10  # Ф  # Предельная погрешность косвенного измерения С
