f := 15.04*10^3
# Гц
R := 514  # Ом
R_к := 1000
U_1 := 1.454  # В
U_2 := 645.4*10^-3
# В
U_кU1 := 10
t := 22  # o  # C
U_c := 216  # В
# В
U_кU2 := 10
U_x1 := U_1/sqrt(2) = 1.02813
# В
U_x2 := U_2/sqrt(2) = 0.456367
δ_0 := 1*10^-7
T := 0.1  # c
δ_оп := (δ_0 + 1/(f*T)) = 0.000664994  # Основная погрешность частотомера
Δ_дпt := |t - 20|*10^-9 = 2e-9  # Дополнительная погрешность от температуры окр. среды
Δ_fп := Δ_дпt + δ_оп*f = 10.0015  # Предельная инструментальная погрешность измерения частоты
δ_опR := (0.2 + 0.02*R_к/R)/100 = 0.00238911  # Основная погрешность измерения сопротивления
δ_дпtR := 0.5*δ_опR*|20 - t|/10 = 0.000238911  # Дополнительная погрешность от температуры окр. среды
δ_дпUR := 0.02*R_к/R/100 = 0.000389105  # Дополнительная погрешность от изменения напряжения сети
δ_пR := δ_опR + δ_дпtR + δ_дпUR = 0.00301712  # Предельная относительная погрешность измерения сопротивления
Δ_пR := R*δ_пR = 1.5508  # Ом  # Предельная инструментальная погрешность измерения сопротивления
δ_опU1 := (0.5 + 0.02*U_кU1/U_x1)/100 = 0.00694527  # Основная погрешность измерения напряжения
δ_дпtU1 := 0.5*δ_опU1*|20 - t|/10 = 0.000694527  # Дополнительная погрешность от температуры окр. среды
δ_дпU1 := 0.02*U_кU1*sqrt(2)/U_1/100 = 0.00194527  # Дополнительная погрешность от изменения напряжения сети
δ_пU1 := δ_опU1 + δ_дпtU1 + δ_дпU1 = 0.00958507  # Предельная относительная погрешность измерения напряжения
Δ_пU1 := U_1*δ_пU1 = 0.0139367  # В  # Предельная инструментальная погрешность измерения напряжения
δ_опU2 := (0.5 + 0.02*U_кU2/U_x2)/100 = 0.00938244  # Основная погрешность измерения напряжения
δ_дпtU2 := 0.5*δ_опU2*|20 - t|/10 = 0.000938244  # Дополнительная погрешность от температуры окр. среды
δ_дпU2 := 0.02*U_кU2*sqrt(2)/U_2/100 = 0.00438244  # Дополнительная погрешность от изменения напряжения сети
δ_пU2 := δ_опU2 + δ_дпtU2 + δ_дпU2 = 0.0147031  # Предельная относительная погрешность измерения напряжения
Δ_пU2 := U_2*δ_пU2 = 0.0094894  # Предельная инструментальная погрешность измерения напряжения
k_Cf := d/df(C)
k_Cf := |-1/(2*π*f^2*R*sqrt((U_1/U_2)^2 - 1))| = 6.78072e-13
C := 1/(2*π*f*R*sqrt((U_1/U_2)^2 - 1)) = 1.01982e-8  # Ф
x := 10
k_CR := d/dR(C)
k_CR := |-1/(2*π*f*R^2*sqrt((U_1/U_2)^2 - 1))| = 1.98409e-11
L := R/(2*π*f*sqrt((U_1/U_2)^2 - 1)) = 0.00269432  # Гн
k_CU1 := d/dU_1(C)
k_CU1 := |-U_1/(π*f*R*U_2^2*((U_1/U_2)^2 - 1)^(3/2))| = 1.74698e-8
k_Lf := d/df(L)
k_Lf := |-R/(2*π*f^2*sqrt((U_1/U_2)^2 - 1))| = 1.79144e-7
k_CU2 := d/dU_2(C)
k_CU2 := |-U_1^2/(π*f*R*U_2^3*((U_1/U_2)^2 - 1)^(3/2))| = 3.93572e-8
k_LR := d/dR(L)
k_LR := |-1/(2*π*f*sqrt((U_1/U_2)^2 - 1))| = 5.24188e-6
k_LU1 := d/dU_1(L)
k_LU1 := |-U_1/(π*f*R*U_2^2*((U_1/U_2)^2 - 1)^(3/2))| = 1.74698e-8
k_LU2 := d/dU_2(L)
k_LU2 := |-U_1^2/(π*f*R*U_2^3*((U_1/U_2)^2 - 1)^(3/2))| = 3.93572e-8
Ф
Δ_C := |k_Cf*Δ_fп| + |k_CR*Δ_пR| + |k_CU1*Δ_пU1| + |k_CU2*Δ_пU2| = 6.54499e-10
Δ_L := |k_Lf*Δ_fп| + |k_LR*Δ_пR| + |k_LU1*Δ_пU1| + |k_LU2*Δ_пU2| = 9.92143e-6  # Гн
Δ_L := |1.791*10^-7*10.002| + |5.242*10^-6*1.551| + |1.747*10^-8*0.014| + |3.936*10^-8*(9.489*10^-3)| = 9.92232e-6
C := 1/(2*π*f*R*sqrt((U_1/U_2)^2 - 1)) = 1.01982e-8
L := R/(2*π*f)*sqrt((U_1/U_2)^2 - 1)
Y(U_1, U_2) := (U_1/U_2)^2 - 1
Y(U_1, U_2) = 4.07541
K_U1 := d/dU_1(Y(U_1, U_2))
K_U1 = 6.9813  # Коэффициент влияния U_1
K_U2 := d/dU_2(Y(U_1, U_2))
K_U2 = -15.7279  # Коэффициент влияния U_2
ΔY := |K_U1*Δ_пU1| + |K_U2*Δ_пU2| = 0.246545  # Предельная погрешность Y
δ_Y := ΔY/Y(U_1, U_2) = 0.0604958  # Предельная относительная погрешность формулы Y
δ_пf := Δ_fп/f = 0.000664994  # Предельная относительная погрешность частоты
δ_L := 1/2*δ_Y + δ_пf + δ_пR = 0.03393  # Предельная относительная погрешность косвенного измерения L
ΔL := δ_L*L = 0.000372567  # Ф  # Предельная погрешность косвенного измерения L
3.726*10^-4 - 9.921*10^-6 = 0.000362679
