C1 := 69.4*10^-12
f4 := 32108*1000
f3 := 31934*1000
f2 := 32034*1000
f1 := 31934*1000
R := sqrt((1/(2*π*C1^2)*1/(f4 - f3 - f2 + f1))^2 + (4/(π*C1)*1/(f4 - f3 - f2 + f1)^2)^2) = 4.46549e14
1/(2*π*C1)*1/(f4 - f3 - f2 + f1) = 30990.5
Cx := 28.85*10^-12
f2 := sqrt(2.304*10^12) = 1517893
b := 2*10^-5
T := 30*60
L := 1.25/((2*π*f2)^2*Cx) = 0.000476345
fx := f1
b + 1/(fx*T) = 2e-5
R := 10000
f := 345000
t := 2.2*10^-3
C := 0.01*t/(2.3*R) + t*0.01/(2.3*R) = 1.91304e-9
k := 0.908
R1 := 100
0.01*R/(2*π*f) = 4.61319e-5
R2 := 1000
Rvx(R1) := R1*R2/(R1*(1 - k)/k - R2)
kop := (1 - k)/k
DelR1 := 0.356
r1 := (R2*(R1*kop - R2) - kop*R1*R2)/(R1*kop - R2)^2*DelR1 = -0.363325
DelR2 := 0.896
r2 := (R1*(R1*kop - R2) + R1*R2)*DelR2 = 907.841
DelR := r1 + r2 = 907.478
