U_0k := 4
I_0k := 4*10^-3
R_3 := 1500
R_4 := 250
E := U_0k + (R_3 + R_4)*I_0k = 11
f_s := 1.104*10^9
τ := 1/(2*π*f_s) = 1.44162e-10
S := 1.3*10^6
g_22 := 67.682*10^-6
R_n := 50*10^3
g_n := 1/R_n = 2e-5
g_3 := 1/R_3 = 0.000666667
g_ekv := g_22 + g_3 + g_n = 0.000754349
K_0 := S/g_ekv = 1.72334e9
C_22nc := 1.841*10^-12
C_n := 100*10^-12
τ_B := τ + (C_22nc + C_n)/g_ekv = 1.35149e-7
f_B := 1/(2*π*τ_B) = 1177623
g_11 := 1.325*10^-3
C_1 := 10*10^-6
g_d := 1
C_2 := 100*10^-6
C_3 := 10*10^-6
τ_nc1 := C_1/(g_d + g_11) = 9.98677e-6
τ_nc2 := C_2/(S + 1/R_4) = 7.69231e-11
τ_nc3 := C_3*(R_n + 1/(g_22 + g_3)) = 0.513618
ω_n := sqrt((1/τ_nc1)^2 + (1/τ_nc2)^2 + (1/τ_nc3)^2)
f_n := ω_n/(2*π) = 2.06901e9
