E := 19
Y := 19*10^-3
R1 := 14
R2 := 400
R3 := 200
R4 := 5*10^3
C1 := 40*10^-12
C2 := 25*10^-12
L1 := 5*10^-6
I_R12 := Y*R3/(R1 + R2 + R3) = 0.00618893
I_R3 := Y*(R1 + R2)/(R1 + R2 + R3) = 0.0128111
I_R12 + I_R3 = 0.019
U_1 := I_R3*R3 = 2.56221
U_2 := I_R12*R2 = 2.47557
f := 1/(2*π*sqrt(L1*C2)) = 14235251
ρ := sqrt(L1/C2) = 447.214
Q := R4/ρ = 11.1803
Δf := f/Q = 1273240
τ := R1*C1 = 5.6e-10
ω_c := 1/(2*π*τ) = 284205256
f := 1/(2*π*sqrt(L1*C1)) = 11253954
ρ := sqrt(L1/C1) = 353.553
Q := R2/ρ = 1.13137
Δf := f/Q = 9947184
