E := 33
R2 := 20*10^3
Y := 33*10^-3
R1 := 10*10^3
R3 := 13*10^3
U1 := E*R3/(R1 + R3) = 18.6522
U1/R3 = 0.00143478
E/R2 = 0.00165
I_R1 := Y*R3/(R1 + R3) = 0.0186522
I_R3 := Y*R1/(R1 + R3) = 0.0143478
U1 := Y*R1*R3/(R1 + R3) = 186.522
18.652 + 186.522 = 205.174
14.348*10^-3 + 1.435*10^-3 = 0.015783
L1 := 2.5*10^-3
C2 := 20*10^-12
C1 := 50*10^-12
f_p := 1/(2*π*sqrt(L1*C1)) = 450158
ρ := sqrt(L1/C1) = 7071.07
Q := R2/ρ = 2.82843
Δf := f_p/Q = 159155
τ := C1*R1
f_ср := 1/(2*π*τ) = 318310
42.306*0.7 = 29.6142
