E := 35
I := 35*10^-3
R1 := 15
R2 := 25
R3 := 100
R4 := 5*10^6
C1 := 1*10^-6
C2 := 2*10^-6
L := 10*10^-3
R_23 := R2*R3/(R2 + R3) = 20
I_E := E/(R_23 + R1) = 1
f := 1/(2*π*sqrt(L*C1)) = 1591.55
ρ := sqrt(L/C1) = 100
Q := R1*R2/(R1 + R2)/ρ = 0.09375
Δf := f/Q = 16976.5
f := 1/(2*π*sqrt(L1*C1))  # error: Эта переменная не определена.
ρ := sqrt(L1/C1)  # error: Эта переменная не определена.
Q := R2/ρ  # error: Эта переменная не определена.
Δf := f/Q  # error: Эта переменная не определена.
