E := 30
I := 30*10^-3
R1 := 15
R2 := 25
R3 := 100
R4 := 5*10^6
C1 := 1*10^-6
C2 := 2*10^-6
L := 0.5*10^-3
Rsum := R3*R2/(R3 + R2) = 20
I1 := E/(Rsum + R1) = 0.857143
Rsum1 := R1*R2/(R1 + R2) = 9.375
I1*R3/(R2 + R3) = 0.685714
I1*R2/(R2 + R3) = 0.171429
U2 := I1*R1 = 12.8571
f := 1/(2*π*sqrt(L*C1)) = 7117.63
ρ := sqrt(L/C1) = 22.3607
Q1 := (R1*R2/(R1 + R2) + R3)/ρ = 4.8914
Q := R1*R2/(R1 + R2)/ρ = 0.419263
Δf := f/Q = 16976.5
Δf1 := f/Q1 = 1455.13
f := 1/(2*π*sqrt(L1*C1))  # error: Эта переменная не определена.
ρ := sqrt(L1/C1)  # error: Эта переменная не определена.
Q := R2/ρ  # error: Эта переменная не определена.
Δf := f/Q  # error: Эта переменная не определена.
