E := 39
Y := 39*10^-3
R1 := 20
R2 := 19
R3 := 40
R4 := 500*10^3
C1 := 10*10^-6
C2 := 20*10^-6
L := 5*10^-3
R_sum := R1*R2*R3/(R1*R2 + R1*R3 + R2*R3) = 7.83505
U_1 := Y*R_sum = 0.305567
I_R1 := U_1/R1 = 0.0152784
I_R2 := U_1/R2 = 0.0160825
I_R3 := U_1/R3 = 0.00763918
I_R1 + I_R2 + I_R3 = 0.039
f := 1/(2*π*sqrt(L*C1)) = 711.763
ω_cp := 1/(L*C1) = 20000000
ρ := sqrt(L/C1) = 22.3607
Q1 := (R1*R2/(R1 + R2) + R3)/ρ = 2.2246
Q := R1*R2/(R1 + R2)/ρ = 0.435747
Δf := f/Q = 1633.43
Δf1 := f/Q1 = 319.951
f := 1/(2*π*sqrt(L*C1)) = 711.763
ρ := sqrt(L/C1) = 22.3607
Q := R2/ρ = 0.849706
Δf := f/Q = 837.658
(R1^-1 + R2^-1)^-1 = 9.74359
R12 := R1*R2/(R1 + R2) = 9.74359
f_cr := R12/L = 1948.72
