R1 := 500
R2 := 22
R3 := 250
R4 := 400
E := 37
Y := 37*10^-3
R_23 := R2*R3/(R2 + R3) = 20.2206
U2 := E*R_23/(R1 + R_23) = 1.43816
I_R1 := (E - U2)/R1 = 0.0711237
I_R2 := I_R1*R3/(R2 + R3) = 0.065371
I_R3 := I_R1*R2/(R2 + R3) = 0.00575265
U_1 := Y*R4 = 14.8
L := 10*10^-3
C1 := 25*10^-12
C2 := 50*10^-12
f := 1/(2*π*sqrt(L*C1)) = 318310
ρ := sqrt(L/C1) = 20000
Q := R3/ρ = 0.0125
Δf := f/Q = 25464791
Q := f/(23.5*10^6) = 0.0135451
Re := L/C1 = 400000000
Q := Re*ρ = 8000000000000
