E := 38
I := 38*10^-3
R1 := 20*10^3
R2 := 10*10^3
R3 := 23
R5 := 300*10^3
C1 := 100*10^-12
C2 := 2*C1 = 2e-10
L := 4*10^-3
f := 1/(2*π*sqrt(L*C1)) = 251646
f1 := 1/(2*π*sqrt(L*C2)) = 177941
ρ := sqrt(L/C1) = 6324.56
ρ1 := sqrt(L/C2) = 4472.14
Q1 := R3/ρ1 = 0.00514296
Q := R2/ρ = 1.58114
Δf := f/Q1 = 48930235
Δf := f/Q = 159155
f := 1/(2*π*sqrt(L1*C1))  # error: Эта переменная не определена.
ρ := sqrt(L1/C1)  # error: Эта переменная не определена.
Q := R2/ρ  # error: Эта переменная не определена.
Δf := f/Q  # error: Эта переменная не определена.
