E := 21
R1 := 9*10^3
Y := 21*10^-3
R2 := 4*10^3
C1 := 40*10^-12
R3 := 5*10^3
C2 := 30*10^-12
R4 := 1*10^6
L1 := 3*10^-3
f := 1/(2*π*sqrt(L1*C1)) = 459441
ρ := sqrt(L1/C1) = 8660.25
Q := R2/ρ = 0.46188
Δf := f/Q = 994718
