R1 := 4
C1 := 50*10^-12
R2 := 5*10^3
R3 := 20*10^3
C2 := 20*10^-12
E := 24
L := 500*10^-6
Y := 24*10^-3
I := E/R1 = 6
I_R2 := Y*R3/(R2 + R3) = 0.0192
I_R3 := Y*R2/(R2 + R3) = 0.0048
I_R2 + I_R3 = 0.024
R23 := R2*R3/(R2 + R3) = 4000
U_1 := Y*R23 = 96
C12 := (C1^-1 + C2^-1)^-1 = 1.42857e-11
f_1 := 1/(2*π*sqrt(L*C1)) = 1006584
f_2 := 1/(2*π*sqrt(L*C12)) = 1883147
ρ_1 := sqrt(L/C1) = 3162.28
ρ_2 := sqrt(L/C12) = 5916.08
Q_1 := R2/ρ_1 = 1.58114
Q_2 := R1/ρ_2 = 0.000676123
Δf_1 := f_1/Q_1 = 636620
Δf_2 := f_2/Q_2 = 2.78521e9
