R1 := 3
R2 := 10*10^3
R3 := 4*10^3
R4 := 5*10^3
Rsum := R3*R4/(R3 + R4) = 2222.22
R5 := 0
E := 18
IY := 18*10^-3
Rs := R2*Rsum/(R2 + Rsum) = 1818.18
I := 21/(6 + 1000 + 500) = 0.0139442
IR1 := E/(R1 + Rs) = 0.00988369
U2 := IR1*Rs = 17.9703
U2 := I*500 = 6.97211
IR2 := U2/R2 = 0.000697211
IR3 := U2/R3 = 0.00174303
IR4 := U2/R4 = 0.00139442
Ir4 := IY*R3/(R3 + R4) = 0.008
Ir3 := IY*R4/(R3 + R4) = 0.01
Ir2 := IY*R1/(R1 + R2) = 5.39838e-6
Ir1 := IY*R2/(R1 + R2) = 0.0179946
U22 := Ir4*R4 = 40
U11 := Ir2*R2 = 0.0539838
IY1 := 6
Ir22 := (IY + IY1)*R1/(R1 + R2) = 0.00180486
Ir11 := (IY + IY1)*R2/(R1 + R2) = 6.0162
U111 := Ir22*R2 = 18.0486
L1 := 0.5*10^-3
C1 := 100*10^-12
R2 := 5*10^3
f := 1/(2*π*sqrt(L1*C1)) = 711763
ρ := sqrt(L1/C1) = 2236.07
Q := R2/ρ = 2.23607
Δf := f/Q = 318310
