U_0k := 5
I_0k := 4*10^-3
R_3 := 1500
U_b := 1.668
R_4 := 250
I_b0 := 40*10^-6
E := U_0k + (R_3 + R_4)*I_0k = 12
R1 := (E - U_b)/(10*I_b0) = 25830
f_s := 1.104*10^9
τ := 1/(2*π*f_s) = 1.44162e-10
R2 := U_b/(9*I_b0) = 4633.33
S := 138.437*10^-3
g_22 := 67.682*10^-6
R_n := 50*10^3
g_n := 1/R_n = 2e-5
g_3 := 1/R_3 = 0.000666667
g_ekv := g_22 + g_3 + g_n = 0.000754349
K_0 := S/g_ekv = 183.519
C_22nc := 1.841*10^-12
C_n := 100*10^-12
τ_B := τ + (C_22nc + C_n)/g_ekv = 1.35149e-7
tf := 2.2*τ_B = 2.97329e-7
f_B := 1/(2*π*τ_B) = 1177623
g_11 := 1.325*10^-3
C_1 := 10*10^-6
g_d := 10
C_2 := 100*10^-6
C_3 := 10*10^-6
τ_nc1 := C_1/(g_d + g_11) = 9.99868e-7
τ_nc2 := C_2/(S + 1/R_4) = 0.000702065
τ_nc3 := C_3*(R_n + 1/(g_22 + g_3)) = 0.513618
ω_n := sqrt((1/τ_nc1)^2 + (1/τ_nc2)^2 + (1/τ_nc3)^2)
f_n := ω_n/(2*π) = 159176
T := [60; 50; 30; 10; -10; -30; -50]
K0 := [175; 180; 185; 190; 200; 205; 215]
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