T := [0; 8; 16; 24; 32; 40; 48]
NF := [1*10^11; 1.5*10^11; 4*10^11; 1*10^11; 1.5*10^11; 4*10^11; 1*10^11]
NE := [0.1*10^10; 2*10^10; 3*10^10; 0.1*10^10; 2*10^10; 3*10^10; 0.1*10^10]
fF := 9*sqrt(NF) = [2846050; 3485685; 5692100; 2846050; 3485685; 5692100; 2846050]
fE := 9*sqrt(NE) = [284605; 1272792; 1558846; 284605; 1272792; 1558846; 284605]
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h := [330; 240; 255; 330; 240; 255; 330]
θ := atan(1900/(2*h)) = [1.23647; 1.32334; 1.30856; 1.23647; 1.32334; 1.30856; 1.23647]
fmpchF := 0.9*fF/cos(θ) = [7806072; 12807892; 19760864; 7806072; 12807892; 19760864; 7806072]
fmpchE := 0.9*fE/cos(θ) = [780607; 4676781; 5411736; 780607; 4676781; 5411736; 780607]
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