N := 3
c := 3*10^8
f1 := 791*10^6
f2 := 821*10^6
h1 := 10 + 5*log(N) = 12.3856
P1 := 5 + (N - 1)*2 = 9
G1 := 10 + (N - 1) = 12
r := (1 + 3*log(N))*1000 = 2431.36
D1 := 1
h1 := 12.4
r := 2.4*10^3
D2 := 10^(G1/10) = 15.8489
λ1 := c/f1
λ2 := c/f2
λ1 = 0.379267
λ2 = 0.365408
P2(R[n], λ1)/P2(r, λ1)
P2(R, λ0) := P1*D1*D2*λ0^2/(4*π*R)^2
P2(r, λ1) = 2.25574e-8
P2(r, λ2) = 2.0939e-8
n := 1 .. 100
R[n] := sqrt(r^2 + (4*n - h1)^2)
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i := sqrt(-1)
k(λ) := 2*π/λ
E(h, λ) := sqrt(60*P1*D2)/sqrt(r^2 + (h - h1)^2)*e^(-i*k(λ)*r)
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ε := 2.6
Θ(h) := atan(r/(h1 + h))
Rв(h) := |(ε*cos(Θ(h)) - sqrt(ε - sin(Θ(h))^2))/(ε*cos(Θ(h)) + sqrt(ε - sin(Θ(h))^2))|
E2(h, λ) := sqrt(60*P1*D2)/sqrt(r^2 + (h - h1)^2)*sqrt(1 + Rв(h)^2 + 2*Rв(h)*cos(4*π*h1/λ*cos(Θ(h))))*e^(-i*k(λ)*r)/1
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