V1(θ) := (2 + 2*cos(15*4/8*π*cos(θ) + π))^(1/2)
ε := 3
R(θ) := (cos(θ) - sqrt(ε - sin(θ)^2))/(cos(θ) + sqrt(ε - sin(θ)^2))
V11 := (2 + 2*cos(15*4/8*π*cos(0) + π))^(1/2) = 1.41421
R0 := (cos(0) - sqrt(ε))/(cos(0) + sqrt(ε)) = -0.267949
z := [
    0, 6;
    5, 11;
    10, 15;
    15, 24;
    20, 26;
    25, 30;
    30, 24;
    35, 11;
    40, 24;
    45, 56;
    50, 77;
    55, 30;
    60, 14;
    65, 70;
    70, 93;
    75, 14;
    80, 24;
    85, 92;
    90, 12
]
V2(θ) := (1 + |R(θ)|^2 + 2*|R(θ)|*cos(15*4/8*π*cos(θ) + π))^(1/2)
V22 := (1 + R0^2 + 2*|R0|*cos(15*4/8*π*cos(0) + π))^(1/2) = 1.03528
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Vmax := 1 + |R0| = 1.26795
x := [
    0, 6;
    5, 9;
    10, 12;
    15, 14;
    20, 16;
    25, 21;
    30, 30;
    35, 26;
    40, 20;
    45, 32;
    50, 58;
    55, 45;
    60, 26;
    65, 70;
    70, 66;
    75, 27;
    80, 58;
    85, 74;
    90, 15
]
Vmin := 1 - |R0| = 0.732051
n := 0
θmax := acos((2*n + 1)/(4*1.875))*180/π = 82.3377
# ░░▄███████▀▀▀▀▀▀███████▄ ░▐████▀▒▒▒▒▒▒▒▒▒▒▒▀██████▄ ░███▀▒▒▒▒▒▒▒▒▒▒▒▒▒▒▒▀█████ ░▐██▒▒▒▒▒▒▒▒▒▒▒▒▒▒▒▒▒▒████▌ ░▐█▌▒▒▒▒▒▒▒▒▒▒▒▒▒▒▒▒▒████▌ ░░█▒▄▀▀▀▀▀▄▒▒▄▀▀▀▀▀▄▒▐███▌ ░░░▐░░░▄▄░░▌▐░░░▄▄░░▌▐███▌ ░▄▀▌░░░▀▀░░▌▐░░░▀▀░░▌▒▀▒█▌ ░▌▒▀▄░░░░▄▀▒▒▀▄░░░▄▀▒▒▄▀▒▌ ░▀▄▐▒▀▀▀▀▒▒▒▒▒▒▀▀▀▒▒▒▒▒▒█ ░░░▀▌▒▄██▄▄▄▄████▄▒▒▒▒█▀ ░░░░▄██████████████▒▒▐▌ ░░░▀███▀▀████▀█████▀▒▌ ░░░░░▌▒▒▒▄▒▒▒▄▒▒▒▒▒▒▐ ░░░░░▌▒▒▒▒▀▀▀▒▒▒▒▒▒▒▐
# ░░▄███████▀▀▀▀▀▀███████▄ ░▐████▀▒ЗАПУСКАЕМ▒▀██████▄ ░███▀▒▒▒▒▒ДЯДЮ▒▒▒▒▒▒▀█████ ░▐██▒▒▒▒▒▒БОГДАНА▒▒▒▒▒████▌ ░▐█▌▒▒▒▒▒▒▒▒▒▒▒▒▒▒▒▒▒████▌ ░░█▒▄▀▀▀▀▀▄▒▒▄▀▀▀▀▀▄▒▐███▌ ░░░▐░░░▄▄░░▌▐░░░▄▄░░▌▐███▌ ░▄▀▌░░░▀▀░░▌▐░░░▀▀░░▌▒▀▒█▌ ░▌▒▀▄░░░░▄▀▒▒▀▄░░░▄▀▒▒▄▀▒▌ ░▀▄▐▒▀▀▀▀▒▒▒▒▒▒▀▀▀▒▒▒▒▒▒█ ░░░▀▌▒▄██▄▄▄▄████▄▒▒▒▒█▀ ░░░░▄██████████████▒▒▐▌ ░░░▀███▀▀████▀█████▀▒▌ ░░░░░▌▒▒▒▄▒▒▒▄▒▒▒▒▒▒▐ ░░░░░▌▒▒▒▒▀▀▀▒▒▒▒▒▒▒▐
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θmin := acos(n/(2*1.875))*180/π = 90
h2
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# ░░▄███████▀▀▀▀▀▀███████▄ ░▐████▀▒▒▒▒▒▒▒▒▒▒▒▀██████▄ ░███▀▒▒▒▒▒▒▒▒▒▒▒▒▒▒▒▀█████ ░▐██▒▒▒▒▒▒▒▒▒▒▒▒▒▒▒▒▒▒████▌ ░▐█▌▒▒▒▒▒▒▒▒▒▒▒▒▒▒▒▒▒████▌ ░░█▒▒▒▒▒▄▀▀▀▀▀▀▄▒▒▒▒▒▐███▌ ░░▐▒▒▒▒▐░░░▄▄░░░▌▒▒▒▒▐███▌ ░▄▀▌▒▒▒▐░░░▀▀░░░▌▒▒▒▒▒▀▒█▌ ░▌▒▀▄▒▒▒▀▄▒░░░▄▀▒▒▒▒▒▒▄▀▒▌ ░▀▄▐▒▒▒▒▒▒▀▀▀▀▒▒▒▒▒▒▒▒▒▒█ ░░░▀▌▒▄██▄▄▄▄████▄▒▒▒▒█▀ ░░░░▄██████████████▒▒▐▌ ░░░▀███▀▀████▀█████▀▒▌ ░░░░░▌▒▒▒▄▒▒▒▄▒▒▒▒▒▒▐ ░░░░░▌▒▒▒▒▀▀▀▒▒▒▒▒▒▒▐
# ░░▄███████▀▀▀▀▀▀███████▄ ░▐████▀▒ЗАПУСКАЕМ▒▀██████▄ ░███▀▒▒▒▒▒ДЯДЮ▒▒▒▒▒▒▀█████ ░▐██▒▒▒▒▒БОГДАНА▒▒▒▒▒▒████▌ ░▐█▌▒▒▒▒▒▒▒▒▒▒▒▒▒▒▒▒▒████▌ ░░█▒▒▒▒▒▄▀▀▀▀▀▀▄▒▒▒▒▒▐███▌ ░░▐▒▒▒▒▐░░░▄▄░░░▌▒▒▒▒▐███▌ ░▄▀▌▒▒▒▐░░░▀▀░░░▌▒▒▒▒▒▀▒█▌ ░▌▒▀▄▒▒▒▀▄▒░░░▄▀▒▒▒▒▒▒▄▀▒▌ ░▀▄▐▒▒▒▒▒▒▀▀▀▀▒▒▒▒▒▒▒▒▒▒█ ░░░▀▌▒▄██▄▄▄▄████▄▒▒▒▒█▀ ░░░░▄██████████████▒▒▐▌ ░░░▀███▀▀████▀█████▀▒▌ ░░░░░▌▒▒▒▄▒▒▒▄▒▒▒▒▒▒▐ ░░░░░▌▒▒▒▒▀▀▀▒▒▒▒▒▒▒▐
λ := 3.2
R := 50
h_1 := 15/8*λ = 6
h2 := 0.1*λ*R/(π*h_1) = 0.848826
V(h_2) := 4*π*h_1*h_2/(R*λ)
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z1 := [30, 73; 32, 56; 34, 59; 36, 43; 38, 52; 40, 35; 42, 45; 44, 31; 46, 43; 48, 33; 50, 38]
x1 := [30, 49; 32, 39; 34, 42; 36, 29; 38, 34; 40, 21; 42, 25; 44, 21; 46, 21; 48, 20; 50, 16]
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h_dop ≤ λ/(8*cos(θ))
h_dop1 := 1.5
θ1 := acos(λ/(8*h_dop1))*180/π = 74.534
h_dop2 := 2.5
θ2 := acos(λ/(8*h_dop2))*180/π = 80.7931
λ := 0.032
σ := 10^-2
ε := 5
Ex1/E_z1 == e^(j*ψ/2)/nthroot(ε^2 + (60*σ*λ)^2, 4)
E_x2/E_z2 == e^(j*ψ)/sqrt(ε^2 + (60*σ*λ)^2)
# E_x1/E_z1 | E_x2/E_z2
ψ := atan(60*σ*λ/ε) = 0.00383998
ψ/2 = 0.00191999
1/nthroot(ε^2 + (60*σ*λ)^2, 4) = 0.447212
1/sqrt(ε^2 + (60*σ*λ)^2) = 0.199999
Ex1/E_z1 == 0.447*e^(j*1.92*10^-3)
E_x2/E_z2 == 0.2*e^(j*3.84*10^-3)
ξ_1 := atan(nthroot(ε^2 + (60*σ*λ)^2, 4))*180/π = 65.9052
ξ_2 := 90 - ξ_1 = 24.0948
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