h(f) := 0
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N(F) := (F/9)^2
conj(N(1.3*10^6)) = 2.08642e10
N(3*10^6) = 1.11111e11
N(3.8*10^6) = 1.78272e11
h := [120; 250; 300]
N_e := [N(1.3*10^6); N(3*10^6); N(3.8*10^6)]
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fE := 3.8*10^6
θE := atan(350/(2*120))
fE := 0.9*fE/cos(θE) = 6047442
θE := θE*180/π = 55.561
fF2 := 3.8*10^6
θF := atan(700/(2*300))
fF := 0.9*fF2/cos(θF) = 5255140
θF := θF*180/π = 49.3987
fE := 1.3
fF1 := 3
fF2 := 3.8
hE := 120
hF1 := 250
hF2 := 300
θE := acos(1.3/10) = 1.44043
θF1 := acos(3/10) = 1.2661
θF2 := acos(3.8/10) = 1.181
RE := 2*120*tan(θE) = 1830.49
RF1 := 2*250*tan(θF1) = 1589.9
RF2 := 2*300*tan(θF2) = 1460.5
