# zadanie nomer 1
λ := 3.2
n := 1
R10 := [30; 35; 40; 45; 50; 55; 60; 65; 70]
R_n(R1_0) := sqrt(R1_0*(100 - R1_0)*n*λ/100)
Rn := [17.3; 17.5; 18; 18.9; 19.2; 18.4; 17.7; 16.7; 16.7]
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# zadanie nomer 2
R1_0 := 35
R2_0 := 100 - R1_0 = 65
n := 0 .. 3
R_n(n) := sqrt(R1_0*R2_0*n*λ/100)
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R_n(1) = 8.53229
R_n(2) = 12.0665
Rp := [8.5; 12.1; 14.8]
Re := [17.8; 25; 30]
R_n(3) = 14.7784
Rp/max(Rp) = [0.574324; 0.817568; 1]
Re/max(Re) = [0.593333; 0.833333; 1]
# zadanie nomer 3
d := [-10; -8; -6; -4; -2; 0; 2; 4; 6; 8; 10]
sqrt(2)*d/8.937 = [-1.58243; -1.26594; -0.949455; -0.63297; -0.316485; 0; 0.316485; 0.63297; 0.949455; 1.26594; 1.58243]
V := [1.0; 1.15; 1.1; 0.88; 0.65; 0.5; 0.4; 0.3; 0.22; 0.18; 0.15]
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h := [
    -20; -19; -18; -17; -16; -15; -14; -13; -12; -11
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]
E := [
    250; 260; 290; 250; 240; 230; 240; 200; 200; 190
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]
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E2 := [0; 40; 100; 250; 390; 280; 320; 300; 280; 300]
R0 := [0; 5; 10; 15; 20; 25; 30; 35; 40; 50]
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