γ_1(θ) := 1/π*(θ - sin(θ)*cos(θ))
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U_bn := 0.6
θ(U_bm, U_b0) := acos((U_bn - U_b0)/U_bm)
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S := 2
I_k1(U_bm, U_b0, U_bn) := S*U_bm*(1/π*(acos((U_bn - U_b0)/U_bm) - sin(acos((U_bn - U_b0)/U_bm))*cos(acos((U_bn - U_b0)/U_bm))))
I_k2(U_bm, U_b0, U_bn) :=
    (S*U_bm) if U_bm ≤ U_b0 - U_bn
    (S*U_bm*(1/π*(acos((U_bn - U_b0)/U_bm) - sin(acos((U_bn - U_b0)/U_bm))*cos(acos((U_bn - U_b0)/U_bm))))) if U_bm > U_b0 - U_bn
I_k2appr(U_bm) := S/2*(U_bm - 0.254649)
I_k1appr(U_bm) := S/2*(U_bm + 0.254649)
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(1/(2*γ_1(acos((0.6 - 0.4)/100000))) - 1)*100000 = 0.254649
f(x) := |x - x/2/γ_1(acos((0.6 - 0.4)/x))|
f(1) = 0.33858
f(10) = 0.261284
f(100) = 0.255298
f(1000) = 0.254713
f(10000) = 0.254654
acos((0.6 - 0.4)/10)*180/π = 88.854
f(100000) = 0.254649
I_k1(100, 0.4, 0.6) = 99.7454
I_k1(100, 0.6, 0.6) = 100
acos((0.6 - 0.6)/1000)*180/π = 90
γ_1(acos((0.6 - 0.4)/100)) = 0.498727
89*π/180 = 1.55334
I_k1(10, 0.6, 0.6) - I_k1(10, 0.4, 0.6) = 0.254631
γ_1(acos((0.6 - 0.6)/100)) = 0.5
I_k1(10000, 0.8, 0.6) - I_k1(10000, 0.6, 0.6) = 0.254648
γ_1(acos((0.6 - 0.8)/100)) = 0.501273
r(x) := I_k1(x, 0.4, 0.6) - I_k2appr(x)
γ_1(89.885*π/180) = 0.498722
r(1000000) = 1.09128e-6
U_bm1 := 100/(2*0.498722) = 100.256
f(x) := x*|1 - 1/(2*γ_1(acos((0.6 - 0.4)/x)))|
f(1) = 0.33858
f(10) = 0.261284
f(100) = 0.255298
f(1000) = 0.254713
f(10000) = 0.254654
f(100000) = 0.254649
