F := [10; 8; 6; 5; 4.5; 4; 3.5; 3; 2.5; 2]
Umax := [1.05; 1.09; 1.15; 1.22; 1.26; 1.28; 1.34; 1.4; 1.44; 1.5]
Umin := [0.67; 0.62; 0.54; 0.5; 0.46; 0.43; 0.39; 0.35; 0.27; 0.22]
Q := 10
fr := 46.89
Π := fr/8 = 5.86125
M := (Umax - Umin)/(Umax + Umin) = [0.22093; 0.274854; 0.360947; 0.418605; 0.465116; 0.497076; 0.549133; 0.6; 0.684211; 0.744186]
M1(F) := 1/sqrt(1 + (2*Q*F/fr)^2)
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Um := (Umax + Umin)/2 = [0.86; 0.855; 0.845; 0.86; 0.86; 0.855; 0.865; 0.875; 0.855; 0.86]
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U_m := 1
ω := 10^5
M := 1
Ω := 500
U(t) := U_m*(1 + M*cos(Ω*t))*cos(ω*t)
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Q := 80
f := 130*10^3
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