V := [2.2; 3.2; 4.1; 4.9; 6; 6.4; 6.4; 6.2; 5.9; 5.6]
Um := [0.1; 0.15; 0.2; 0.25; 0.3; 0.4; 0.5; 1; 1.5; 2]
u0 := 0.6  # В
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Um1 := [0.05; 0.1; 0.15; 0.2; 0.25; 0.3; 0.4; 0.5; 1; 1.5]
V1 := [1.27; 2.54; 3.8; 5.06; 6.1; 6.3; 6.35; 6.37; 6.1; 5.8]
u0 := 0.8  # В
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u0 := 0.5
Um2 := [0.05; 0.1; 0.15; 0.2; 0.25; 0.3; 0.35; 0.4; 0.5; 1]
V2 := [0.9; 1.6; 2.35; 3; 3.6; 4.2; 4.8; 5.8; 6.4; 6.2]
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