f_p := 220*10^3
f_0 := f_p
j := sqrt(-1)
Q := 80
A := 1.9
k_p := 100
Δφ_p2 := -90 deg = -1.5708
Δφ_p1 := 180 deg = 3.14159
ω_p := 2*π*f_p
ω_0 := 2*π*f_0
φ_0 := 0 deg
ζ(ω) := Q*(ω/ω_p - ω_p/ω)
K_p1 := k_p*e^(j*Δφ_p1) = -100
K_p2 := k_p*e^(j*Δφ_p2) = -100i
K_1(ω) := K_p1/(1 + j*ζ(ω))
K_2(ω) := K_p2*(1 + A^2)/((1 + j*ζ(ω))^2 + A^2)
# Расчет параметров одноконтурного усилителя
Π_f1 := f_p/Q = 2750  # Полоса пропускания
T_гр1 := 2*Q/ω_p = 0.000115749  # Время группового запаздывания
# Расчет параметров двухконтурного усилителя
Π_f2 := f_p/Q*sqrt((1 + A)^2 - 2) = 6962.44  # Полоса пропускания
T_гр2 := 2*Q/ω_p*2/(1 + A^2) = 5.02165e-5  # Время группового запаздывания
ζ_g(f) := Q*(f/f_p - f_p/f)
f_p + Π_f1/2 = 221375
K_1f(f) := 100/(1 + j*ζ_g(f))
f_p - Π_f1/2 = 218625
K_2f(f) := 100*(1 + A^2)/((1 + j*ζ_g(f))^2 + A^2)
K(f) := 100/sqrt(1 + Q^2*((f/f_p)^2 - 2 + (f_p/f)^2))
f_p + Π_f2/2 = 223481
arg1(f) := (arg(K_1f(f)) + Δφ_p1)/deg
arg2(f) := (arg(K_2f(f)) + Δφ_p2)/deg
f_p - Π_f2/2 = 216519
# Семейство АЧХ
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# Семейство ФЧХ
Π_f2 = 6962.44
F := Π_f2/5 = 1392.49
Π_f1 = 2750
F := 1000
U_0 := 100*10^-6
Ω := 2*π*F
# Часть 2
M_1 := 0.5
M_2 := 0.4
M_3 := 0
Φ_1 := 25 deg
Φ_2 := 80 deg
Φ_3 := 0 deg
N_1 :=
    1 if M_1 ≠ 0
    0 otherwise
    = 1
S(f) := U_0*{
    1 if f == f_0
    M_1/2 if f == f_0 + F
    M_1/2 if f == f_0 - F
    M_2/2 if f == f_0 + 2*F
    M_2/2 if f == f_0 - 2*F
    M_3/2 if f == f_0 + 3*F
    M_3/2 if f == f_0 - 3*F
    0 otherwise
}
U_0*M_1/2 = 2.5e-5
N_2 :=
    1 if M_2 ≠ 0
    0 otherwise
    = 1
U_0*M_2/2 = 2e-5
N_3 :=
    1 if M_3 ≠ 0
    0 otherwise
    = 0
U_0*M_3/2 = 0
U_vih1(f) := |K_1f(f)|*S(f)
U_vih2(f) := |K_2f(f)|*S(f)
f_t := [N_3*(f_0 - 3*F), N_2*(f_0 - 2*F), N_1*(f_0 - F), f_0, N_1*(f_0 + F), N_2*(f_0 + 2*F), N_3*(f_0 + 3*F)] = [0, 218000, 219000, 220000, 221000, 222000, 0]
K_1t := [N_3*|K_1f(f_0 - 3*F)|, N_2*|K_1f(f_0 - 2*F)|, N_1*|K_1f(f_0 - F)|, |K_1f(f_0)|, N_1*|K_1f(f_0 + F)|, N_2*|K_1f(f_0 + 2*F)|, N_3*|K_1f(f_0 + 3*F)|] = [0, 56.4768, 80.8097, 100, 80.9369, 56.8266, 0]
K_2t := [N_3*|K_2f(f_0 - 3*F)|, N_2*|K_2f(f_0 - 2*F)|, N_1*|K_2f(f_0 - F)|, |K_2f(f_0)|, N_1*|K_2f(f_0 + F)|, N_2*|K_2f(f_0 + 2*F)|, N_3*|K_2f(f_0 + 3*F)|] = [0, 120.38, 106.433, 100, 106.376, 120.224, 0]
arg_1t := [N_3*arg1(f_0 - 3*F), N_2*arg1(f_0 - 2*F), N_1*arg1(f_0 - F), arg1(f_0), N_1*arg1(f_0 + F), N_2*arg1(f_0 + 2*F), N_3*arg1(f_0 + 3*F)] = [0, 235.614, 216.09, 180, 144.034, 124.629, 0]
arg_2t := [N_3*arg2(f_0 - 3*F), N_2*arg2(f_0 - 2*F), N_1*arg2(f_0 - F), arg2(f_0), N_1*arg2(f_0 + F), N_2*arg2(f_0 + 2*F), N_3*arg2(f_0 + 3*F)] = [0, -40.2593, -70.3312, -90, -109.565, -139.047, 0]
U_vih11 := [N_3*U_vih1(f_0 - 3*F), N_2*U_vih1(f_0 - 2*F), N_1*U_vih1(f_0 - F), U_vih1(f_0), N_1*U_vih1(f_0 + F), N_2*U_vih1(f_0 + 2*F), N_3*U_vih1(f_0 + 3*F)] = [0, 0.00112954, 0.00202024, 0.01, 0.00202342, 0.00113653, 0]
U_vih22 := [N_3*U_vih2(f_0 - 3*F), N_2*U_vih2(f_0 - 2*F), N_1*U_vih2(f_0 - F), U_vih2(f_0), N_1*U_vih2(f_0 + F), N_2*U_vih2(f_0 + 2*F), N_3*U_vih2(f_0 + 3*F)] = [0, 0.00240759, 0.00266082, 0.01, 0.0026594, 0.00240448, 0]
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|K_1f(f_0 + F)| = 80.9369
|K_1f(f_0 + 2*F)| = 56.8266
|K_1f(f_0 + 3*F)| = 41.8982
|K_2f(f_0 + F)| = 106.376
|K_2f(f_0 + 2*F)| = 120.224
|K_2f(f_0 + 3*F)| = 106.34
M_vih1 := [M_1*|K_1f(f_0 + F)|/|K_1f(f_0)|, M_2*|K_1f(f_0 + 2*F)|/|K_1f(f_0)|, M_3*|K_1f(f_0 + 3*F)|/|K_1f(f_0)|] = [0.404685, 0.227306, 0]
M_vih2 := [M_1*|K_2f(f_0 + F)|/|K_2f(f_0)|, M_2*|K_2f(f_0 + 2*F)|/|K_2f(f_0)|, M_3*|K_2f(f_0 + 3*F)|/|K_2f(f_0)|] = [0.53188, 0.480895, 0]
φ_n := [-Φ_3, -Φ_2, -Φ_1, 0, Φ_1, Φ_2, Φ_3]/deg = [0, -80, -25, 0, 25, 80, 0]
ψ_1 := arg_1t + φ_n = [0, 155.614, 191.09, 180, 169.034, 204.629, 0]
ψ_2 := arg_2t + φ_n = [0, -120.259, -95.3312, -90, -84.5651, -59.0466, 0]
ψ_1vih1 := ψ_1 - Δφ_p1/deg = [-180, -24.3862, 11.0895, 0, -10.9657, 24.6294, -180]
ψ_2vih2 := ψ_2 - Δφ_p2/deg = [90, -30.2593, -5.33119, 0, 5.4349, 30.9534, 90]
M_vih1[:, 0]/2*U_0*100 = [0.00202342]
f_0 := 5*10^3
ω_0 := 2*π*f_0
u_огиб_идеал(t) := k_p*U_0*(1 + M_1*cos(Ω*t + Φ_1) + M_2*cos(2*Ω*t + Φ_2) + M_3*cos(3*Ω*t + Φ_3))
u_огиб_реал1(t) := k_p*U_0*(1 + M_vih1[:, 0]*cos(Ω*t + ψ_1vih1[:, 4]*deg) + M_vih1[:, 1]*cos(2*Ω*t + ψ_1vih1[:, 5]*deg) + M_vih1[:, 2]*cos(3*Ω*t + ψ_1vih1[:, 6]*deg))
u_огиб_реал2(t) := k_p*U_0*(1 + M_vih2[:, 0]*cos(Ω*t + ψ_2vih2[:, 4]*deg) + M_vih2[:, 1]*cos(2*Ω*t + ψ_2vih2[:, 5]*deg) + M_vih2[:, 2]*cos(3*Ω*t + ψ_2vih2[:, 6]*deg))
U_нес(t, φ) := cos(ω_0*t + φ)
U_мод(t) := 1 + M_1*cos(Ω*t + Φ_1) + M_2*cos(2*Ω*t + Φ_2) + M_3*cos(3*Ω*t + Φ_3)
U_вх(t, φ) := U_0*U_мод(t)*U_нес(t, φ)
U_вых1(t, φ) := u_огиб_реал1(t)*U_нес(t, φ)
U_вых2(t, φ) := u_огиб_реал2(t)*U_нес(t, φ)
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