f_p := 400*10^3
f_0 := f_p
j := sqrt(-1)
Q := 50
A := 1.6
k_p := 100
Δφ_p2 := -90 deg = -1.5708
Δφ_p1 := 180 deg = 3.14159
ω_p := 2*π*f_p
ω_0 := 2*π*f_0
φ_0 := 0 deg
ζ(ω) := Q*(ω/ω_p - ω_p/ω)
K_p1 := k_p*e^(j*Δφ_p1) = -100
K_p2 := k_p*e^(j*Δφ_p2) = -100i
K_1(ω) := K_p1/(1 + j*ζ(ω))
K_2(ω) := K_p2*(1 + A^2)/((1 + j*ζ(ω))^2 + A^2)
# Расчет параметров одноконтурного усилителя
Π_f1 := f_p/Q = 8000  # Полоса пропускания
T_гр1 := 2*Q/ω_p = 3.97887e-5  # Время группового запаздывания
# Расчет параметров двухконтурного усилителя
Π_f2 := f_p/Q*sqrt((1 + A)^2 - 2) = 17453.9  # Полоса пропускания
ΔF := 15
T_гр2 := 2*Q/ω_p*2/(1 + A^2) = 2.23532e-5  # Время группового запаздывания
K_g(f) := 100*(1 + A^2)/|(1 + j*ζ_g(f))^2 + A^2|  # error: Эта переменная не определена.
ζ_g(f) := Q*(f/f_p - f_p/f)
f_p + Π_f1/2 = 404000
K_1f(f) := 100/(1 + j*ζ_g(f))
f_p - Π_f1/2 = 396000
K_2f(f) := 100*(1 + A^2)/((1 + j*ζ_g(f))^2 + A^2)
f_p + Π_f2/2 = 408727
K_g(f) := 100*(1 + A^2)/sqrt((1 + A^2 - ζ_g(f)^2)^2 + (2*ζ_g(f))^2)
arg1(f) := (arg(K_1f(f)) + Δφ_p1)/deg
arg2(f) := (arg(K_2f(f)) + Δφ_p2)/deg
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f_p - Π_f2/2 = 391273
# Семейство АЧХ
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# Семейство ФЧХ
# Для М_2 | Для М_3
Π_f2 = 17453.9
F := Π_f2/5 = 3490.79
F := Π_f2/8 = 2181.74
Π_f1 = 8000
F := 3000
U_0 := 100*10^-6
Ω := 2*π*F
# Часть 2
ζ_g(f_0 - 2*F) = -1.51142
M_1 := 0.5
M_2 := 0.3
M_3 := 0
Φ_1 := 90 deg
Φ_2 := -40 deg
Φ_3 := 0 deg
N_1 :=
    1 if M_1 ≠ 0
    0 otherwise
    = 1
S(f) := U_0*{
    1 if f == f_0
    M_1/2 if f == f_0 + F
    M_1/2 if f == f_0 - F
    M_2/2 if f == f_0 + 2*F
    M_2/2 if f == f_0 - 2*F
    M_3/2 if f == f_0 + 3*F
    M_3/2 if f == f_0 - 3*F
    0 otherwise
}
U_0*M_1/2 = 2.5e-5
N_2 :=
    1 if M_2 ≠ 0
    0 otherwise
    = 1
U_0*M_2/2 = 1.5e-5
N_3 :=
    1 if M_3 ≠ 0
    0 otherwise
    = 0
U_0*M_3/2 = 0
atan(Q*((f_0 - 2*F)/f_p - f_p/(f_0 - 2*F)))/deg = -56.5102
atan(2*ζ_g(f_0 - 2*F)/(1 + A^2 - ζ_g(f_0 - 2*F)^2))/deg = -67.1208
U_vih1(f) := |K_1f(f)|*S(f)
U_vih2(f) := |K_2f(f)|*S(f)
180 - 36.767 = 143.233
f_t := [N_3*(f_0 - 3*F), N_2*(f_0 - 2*F), N_1*(f_0 - F), f_0, N_1*(f_0 + F), N_2*(f_0 + 2*F), N_3*(f_0 + 3*F)] = [0, 394000, 397000, 400000, 403000, 406000, 0]
K_1t := [N_3*|K_1f(f_0 - 3*F)|, N_2*|K_1f(f_0 - 2*F)|, N_1*|K_1f(f_0 - F)|, |K_1f(f_0)|, N_1*|K_1f(f_0 + F)|, N_2*|K_1f(f_0 + 2*F)|, N_3*|K_1f(f_0 + 3*F)|] = [0, 55.1788, 79.8912, 100, 80.1072, 55.7549, 0]
K_2t := [N_3*|K_2f(f_0 - 3*F)|, N_2*|K_2f(f_0 - 2*F)|, N_1*|K_2f(f_0 - F)|, |K_2f(f_0)|, N_1*|K_2f(f_0 + F)|, N_2*|K_2f(f_0 + 2*F)|, N_3*|K_2f(f_0 + 3*F)|] = [0, 108.505, 106.25, 100, 106.17, 108.978, 0]
arg_1t := [N_3*arg1(f_0 - 3*F), N_2*arg1(f_0 - 2*F), N_1*arg1(f_0 - F), arg1(f_0), N_1*arg1(f_0 + F), N_2*arg1(f_0 + 2*F), N_3*arg1(f_0 + 3*F)] = [0, 236.51, 216.974, 180, 143.233, 123.886, 0]
arg_2t := [N_3*arg2(f_0 - 3*F), N_2*arg2(f_0 - 2*F), N_1*arg2(f_0 - F), arg2(f_0), N_1*arg2(f_0 + F), N_2*arg2(f_0 + 2*F), N_3*arg2(f_0 + 3*F)] = [0, -22.8792, -63.2966, -90, -116.467, -155.723, 0]
U_vih11 := [N_3*U_vih1(f_0 - 3*F), N_2*U_vih1(f_0 - 2*F), N_1*U_vih1(f_0 - F), U_vih1(f_0), N_1*U_vih1(f_0 + F), N_2*U_vih1(f_0 + 2*F), N_3*U_vih1(f_0 + 3*F)] = [0, 0.000827682, 0.00199728, 0.01, 0.00200268, 0.000836324, 0]
U_vih22 := [N_3*U_vih2(f_0 - 3*F), N_2*U_vih2(f_0 - 2*F), N_1*U_vih2(f_0 - F), U_vih2(f_0), N_1*U_vih2(f_0 + F), N_2*U_vih2(f_0 + 2*F), N_3*U_vih2(f_0 + 3*F)] = [0, 0.00162757, 0.00265624, 0.01, 0.00265425, 0.00163467, 0]
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|K_1f(f_0 + F)| = 80.1072
|K_1f(f_0 + 2*F)| = 55.7549
|K_1f(f_0 + 3*F)| = 40.9901
|K_2f(f_0 + F)| = 106.17
|K_2f(f_0 + 2*F)| = 108.978
|K_2f(f_0 + 3*F)| = 76.3454
M_vih1 := [M_1*|K_1f(f_0 + F)|/|K_1f(f_0)|, M_2*|K_1f(f_0 + 2*F)|/|K_1f(f_0)|, M_3*|K_1f(f_0 + 3*F)|/|K_1f(f_0)|] = [0.400536, 0.167265, 0]
M_vih2 := [M_1*|K_2f(f_0 + F)|/|K_2f(f_0)|, M_2*|K_2f(f_0 + 2*F)|/|K_2f(f_0)|, M_3*|K_2f(f_0 + 3*F)|/|K_2f(f_0)|] = [0.53085, 0.326933, 0]
φ_n := [-Φ_3, -Φ_2, -Φ_1, 0, Φ_1, Φ_2, Φ_3]/deg = [0, 40, -90, 0, 90, -40, 0]
ψ_1 := arg_1t + φ_n = [0, 276.51, 126.974, 180, 233.233, 83.8865, 0]
ψ_2 := arg_2t + φ_n = [0, 17.1208, -153.297, -90, -26.4669, -195.723, 0]
ψ_1vih1 := ψ_1 - Δφ_p1/deg = [-180, 96.5102, -53.0263, 0, 53.2326, -96.1135, -180]
ψ_2vih2 := ψ_2 - Δφ_p2/deg = [90, 107.121, -63.2966, 0, 63.5331, -105.723, 90]
f_0 := 10*10^3
ω_0 := 2*π*f_0
u_огиб_идеал(t) := k_p*U_0*(1 + M_1*cos(Ω*t + Φ_1) + M_2*cos(2*Ω*t + Φ_2) + M_3*cos(3*Ω*t + Φ_3))
u_огиб_реал1(t) := k_p*U_0*(1 + M_vih1[:, 0]*cos(Ω*t + ψ_1vih1[:, 4]*deg) + M_vih1[:, 1]*cos(2*Ω*t + ψ_1vih1[:, 5]*deg) + M_vih1[:, 2]*cos(3*Ω*t + ψ_1vih1[:, 6]*deg))
u_огиб_реал2(t) := k_p*U_0*(1 + M_vih2[:, 0]*cos(Ω*t + ψ_2vih2[:, 4]*deg) + M_vih2[:, 1]*cos(2*Ω*t + ψ_2vih2[:, 5]*deg) + M_vih2[:, 2]*cos(3*Ω*t + ψ_2vih2[:, 6]*deg))
U_нес(t, φ) := cos(ω_0*t + φ)
U_мод(t) := 1 + M_1*cos(Ω*t + Φ_1) + M_2*cos(2*Ω*t + Φ_2) + M_3*cos(3*Ω*t + Φ_3)
U_вх(t, φ) := U_0*U_мод(t)*U_нес(t, φ)
U_вых1(t, φ) := u_огиб_реал1(t)*U_нес(t, φ)
U_вых2(t, φ) := u_огиб_реал2(t)*U_нес(t, φ)
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