f_p := 200*10^3
f_0 := f_p
Q := 110
j := sqrt(-1)
A := 1.1
k_p := 100
Δφ_p2 := 0
Δφ_p1 := 180*deg = 3.14159
ω_p := 2*π*f_p
ω_0 := 2*π*f_0
φ_0 := 0 deg
ζ(ω) := Q*(ω/ω_p - ω_p/ω)
K_p1 := k_p*e^(j*Δφ_p1) = -100
K_p2 := k_p*e^(j*Δφ_p2) = 100
K_1(ω) := K_p1/(1 + j*ζ(ω))
K_2(ω) := K_p2*(1 + A^2)/((1 + j*ζ(ω))^2 + A^2)
# Расчет параметров одноконтурного усилителя
Π_f1 := f_p/Q = 1818.18  # Полоса пропускания
T_гр1 := 2*Q/ω_p = 0.00017507  # Время группового запаздывания
# Расчет параметров двухконтурного усилителя
Π_f2 := f_p/Q*sqrt((1 + A)^2 - 2) = 2822.58  # Полоса пропускания
T_гр2 := 2*Q/ω_p*2/(1 + A^2) = 0.000158435  # Время группового запаздывания
ζ_g(f) := Q*(f/f_p - f_p/f)
K_1f(f) := 100/(1 + j*ζ_g(f))
K_2f(f) := 100*(1 + A^2)/((1 + j*ζ_g(f))^2 + A^2)
arg1(f) := (arg(K_1f(f)) + Δφ_p1)/deg
arg2(f) := (arg(K_2f(f)) + Δφ_p2)/deg
# Семейство АЧХ | Семейство ФЧХ
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Π_f2 = 2822.58
F := Π_f2/8 = 352.822
F := 300
Π_f1 = 1818.18
U_0 := 100*10^-6
Ω := 2*π*F  # Часть 2
M_1 := 0.4
M_2 := 0
M_3 := 0.5
S(f) := U_0*{
    1 if f == f_0
    M_1/2 if f == f_0 + F
    M_1/2 if f == f_0 - F
    M_2/2 if f == f_0 + 2*F
    M_2/2 if f == f_0 - 2*F
    M_3/2 if f == f_0 + 3*F
    M_3/2 if f == f_0 - 3*F
    0 otherwise
}
Φ_1 := -90 deg
Φ_2 := 0 deg
Φ_3 := 15 deg
f_0 = 200000
f_0 + F = 200300
f_0 - F = 199700
f_0 + 2*F = 200600
f_0 + 3*F = 200900
U_vih1(f) := |K_1f(f)|*S(f)
U_vih2(f) := |K_2f(f)|*S(f)
f_t := transpose([199.1, 199.7, 200, 200.3, 200.9])
|K_1f(f_0 - 3*F)| = 70.9857
|K_1f(f_0 - F)| = 94.9559
|K_1f(f_0)| = 100
|K_1f(f_0 + F)| = 94.9698
|K_1f(f_0 + 3*F)| = 71.1439
K_1t := transpose([|K_1f(f_0 - 3*F)|, |K_1f(f_0 - F)|, |K_1f(f_0)|, |K_1f(f_0 + F)|, |K_1f(f_0 + 3*F)|])
|K_2f(f_0 - 3*F)| = 94.7538
|K_2f(f_0 - F)| = 100.349
|K_2f(f_0)| = 100
|K_2f(f_0 + F)| = 100.348
|K_2f(f_0 + 3*F)| = 94.8723
K_2t := transpose([|K_2f(f_0 - 3*F)|, |K_2f(f_0 - F)|, |K_2f(f_0)|, |K_2f(f_0 + F)|, |K_2f(f_0 + 3*F)|])
arg1(f_0 - 3*F) = 224.777
arg1(f_0 - F) = 198.276
arg1(f_0) = 180
arg1(f_0 + F) = 161.75
arg1(f_0 + 3*F) = 135.352
arg_1t := transpose([arg1(f_0 - 3*F), arg1(f_0 - F), arg1(f_0), arg1(f_0 + F), arg1(f_0 + 3*F)])
arg2(f_0 - 3*F) = 58.3036
arg2(f_0 - F) = 17.4522
arg2(f_0) = 0
arg2(f_0 + F) = -17.4251
arg2(f_0 + 3*F) = -58.0038
arg_2t := transpose([arg2(f_0 - 3*F), arg2(f_0 - F), arg2(f_0), arg2(f_0 + F), arg2(f_0 + 3*F)])
U_vih1(f_0 - 3*F) = 0.00177464
U_vih1(f_0 - F) = 0.00189912
U_vih1(f_0) = 0.01
U_vih1(f_0 + F) = 0.0018994
U_vih1(f_0 + 3*F) = 0.0017786
U_vih2(f_0 - 3*F) = 0.00236884
U_vih2(f_0 - F) = 0.00200698
U_vih2(f_0) = 0.01
U_vih2(f_0 + F) = 0.00200697
U_vih2(f_0 + 3*F) = 0.00237181
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M_1vih1 := M_1*|K_1f(f_0 + F)|/|K_1f(f_0)| = 0.379879
M_1vih2 := M_1*|K_2f(f_0 + F)|/|K_2f(f_0)| = 0.401393
M_3vih1 := M_3*|K_1f(f_0 + 3*F)|/|K_1f(f_0)| = 0.35572
M_3vih2 := M_3*|K_2f(f_0 + 3*F)|/|K_2f(f_0)| = 0.474362
φ_n := transpose([-Φ_3, -Φ_1, 0, Φ_1, Φ_3])/deg = [-15; 90; 0; -90; 15]
ψ_2 := arg_2t + φ_n = [43.3036; 107.452; 0; -107.425; -43.0038]
ψ_1 := arg_1t + φ_n = [209.777; 288.276; 180; 71.7499; 150.352]
ψ_1vih1 := ψ_1 - Δφ_p1/deg = [29.7768; 108.276; 0; -108.25; -29.6478]
ψ_2vih3 := ψ_2 - Δφ_p2/deg = [43.3036; 107.452; 0; -107.425; -43.0038]
Φ_1vih1 := -108.25*deg = -1.88932
Φ_3vih1 := -29.648*deg = -0.517455
M_1vih1 = 0.379879
M_3vih1 = 0.35572
Φ_1vih2 := -107.425 deg = -1.87492
Φ_3vih2 := -43.004 deg = -0.750561
M_3vih2 = 0.474362
M_1vih2 = 0.401393
u_огиб_идеал(t) := k_p*U_0*(1 + M_1*cos(Ω*t + Φ_1) + M_3*cos(3*Ω*t + Φ_3))
f_0 := 2*10^3
ω_0 := 2*π*f_0
u_огиб_реал1(t) := k_p*U_0*(1 + M_1vih1*cos(Ω*t + Φ_1vih1) + M_3vih1*cos(3*Ω*t + Φ_3vih1))
u_огиб_реал2(t) := k_p*U_0*(1 + M_1vih2*cos(Ω*t + Φ_1vih2) + M_3vih2*cos(3*Ω*t + Φ_3vih2))
U_нес(t, φ) := cos(ω_0*t + φ)
U_мод(t) := 1 + M_1*cos(Ω*t + Φ_1) + M_2*cos(2*Ω*t + Φ_2) + M_3*cos(3*Ω*t + Φ_3)
U_вх(t, φ) := U_0*U_мод(t)*U_нес(t, φ)
U_вых1(t, φ) := u_огиб_реал1(t)*U_нес(t, φ)
U_вых2(t, φ) := u_огиб_реал2(t)*U_нес(t, φ)
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