Um := 0.6
U0 := 0.6
Tи := 0.6*10^-2
T := 3*10^-2
Ti := 0.6*10^-2
ω0 := 120*π*2/Tи
Tp := 3*10^-2
j := sqrt(-1)
w0 := 120*2*π/Ti
S_B(t) := Um*Φ(t) - 2*Um/(3*Tи)*t*Φ(t) + 2*Um/(3*Tи)*(t - Tи)*Φ(t - Tи) - Um/3*Φ(t - Tи)
w0g := w0/10
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S_P(t) := S_B(t)*cos(w0g*t)
srg2(t) := S_P(t) + S_P(t - Tp)
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Ω := 2*π/Tp = 209.44
Sk(ω) := Um - 2*Um/3*sin(ω*Ti/2)/(ω*Ti/2)*exp(-j*ω*Tи/2) - Um/3*exp(-j*ω*Tи)
10*Ω = 2094.4
Sv(ω) := Sk(ω)/(j*ω)
hts := integral(S_B(t), t = 0 .. Ti) = 0.0024
S(w) :=
    hts if w == 0
    |Sv(w)| otherwise
|Sv(1)| = 0.0024
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n := 0 .. 100
Cv(n) := 2/Tp*Sv(n*2*π/Tp)
A0 := 2/Tp*integral(S_B(t), t = 0 .. Ti) = 0.16
S2(n) :=
    A0/2 if n == 0
    |Cv(n)| otherwise
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Sr(w) := Sv(w - w0)/2 + conj(Sv(w + w0))/2
|Sr(1.5*w0)| = 2.54648e-6
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n := 0 .. 1000
w0/Ω = 600
Cr(n) :=
    2/Tp*|Sr(n*Ω)| if n ≠ 600
    0.08 otherwise
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n := 1000
i := 0 .. n
# Часть 2
U0 := 0.8
Kp := 5
Q := 60
Ti := 0.2*10^-3
Tp := 10^-3
w0 := 100*2*π/Ti
sv(t) := -U0/2*Φ(t) + 2*U0*Φ(t)*t/Ti - 2*U0/Ti*(t - Ti/2)*Φ(t - Ti/2) - U0/2*Φ(t - Ti)
w0g := w0/10
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srg(t) := sv(t)*cos(w0g*t)
srg2(t) := srg(t) + srg(t - Tp)
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a := w0/(2*Q) = 26179.9
Ue(t) := Kp*U0*(-1/2*(1 - exp(-a*t))*Φ(t) + 2/Ti*(a*t - (1 - exp(-a*t)))*Φ(t) - 2/(Ti*a)*(a*(t - Ti/2) - (1 - exp(-a*(t - Ti/2))))*Φ(t - Ti/2) + 1/2*(1 - exp(-a*(t - Ti)))*Φ(t - Ti))
Ue(t) := -U0*Kp/2*(1 - exp(-a*t))*Φ(t) + 2*U0*Kp/(Ti*a)*(a*t - (1 - exp(-a*t)))*Φ(t) - 2*U0*Kp/(Ti*a)*(a*(t - Ti/2) - (1 - exp(-a*(t - Ti/2))))*Φ(t - Ti/2) - 1*U0*Kp/2*(1 - exp(-a*(t - Ti)))*Φ(t - Ti)
Ue2(t) := Ue(t)
Ue3(t) := Re(Ue(t)*exp(1i*w0*t))
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erg(t) := Ue(t)*cos(w0g*t)
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srg2(t) := srg(t) + srg(t - Tp)
erg2(t) := erg(t) + erg(t - Tp)
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Sve2(w) := Kp*a/(a + 1i*w)*(-U0/(2*1i*w) - 2*U0/Ti*1/w^2 + 2*U0/Ti*1/w^2*exp(-1i*w*Ti/2) - U0/(2*1i*w)*exp(-1i*w*Ti))
hts := integral(sv(t), t = 0 .. Ti) = 4e-5
htse2 := integral(Sve2(t), t = 0 .. Ti) = 4.90656e-8 - 5.03756e-16i
S(w) :=
    hts if w == 0
    |Sv(w)| otherwise
Se2(w) :=
    htse2 if w == 0
    |Sve2(w)| otherwise
|Sv(1)| = 0.0024
|Sve2(1)| = 0.0002
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Sr(w) := Sv(w - w0)/2 + conj(Sv(w + w0))/2
Sre2(w) := Sve2(w - w0)/2 + conj(Sve2(w + w0))/2
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|Sr(1.5*w0)| = 1.01859e-7
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Cr2(n) :=
    2/Tp*|Sre2(n*Ω)| if n ≠ 500
    0.02 otherwise
w0/Ω = 15000
Cr(n) :=
    2/Tp*|Sr(n*Ω)| if n ≠ 500
    0.02 otherwise
n := 0 .. 1000
A0 := 2/(2*Tp)*integral(Sve2(t), t = 0 .. Ti) = 4.90656e-5 - 5.03756e-13i
htse2/2 = 2.45328e-8 - 2.51878e-16i
htse2 := integral(Sve2(t), t = 0 .. Ti) = 4.90656e-8 - 5.03756e-16i
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2/Tp*|htse2/2| = 4.90656e-5
