Um := 0.6
Tи := 0.6*10^-2
j := sqrt(-1)
Ω := 2*π/T
T := 3*10^-2
ω0 := 120*π*2/Tи
σ(t) :=
    0 if t < 0
    1/2 if t == 0
    1 if t > 0
U1(t) :=
    Um*σ(t) - 2*Um/(3*Tи)*t*σ(t) + 2*Um/(3*Tи)*(t - Tи)*σ(t - Tи) - Um/3*σ(t - Tи) if |t| ≤ Tи
    0 if |t| > Tи
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Um := 0.6
Tи := 0.6*10^-2
T := 3*10^-2
ω0 := 120*π*2/Tи
S_B1(ω) := Um - 2*Um/3*sin(ω*Tи/2)/(ω*Tи/2)*exp(-j*ω*Tи/2) - Um/3*exp(-j*ω*Tи/2)
S_B(ω) := S_B1(ω)/(j*ω)
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A1(ω) := 2/T*S_B(ω)
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ω0 := 120*2*π/Tи = 125664
Ω := 2*π/T
S2(ω) := 1/(2*j*(ω - ω0))*(Um - 2*Um/3*sin((ω - ω0)*Tи/2)/((ω - ω0)*Tи/2)*exp(-j*(ω - ω0)*Tи/2) - Um/3*exp(-j*(ω - ω0)*Tи/2)) + 1/(2*j*(ω + ω0))*(Um - 2*Um/3*sin((ω + ω0)*Tи/2)/((ω + ω0)*Tи/2)*exp(j*(ω + ω0)*Tи/2) - Um/3*exp(j*(ω + ω0)*Tи/2))
U(t) := Um*σ(t) - 2*Um/(3*Tи)*t*σ(t) + 2*Um/(3*Tи)*(t - Tи)*σ(t - Tи) - Um/3*σ(t - Tи)  # (1)
S5(t) := U(t)*cos(ω0/10*t)
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S6(t) := S5(t) + S5(t - 2*Tи)
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Ω := 2*π/T
n := 0 .. 1000
S_B(ω) := S2(ω) + S2(ω - ω0) + S2(ω - 2*ω0)
С(n) := 1/T*S_B(n*(2*π/T) - ω0)
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n := -100 .. 1000
S11(ω) := S_B(ω) + S_B(ω - ω0)
C1(n) := 1/T*S11(n*Ω)
A11(ω) := 2/T*S11(ω)
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