U1 := 15
U2 := 9
Rc := 300
Rn := 90000
Ict0 := 5*10^-3
In := U2/Rn = 0.0001
Ict := 0.02 - In = 0.0199
rct := 3
U2 := 9.137
U_2 := U2 + rct*(Ict - Ict0) = 9.1817
Kp := 1/Rc/(1/Rc + 1/Rn + 1/rct) = 0.00990066
U_2/U1*1/Kp = 61.8255
R_н := transpose([500, 600, 900, 1800, 3600, 9000, 90000])
U_2 := transpose([8.967, 9, 9.023, 9.058, 9.095, 9.137, 9.182])
K_ст := transpose([17, 26, 41, 52, 61, 61.5, 61.8])
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