Kp := 0.09
Ict0 := 20*10^-3
U2 := 9
Rdif := 3
Rc := 30
U1 := Rc*Ict0 + U2 = 9.6
Kct := U2/U1*1/Kp = 10.4167
Rn := 600
Rn/(Rc + Rn) = 0.952381
Kp1 := 1/Rc/(1/Rc + 1/Rn + 1/Rdif) = 0.0904977
Kct1 := U2/U1*1/Kp1 = 10.3594
