U_1 := 15
U_2 := 9
R_н := 600
I_ст0 := 10*10^-3
r_ст0 := 4.6
I_н := U_2/R_н = 0.015
R_с := (U_1 - U_2)/(I_ст0 + I_н) = 240
U_1э := R_н/(R_н + R_с)*U_1 = 10.7143
R_сэ := R_н*R_с/(R_н + R_с) = 171.429
r_ст(I_ст) := r_ст0*sqrt(I_ст0/I_ст)
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U_ст0 := U_2
r_ст == d/dI_ст(U_ст)
dU_ст == r_ст(I_ст)*dI_ст
integral(1, U_ст = U_ст0 .. U_ст) == integral(r_ст(I_ст), I_ст = I_ст0 .. I_ст)
f(I_ст) := integral(r_ст(I_ст), I_ст = I_ст0 .. I_ст)
I_ct := transpose([0, 0.5, 1, 2, 3, 4, 5, 10, 30, 50])
U := 9 + f(50*10^-3) = 9.11372
U_ct := transpose([8.908, 8.929, 8.937, 8.949, 8.958, 8.966, 8.973, 9, 9.067, 9.114])
I_ct := transpose([0, 0.8, 1.8, 3, 5, 10, 20, 40, 60])
U_2 := transpose([8.5, 8.8, 8.9, 9 - 15*10^-3, 9, 9 + 28*10^-3, 9 + 68*10^-3, 9.1, 9.2])
I_ng(U_1э, U_2) := (U_1э - U_2)/R_сэ*10^3
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U2 := transpose([0, 8.71, 8.81, 9, 9 + 0.028, 9 + 0.068, 9.1, 9.11])
U1Э := transpose([0, 9, 9.2, 10, 11, 13, 15, 25])
U1 := U1Э*1.4
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R_cэ := R_сэ
Icт := transpose([0, 0, 0.5*10^-3, (9 - 8.71)/R_сэ, (9.2 - 8.81)/R_cэ, (10 - 9)/R_cэ, (11 - (9 + 0.028))/R_cэ, (13 - (9 + 0.068))/R_cэ, (15 - 9.1)/R_cэ, (25 - 9.11)/R_cэ])*10^3
U1 := transpose([0, 8.5, 12.5, 9*3/2, 9.2*3/2, 10*3/2, 11*3/2, 13*3/2, 15*3/2, 25*3/2])  # (В)
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U_1 := 15
U_2 := 9
R_н := 600
I_ст0 := 10*10^-3
I_н := U_2/R_н = 0.015
r_ст0 := 4.6
R_с := (U_1 - U_2)/(I_ст0 + I_н) = 240
U_1э := R_н/(R_н + R_с)*U_1 = 10.7143
R_сэ := R_н*R_с/(R_н + R_с) = 171.429
r_ст(I_ст) := r_ст0*(I_ст/I_ст0)^(1/2)
G_ст(I_ст) := I_ст/U_2
K_п(I_ст) := 1/R_с/(1/R_с + 1/R_н + 1/r_ст(I_ст))
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K_ст(I_ст) := (1/r_ст(I_ст) + 1/R_н + 1/R_с)/(G_ст(I_ст) + 1/R_н + 1/R_с)
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K_ст(I_ст0) = 32.1443
η(U) := U_2*I_н/(U*(I_н + I_ст0))
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