# Домашняя работа #1 по ФПЭЦ
#
# Выполнил: Жеребин В.Р.
# Группа: ЭР-15-15
# Преподаватель: Болдырева Т.И.
U_1 := 5.6  # В  # входное напряжение
R_c := 1000  # Ом
R_n := 1000  # Ом
T_1 := 290  # К  # начальная температура
T_2 := 350  # К  # конечная
I_so := 10^-13  # А  # ток насыщения
r_d := 10  # Ом
ΔE := 1.12  # эВ
# Найти:
# 1. Uo, Io при Т1=290 и Т2=350 К (в рабочей точке)
#
# 2. график U2(U1) при Т1 и Т2
#
# 3. график U2(1/Rн) при Т1 и Т2
# Решение:
# 1. Определение Рабочей точки и значения тока и напряжения в Р.Т.
# Рассчитаем эквивалентные параметры:
U_1э := U_1*R_n/(R_n + R_c) = 2.8  # В
R_n/(R_n + R_c) = 0.5
R_cэ := R_c*R_n/(R_n + R_c) = 500  # Ом
# Получим уравнение для описания ВАХ:
U_1э - U_2 == U_Rcэ
U_1э == i_д*R_cэ + U_2
# получаем:
i_д == (U_1э - U_2)/R_cэ
# где:
U_2 == U_д + r_д*i_д
# В итоге имеем:
(i_д == i_d)
i_d == I_s*(exp(U_d/φ_t) - 1) == I_s*(exp((U_2 - r_d*i_d)/φ_t) - 1)
# Если температура меняется, то меняется Is & φ:
# Для Т1=290 К:
I_so = 1e-13  # A
φ_0 := 25*10^-3  # В
φ_T1 := φ_0  # тепловой потенциал для Т1
# Для Т2=350 К:
φ_T2 := φ_0*T_2/T_1 = 0.0301724  # В  # тепловой потенциал для Т2
I_s2 := I_so*(T_2/T_1)^3*exp(ΔE/φ_0*(1 - T_1/T_2)) = 3.80533e-10  # A
# Нашли Is & φ при разных температурах, теперь можно построить ВАХ:
i_d(T, I_s, φ, U_2) == I_s*(exp((U_2 - r_d*i_d)/φ) - 1)
# Т.к. функция обращается сама к себе, решим задачу численным методом, для этого выразим напряжение на выходе:
I[0] := 0
i := 0 .. 5000
I[i + 1] := I[i] + 0.1*10^-3
U11(I) := φ_T1*ln(I/I_so + 1) + r_d*I
U1[i] := U11(I[i])
# Построим прямую стабилизации, зная, что U_1э = 2.8и  U_1э/R_cэ = 0.0056
# Для этого можно решить уравнение линейного типа: у = ах+b
y(x) := -U_1э*10^3/R_cэ/U_1э*x + U_1э*10^3/R_cэ
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290
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U22(I) := φ_T2*ln(I/I_s2 + 1) + r_d*I
U2[i] := U22(I[i])
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350
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# Таким образом, графически определяем рабочую точку для двух графиков.
# Ответ для первого пункта:
# При Т1=290К: | При Т2=350К:
U_o1 := 1.33  # В
U_o2 := 1.1  # В
I_o1 := 5.1  # мA
I_o2 := 5.6  # мA
# 2. Зависимость выходного напряжения от входного:
# Строим несколько прямых стабилизации, при U1 от 0 до 11 В. Дабы не загромождать график, менялось значение напряжения (параметр а), и с помощью функции "маркер" определялись точки пересечения, затем заносились в таблицу. Далее строится график.
u(x, a) := -a/500*10^3/a*x + a/500*10^3
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U1э := [0; 0.5; 1; 1.5; 2; 2.8]
U1 := [0; 1; 2; 3; 4; 5.6]
g1 := [0; 0.464; 0.58; 0.616; 0.636; 0.656]
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350
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U1э = [0; 0.5; 1; 1.5; 2; 2.8]
U1 = [0; 1; 2; 3; 4; 5.6]
g2 := [0; 0.404; 0.46; 0.488; 0.508; 0.536]
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I[0] := 0
i := 0 .. 5000
I[i + 1] := I[i] + 0.1*10^-3
r_d := 0
U33(I) := φ_T1*ln(I/I_so + 1) + r_d*I
U1[i] := U33(I[i])
# Построим прямую стабилизации, зная, что U_1э = 2.8и  U_1э/R_cэ = 0.0056
# Для этого можно решить уравнение линейного типа: у = ах+b
y(x) := -U_1э*10^3/R_cэ/U_1э*x + U_1э*10^3/R_cэ
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g3 := [0; 0.456; 0.572; 0.588; 0.6; 0.61]
U1 := [0; 1; 2; 3; 4; 5.6]
g1 = [0; 0.464; 0.58; 0.616; 0.636; 0.656]
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# 3. Зависимость выходного напряжения от проводимости нагрузки (1/Rн):
# Аналогично предыдущему пункту ищем зависимость напряжения от нагрузочной проводимости, для этого меняем сопротивление нагрузки и смотрим за изменениями на графике:
U3[i] := U11(I[i])
R_n := 1000
y(x, R_n) := -1/(R_c*R_n/(R_n + R_c))*10^3*x + 7.8
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Rn := [1; 10; 20; 30; 40; 50; 100; 200; 300; 400; 500; 1000]
U_21 := [0; 0.062; 0.152; 0.228; 0.3; 0.368; 0.596; 0.648; 0.664; 0.676; 0.68; 0.688]
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