Uzi := [-3.5; -5; -6; -7; -8; -9; -10; -11; -12]
Ic := [0; 0.7; 1.8; 3; 4.5; 6.2; 7.7; 10.2; 12]
(4.5 - 1.8)/(6 - 8) = -1.35
1/((3 - 2.99)/(9 - 7)) = 200
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S := (4.5 - 1.8)/(6 - 8) = -1.35
R_н := 7000
R_i := 6
K_y := -S*R_н/(1 + R_н/R_i) = 8.09306
S := -1.75
R_i := 8
K_y := -S*R_н/(1 + R_н/R_i) = 13.984
