E_п := 5
δE_п := 0.02
ΔE_п := δE_п*E_п = 0.1
U_пульс := 0.7*10^-3
I_y1 := 5*10^-3
I_y := 100*10^-3
U_г := 1*10^-3
R_г := 500
f_н := 12*10^3
R_вх := 1.5*10^3
δU_c := 0.2
K_ст0 := δU_c/δE_п = 10
R_эн := E_п/I_y = 50
# Условия выбора транзистора:
U_кэ > U_кэmin
U_кэmin := 2
U_kmin := E_п + U_кэmin = 7
U_kmax := (1 + δU_c)/(1 - δU_c)*U_kmin = 10.5
I_kmax > I_y
I_y = 0.1
P_kmax := (U_kmax - E_п)*I_y = 0.55
# Выбираем транзистор | КТ630Д
U_бэ := 0.6
P_kmax1 := 0.8
I_kmax1 := 1
β_min := 80
β_max := 240
β := β_min = 80
I_б := I_y/(1 + β) = 0.00123457
U_б := E_п + U_бэ = 5.6
R_б := U_б/I_б = 4536
R_нс := R_б/2 = 2268
# Условия выбора стабилитрона:
U_ст.мин > 5.6
# Выбран стабилитрон КС168А, с параметрами:
U_ст.ном := 6.8
I_ст.ном := 10*10^-3
U_ст.мин := 6.12
U_ст.макс := 7.48
I_ст.мин := 3*10^-3
I_ст.макс := 45*10^-3
r_диф0 := 28
R_б1 := R_б*(U_ст.макс - (E_п + U_бэ))/U_ст.макс = 1140.06
R_б2 := R_б - R_б1 = 3395.94
R_б = 4536
R_б1 = 1140.06
R_б2 = 3395.94
I_ст.мин := 5*10^-3
I_ст.макс := 25*10^-3
r_диф := r_диф0*sqrt(I_ст.мин/I_ст.ном) = 19.799
δU_в := δU_c = 0.2
U_ст.макс = 7.48
I_Rc.min := I_ст.мин + U_ст.макс/R_нс = 0.00829806
I_Rc.max := I_ст.макс + U_ст.мин/R_нс = 0.0276984
R_нс = 2268
γ := (1 - δU_в)/(1 + δU_в) = 0.666667
R_c := (U_ст.макс - γ*U_ст.мин)/(γ*I_Rc.max - I_Rc.min) = 334.397
U_в := (R_c*I_Rc.min + U_ст.макс)/(1 - δU_в) = 12.8186
U_кэ.мин := (1 - δU_в)*U_в - E_п = 5.25485
U_кэ.мин > 2
I_б = 0.00123457
I_к := I_б*β = 0.0987654
P_рас := (U_в*(1 + δU_в) - E_п)*I_к = 1.02541
P_рас > 0.8  # - Это плохо, добавляем Rк
ΔU_к := 3
R_к := ΔU_к/I_к = 30.375
U_кэ.мин.Д := U_кэ.мин - ΔU_к = 2.25485
P_рас.Д := (U_в*(1 + δU_в) - E_п - ΔU_к)*I_к = 0.729113
P_рас.Д < 1.5
r_ст.ср := U_ст.ном/I_ст.ном = 680
K_ст := (1/r_диф + 1/R_c + 1/R_нс)/(1/r_ст.ср + 1/R_c + 1/R_нс) = 11.0036
K_ст > K_ст0
K_п := 1/R_c/(1/r_диф + 1/R_c + 1/R_нс) = 0.0554414
U_пульс.В := U_пульс/K_п = 0.0126259
I_Rc.max = 0.0276984
I_Rc.min = 0.00829806
I_Rc := 0.5*(I_Rc.max + I_Rc.min) = 0.0179982
I_вх.ст := (β/(β + 1))*I_y + I_Rc = 0.116764
U_в = 12.8186
R_вх.ст := U_в/I_вх.ст = 109.782
P_вх.ст := U_в*I_вх.ст = 1.49674
η_ст := E_п*I_y/P_вх.ст = 0.334059
# РАСЧЕТ ВЫПРЯМИТЕЛЯ
f_с := 50
U_в = 12.8186
I_вх.ст = 0.116764
R_н := R_вх.ст = 109.782
U_пульс.В = 0.0126259
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# Условия выбора диодов:
I_д0 := I_вх.ст/2 = 0.0583818
# Выбран диод Д206, с параметрами:
I_д0макс := 100*10^-3 = 0.1
U_обр.доп := 100
E_д := 0.5
S_д := 1.2
i_д.м.апр := 10*I_д0 = 0.583818
S_дэ := S_д/2 = 0.6
E_дэ := 2*E_д = 1
β_0 := 1/(S_д*R_н*(1 + E_дэ/U_в)) = 0.00704148
θ := nthroot(3*β_0*π, 3)/deg = 23.1971
θ := 24*deg = 0.418879
cos(θ) = 0.913545
α_0 := 0.08863 = 0.08863
γ_0 := 0.00766 = 0.00766
α_1 := 0.17417 = 0.17417
γ_1 := 0.01506 = 0.01506
α_2 := 0.16516 = 0.16516
γ_2 := 0.01428 = 0.01428
U_c := (U_в + 2*E_д)/cos(θ) = 15.1263
I_1.с := S_д*U_c*γ_1 = 0.273362
P_сп := I_1.с*U_c/2 = 2.06748
η_в := P_вх.ст/P_сп = 0.723945
I_вх.ст = 0.116764
C_н := I_вх.ст/(2*π*f_с*U_пульс.В) = 0.029437
U_c = 15.1263
U_д.макс.обр := |E_д - U_c/2 - U_в/2| = 13.4724
# ЧАСТЬ 3
# Параметры БТ КТ306Б
U_kbdop := 15
I_kdop := 30*10^-3
β_min := 40
β_max := 120
f_gr := 500*10^6
τ_k := 30*10^-12
C_k := 5*10^-12
φ_t := 25*10^-3
C_e := 4.5*10^-12
U_be := 0.6
P_kdop := 0.150
I_d1 := 0.1*I_y1 = 0.0005
I_d := 1/11*I_y1 = 0.000454545
I_k := 10/11*I_y1 = 0.00454545
U_ke := 0.5*E_п = 2.5
R_k + R_e == 0.5*E_п/I_k
0.5*E_п/I_k = 550
R_k := 0.8*0.5*E_п/I_k = 440
R_e := 0.2*0.5*E_п/I_k = 110
β := sqrt(β_min*β_max) = 69.282
I_b := I_k/β = 6.5608e-5
U_e := R_e*(I_k + I_b) = 0.507217
U_b := U_be + U_e = 1.10722
R_d1 := (E_п - U_b)/I_d = 8564.12
R_d2 := U_b/(I_d - I_b) = 2846.77
S_p := I_k/φ_t = 0.181818
r_β := β/S_p = 381.051
C_ka := 0.5*C_k = 2.5e-12
r_b := τ_k/C_ka = 12
R_b := R_d1*R_d2/(R_d1 + R_d2) = 2136.56
R_k = 440
R_вх = 1500
R_b = 2136.56
R_n := (R_k^-1 + R_вх^-1)^-1 = 340.206
R_г = 500
k_go := R_b/(R_b + R_г) = 0.810359
U_g := U_г*k_go = 0.000810359
R_g := R_г*k_go = 405.18
K_u := -(S_p*R_n) = -61.8557
K_uskv := -(k_go*r_β/(R_g + r_b + r_β)*S_p*R_n) = -23.9283
C_d := S_p/(2*π*f_gr) = 5.78745e-11
C_β := C_d + C_e = 6.23745e-11
f_v := 1/(2*π)*(1/(R_g + r_b) + 1/r_β)*1/(C_β + (1 + S_p*R_n)*C_k) = 2121783
C_ea := 100*S_p*r_β/(2*π*f_н*(r_β + r_b)) = 0.000233782
R_b = 2136.56
R_vhys := 1/(1/R_b + 1/(r_β + r_b)) = 331.979
C_p1 := 1/(2*π*f_н*(R_vhys + R_г)) = 1.59414e-8
C_p1 := 1/(2*π*f_н*0.64*(R_vhys + R_г)) = 2.49084e-8
R_вх = 1500
C_P2 := 1/(2*π*f_н*0.64*R_вх) = 1.38155e-8
K_uckb(f) := K_uskv*f/f_н/sqrt((1 + f^2/f_н^2)*(1 + f^2/f_v^2))
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R_b = 2136.56
E_pb := R_b*I_b + U_be + R_e*(I_b + I_k) = 1.24739
I_b = 6.5608e-5
I_k1(U_be1, β_1) := (E_pb - U_be1)/(((R_b + R_e)/β_1) + R_e)
R_e = 110
I_k = 0.00454545
I_k1(U_be, β_max) = 0.00502941
I_k1(U_be, β_min) = 0.0038961
I_k1(U_be, β) = 0.00454545
U_kemin(U_be1, β_1) := E_п - (R_k + R_e)*I_k1(U_be1, β_1)
U_kemin(U_be, β_max) = 2.23382
