# Исходные данные:
В
# - напряжение питания усилителя.
E_п := 8
U_пульс := 2*10^-3  # В
ΔE_п/Е_п == "+- 0,012"  # - относительная нестабильность напряжения питания.
I_y1 := 7*10^-3  # А
U_пульс == 2  # мВ  # - допустимая амплитуда пульсации напряжения питания.
I_y := 140*10^-3  # А
140*10^-3 = 0.14
I_y == 140  # мА  # - ток, потребляемый усилителем от источника питания.
U_г := 2*10^-3  # В
I_y1 == 7  # мА  # - ток, потребляемый 1-м каскадом усилителя.
# Тип транзистора в 1-м каскаде усилителя - КТ325.
R_г := 2*10^3  # Ом
U_г == 1  # мВ  # - амплитуда напряжения генератора сигнала.
f_н := 10*10^3  # Гц
R_г == 2  # кОм  # - выходное сопротивление генератора сигнала.
R_вх := 3*10^3  # Ом
f_н == 10  # кГц  # - нижняя граничная частота полосы усиления.
δE_п := 0.012
R_вх == 3  # кОм  # - входное сопротивление 2-го каскада усилителя.
f_c := 50  # Гц  # - частота напряжения сети.
δU_c := 0.2
ΔE_п := 0.012*E_п = 0.096
ΔU_c/U_c == "+- 20"  # %  # - относительная нестабильность напряжения сети.
ΔE_п/E_п = 0.012
# Часть 1. Расчет стабилизатора напряжения.
# С целью увеличения коэффициента стабилизации будем использовать схему стабилизатора напряжения с эмиттерным повторителем
# 1. Выбираем транзистор
# Эквивалентная схема стабилизатора:
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# Для кремниевых транзисторов
U_бэ := 0.6  # В
β := 100
# Эквивалентное сопротивление нагрузки:
R_эн := E_п/I_y
R_эн = 57.1429  # Ом
# Напряжение, которое должно быть подано на базу транзистора:
U_б := E_п + U_бэ
U_б = 8.6  # В
# При работе биполярного транзистора в активной области ток базы:
I_б := I_y/(1 + β)
# β - минимальное значение усиления по току в схеме с общим эмиттером.
# Выбираем транзистор с достаточно большим коэффициентом усиления по току.
β := 100
I_б = 0.00138614  # А
U_кэ ≥ U_кэ.мин  # - транзистор работает в активной области
U_кэ.мин := 2  # В
4.
# где
# Часть 2. Расчет выпрямителя.
# Схема выпрямителя:
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y(x) :=
    (3*x - 1.8)/0.9
    0 if x < 0.6
10/6 = 1.66667
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# Исходные данные для расчета:
# Требуемое постоянное напряжение на выходе выпрямителя
Uв := 19.178
U_н := Uв  # В
# Сопротивление нагрузки
R_вх.ст := 128.33
R_н := R_вх.ст  # Ом
# Уровень пульсаций
U_пульс.В := 0.163  # В
# Ток через нагрузку
I_вх.ст := 0.149
I_н := I_вх.ст  # А
# Выходная мощность
# (входная мощность стабилитрона):
P_вх.ст := 2.866  # Вт
# Выбор диода:
P_вых := P_вх.ст
5*I_н = 0.745
# Выбераем диод так чтобы Iдmax>>Iвых.выпр (так как в момент включения выпрямителя,  конденсатор Сн не заряжен и все входное напряжение подается на диоды, то есть угол отсечки оказывается близким к 90 градусам, а затем напряжение нанагрузки запирает диод, уменьшая импульсы через него) и Uобр>>Uвых.выпр
# Возьмем диод 2Д230А, с параметрами:
# Максимальное обратное напряжение:
U_обр.макс := 400  # В
# Максимальный прямой ток:
I_ср.пр.макс := 2000  # мА
U_пульс.В = 0.163
# Предельный импульстый прямой ток:
I_и.пр.макс := 60  # А
I_ср.пр.макс := 2000*10^-3
# Напряжение отсечки:
E_д := 0.6  # В
Iпр := 3  # при
Uпр := 1.5
# Используем кусочно-линейную аппроксимацию ВАХ диода.
i_д.max := 5*I_н = 0.745
S_д := 33/10 = 3.3
Uв = 19.178
# Крутизна:
S_д := 3/(1.5 - 1*E_д) = 3.33333  # А/В
# В схеме для формирования импульсов тока используются не отдельные диоды, а их последовательное соединение. Следовательно, для получения ВАХ последовательных диодов нужна ВАХ двух диодов. Тогда параметры будут определяться:
S_0 := 0.5*S_д = 1.66667  # А/В
E'_д0 := 0.6*2 = 1.2
# 1. Коэффициенты Берга и угол отсечки θ:
S_0 := 0.5*S_д = 1.66667  # А/В
E'_д0 := 0.6*2 = 1.2
β_0 := 1/(S_д*R_н*(1 + 2*E_д/Uв)) = 0.00220006
# 1. Коэффициенты Берга и угол отсечки θ:
β_0 == 1/(S_0*R_н*(1 + 2*E'_д0/U_н)) == 6.612*10^-3
β_0 = 0.00220006
θ := 16*deg = 0.279253
θ == nthroot(3*β_0*π, 3) == 22.716  # градусов
cos(θ) = 0.961262
# Функции Берга:
γ_0 := 0.00229
γ_1 := 0.00455
γ_2 := 0.00444
1*γ_0 := (sin(θ) - θ*cos(θ))/π  # error: Здесь необходимо указать имя.
2*γ_1 := (θ - sin(θ)*cos(θ))/π  # error: Здесь необходимо указать имя.
3*γ_2 := 1/(2*π)*(sin(θ) - sin(3*θ)/3)  # error: Здесь необходимо указать имя.
f_c = 50
# 2. Напряжение на вторичной обмотке трансформатора:
U_c := (Uв + 2*E_д)/cos(θ) = 21.1992
# 2. Напряжение на вторичной обмотке трансформатора:
U_пульс.В = 0.163
U_c = 21.1992
U_c == (U_B + E'_д0)/cos(θ) == 38.067  # В
I_c := S_д*U_c*γ_1
# 3. Расчет емкости Сн:
I_c = 0.321522
C_н == 2*S_0*γ_2*U_c/(2*π*f_c*2*U_пульс.В) == 4.719  # мФ
# 4. Потребляемая мощность и КПД выпрямителя.
C := S_д*U_c*γ_2/(4*π*f_c*U_пульс.В) = 0.00306347  # Ф
P_сп := 0.5*U_c*I_c = 3.408
ω := 2*π*f_c
P_вых = 2.866
η := P_вых/P_сп
I2н := S_д*U_c*γ_2 = 0.313748
η = 0.840962
# Амплитуда напряж на Rн
U2n := S_д*U_c*γ_2/(4*π*f_c*C) = 0.163
Idmax := I_вх.ст/(2*0.05918) = 1.25887
# 5. Проверка выпрямителя.
Uобратноеmax := |-0.5*U_c - 0.5*Uв + 0.6| = 19.5886
# Для надежной работы выпрямителя должно выполняться неравенство iд max<Iд имп
# Максимальный то к можно по формуле:
i_д.max := S_0*U_c*(1 - cos(θ))
Idiod := 0.11/(2*γ_2) = 12.3874
i_д.max = 1.3687  # А
# Для выбранного диода предельный импульсный прямой ток - 10А, неравенство  выполняется.
U_обр := 2*(U_н + U_c) = 80.7544
U_обр = 80.7544
75*B < 200*B
17.268*4 = 69.072
# Видно максимальные токи и напряжения меньше допустимых для данного диода, следовательно  он подходит для данной схемы.
T_p := 1/f_c = 0.02
T == 1/f_c == 0.02*c
T == 2*π
θ = 0.279253
θ == 0.488
θ := 0.02*0.488/(2*π) = 0.00155335  # с
θ == 1.553*мс
# При расчете использовалась мостовая схема диодного выпрямителя. Были найдены амплитуда переменного напряжения Uc=38 В  на вторичной обмотке сетевого трансформатора,  амплитуда потребляемого от сети переменного тока Iдмах=1.326 А и потребляемая мощность P=8.3 Вт, кпд равен 44 %. КПД показывает отношение мощности выпрямителя к мощности потребляемой на обмотке трансформатора, в нашем случае мощность теряется в половину.
