# Исходные данные:
E_п := 8  # В  # - напряжение питания усилителя.
U_пульс := 2*10^-3  # В
ΔE_п/Е_п == "+- 0,012"
# - относительная нестабильность напряжения питания.
I_y1 := 7*10^-3  # А
(U_пульс == 2) □ 5  # мВ
# - допустимая амплитуда пульсации напряжения питания.
I_y := 140*10^-3  # А
140*10^-3 = 0.14
I_y == 140  # мА
# - ток, потребляемый усилителем от источника питания.
U_г := 2*10^-3  # В
I_y1 == 7  # мА  # - ток, потребляемый 1-м каскадом усилителя.
# Тип транзистора в 1-м каскаде усилителя - КТ306.
R_г := 2*10^3  # Ом
U_г == 2  # мВ
# - амплитуда напряжения генератора сигнала.
f_н := 10*10^3  # Гц
R_г == 2  # кОм
# - выходное сопротивление генератора сигнала.
R_вх := 3*10^3  # Ом
f_н == 10  # кГц  # - нижняя граничная частота полосы усиления.
# - входное сопротивление 2-го каскада усилителя.
δE_п := 0.012
R_вх == 3  # кОм
f_c := 50  # Гц  # - частота напряжения сети.
δU_c := 0.2
ΔE_п := 0.012*E_п
ΔU_c/U_c == "+- 20"  # %  # - относительная нестабильность напряжения сети.
# Часть 1. Расчет стабилизатора напряжения.
# С целью увеличения коэффициента стабилизации будем использовать схему стабилизатора напряжения с эмиттерным повторителем
# 1. Выбираем транзистор | 2N3920
# Эквивалентная схема стабилизатора:
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# Для кремниевых транзисторов
U_бэ := 0.6  # В
β := 100
# Эквивалентное сопротивление нагрузки:
R_эн := E_п/I_y
R_эн = 57.1429  # Ом
# Напряжение, которое должно быть подано на базу транзистора:
U_б := E_п + U_бэ
U_б = 8.6  # В
# При работе биполярного транзистора в активной области ток базы:
I_б := I_y/(1 + β)
# β - минимальное значение усиления по току в схеме с общим эмиттером.
# Выбираем транзистор с достаточно большим коэффициентом усиления по току.
β := 100
I_б = 0.00138614  # А
U_кэ ≥ U_кэ.мин  # - транзистор работает в активной области
U_кэ.мин := 2  # В
R_б := U_б/I_б
R_б == R_б1 + R_б2
# Полное сопротивление нагрузки стабилитрона:
R_нс := R_б*(U_б/I_б)/(R_б + U_б/I_б)
R_нс = 3102.14  # Ом
R_б = 6204.29
# 2. | Выбираем стабилитрон:
# Он должен удовлетворять условию
U_ст.мин := E_п + U_бэ
U_ст.мин = 8.6  # В
# Эквивалентная схема диодного стабилизатора:
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# Выбран стабилитрон 2С190А, с параметрами:
U_ст.min := 8  # В
U_ст.макс := 9.5  # В
I_ст.мин := 3*10^-3  # А
I_ст.макс := 13*10^-3  # А
r_диф := 12  # Ом
R_б = 6204.29
# Если выбрать сопротивление потерциометра Rб1 так, что
R_б1 := R_б*(U_ст.макс - U_ст.min)/U_ст.макс = 979.624  # Ом
# то регулировкой потенциометра можно установить требуемое значение выходного напряжения Eп при любом допустимом значении рабочего напряжения стабилитрона.
R_б2 := R_б - R_б1
R_б2 = 5224.66  # Ом
3.
# Расчитываем сопротивление стабилизации и среднее значение напряжения на выходе стабилизатора.
# Относительная нестабильность выходного напряжения выпрямителя равна относительной нестабильности амплитуды напряжения сети, т. е.
δUв := δU_c
δUв = 0.2
# Начинаем с выбора области, где рабочая точка стабилитрона будет находиться при всех допустимых значениях напряжения на входе стабилизатора.Находим диапазон рабочих токов через стабилитрон:
U_Rc == U_в - U_ст  # где
U_Rc == I_Rc*R_с
# Так как ток через через сопротивление Rc будет мин. при макс. напряжениеи на стабилитроне и мин. его токе, и наоборот,то получаем:
I_Rc.min := I_ст.мин + U_ст.макс/R_нс
I_Rc.min = 0.0060624  # А
I_Rc.max := I_ст.макс + U_ст.min/R_нс
I_Rc.max = 0.0155789  # А
# Максимальный ток через Rс протекает при наибольшем значении входного напряжения и наименьшем допустимом значении напряжения на стабилитроне, а минимальный  при наименьшем значении входного напряжения и наибольшем допустимом напряжении стабилитрона:
U_в*(1 - δUв) == R_c*I_Rc.min + U_ст.макс
U_в*(1 + δUв) == R_c*I_Rc.max + U_ст.min
γ := (1 - δUв)/(1 + δUв)
R_c := (U_ст.макс - γ*U_ст.min)/(γ*I_Rc.max - I_Rc.min)  # где
γ = 0.666667
R_c = 963.723  # Ом
U_в := (R_c*I_Rc.min + U_ст.макс)/(1 - δUв)
U_в = 19.1781  # В  # - напряжение на входе стабилизатора
# Входной ток стабилизатора и его входное сопротивление изменяются в зависимости от величины входного напряжения и параметров стабилитрона.
r_ст.ср := U_ст.min/I_ст.макс = 615.385
Pрас := (U_в*(1 + δUв) - E_п)*I_б*β = 2.08111  # Вт
r_ст.ср = 615.385
4.
# Расчет коэффициента стабилизации и коэффициента передачи пульсаций выпрямительного напряжения.
K_ст := (1/r_диф + 1/R_c + 1/R_нс)/(1/r_ст.ср + 1/R_c + 1/R_нс)
K_ст = 28.373
K_ст0 := δU_c/δE_п = 16.6667
# где
r_ст.ср == U_ст.мин/I_ст.макс  # - среднее сопротивление стабилитрона в рабочей точке.
# Коэффициент  стабилизации  рекомендуется  оценивать  при  максимальном  значении  тока  через  стабилитрон,  где  rст. ср  и  Kст  имеют  наименьшие  значения.
# Средннее значение коэффициента стабилизации Кст.о:
K_ст0 == ΔU_c/U_c/(ΔE_п/(E_п + U_бэ))
K_ст0 = 16.6667
K_ст > K_ст0  # , следовательно схема выбрана правильно.
I_Rc := 0.5*(I_Rc.max + I_Rc.min)
# Расчет коэффициента передачи пульсации Кп.
K_п := 1/R_c/(1/r_диф + 1/R_c + 1/R_нс)
K_п = 0.0122518
# Допустимая амплитуда пульсаций на выходе рассчитывается по формуле:
U_пульс.В := U_пульс/K_п
U_пульс.В = 0.163242  # В
# Формула полного тока, потребляемого входом стабилизатора:
I_вх.ст := (β/(β + 1))*I_y + I_Rc
I_вх.ст = 0.149434  # А
# где
I_Rc == 0.5*(I_Rc.max + I_Rc.min)
# Эквивалентное входное сопротивление:
R_вх.ст := U_в/I_вх.ст = 128.338  # Ом
# Мощность стабилизатора:
P_вх.ст := U_в*I_вх.ст = 2.86587  # Вт
# КПД стабилизатора:
η_ст := E_п*I_y/P_вх.ст = 0.390806
η_ст == 39  # %
U_КЭmin := (1 - δUв)*U_в - E_п
U_КЭmin = 7.34248  # В
# Часть 2. Расчет выпрямителя.
# Схема выпрямителя:
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y(x) :=
    (3*x - 1.8)/0.9
    0 if x < 0.6
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# Исходные данные для расчета:
# Требуемое постоянное напряжение на выходе выпрямителя
U_н := U_в
U_н = 19.1781  # В
# Сопротивление нагрузки
R_н := R_вх.ст
R_н = 128.338  # Ом
# Уровень пульсаций
U_пульс.В = 0.163242  # В
# Ток через нагрузку
I_н := I_вх.ст
I_н = 0.149434  # А
# Выходная мощность
# (входная мощность стабилитрона):
P_вых := P_вх.ст = 2.86587  # Вт
# Выбор диода:
# Выбераем диод так чтобы Iдmax>>Iвых.выпр (так как в момент включения выпрямителя,  конденсатор Сн не заряжен и все входное напряжение подается на диоды, то есть угол отсечки оказывается близким к 90 градусам, а затем напряжение нанагрузки запирает диод, уменьшая импульсы через него) и Uобр>>Uвых.выпр
# Возьмем диод 2Д320А, с параметрами:
# Предельное обратное напряжение:
U_обр.макс := 400  # В
# Предельный средний прямой ток:
I_ср.пр.макс == 300  # мА
# Предельный импульстый прямой ток:
I_и.пр.макс := 10  # А
# Напряжение отсечки:
E_д := 0.6  # В
Напряжение
U_пр := 1
# при
i_пр := 700*10^-3  # мА
B
# Используем кусочно-линейную аппроксимацию ВАХ диода.
5*I_н = 0.747172
# Крутизна:
S_д == i_пр/(U_пр - E_д) == 700/(1 - 0.6) == 1.75  # А/В
U_пульс.В = 0.163242
# В схеме для формирования импульсов тока используются не отдельные диоды, а их последовательное соединение. Следовательно, для получения ВАХ последовательных диодов нужна ВАХ двух диодов. Тогда параметры будут определяться:
Uв := 19.178
S_д := 33/10 = 3.3
S_0 := 0.5*S_д = 1.65  # А/В
E'_д0 := 0.6*2 = 1.2
# 1. Коэффициенты Берга и угол отсечки θ:
β_0 := 1/(S_д*R_н*(1 + 2*E_д/Uв)) = 0.00222215
β_0 = 0.00222215
θ := 16*deg = 0.279253
cos(θ) = 0.961262
γ_0 := 0.00229
γ_1 := 0.00455
γ_2 := 0.00444
f_c = 50
# 2. Напряжение на вторичной обмотке трансформатора:
U_c := (Uв + 2*E_д)/cos(θ) = 21.1992
U_пульс.В = 0.163242
U_c = 21.1992
I_c := S_д*U_c*γ_1
I_c = 0.318306
C := S_д*U_c*γ_2/(4*π*f_c*U_пульс.В) = 0.00302835  # Ф
P_сп := 0.5*U_c*I_c = 3.37392
ω := 2*π*f_c
P_вых = 2.86587
η := P_вых/P_сп
I2н := S_д*U_c*γ_2 = 0.310611
η = 0.849417
# 5. Проверка выпрямителя.
# Для надежной работы выпрямителя должно выполняться неравенство iд max<Iд имп
# Максимальный то к можно по формуле:
Idmax := I_вх.ст/(2*0.05918) = 1.26254
i_д.max := S_0*U_c*(1 - cos(θ))
Idiod := 0.11/(2*γ_2) = 12.3874
i_д.max = 1.35502  # А
# Для выбранного диода предельный импульсный прямой ток - 10А, неравенство  выполняется.
Uобратноеmax := |-0.5*U_c - 0.5*Uв + 0.6| = 19.5886
U_обр := 2*(U_н + U_c) = 80.7546
θ = 0.279253
U_c = 21.1992
U_обр = 80.7546
75*B < 200*B
Uв = 19.178
# Видно максимальные токи и напряжения меньше допустимых для данного диода, следовательно  он подходит для данной схемы.
θ = 0.279253
T_p := 1/f_c = 0.02
t_ots := θ/(2*π*f_c) = 0.000888889
T == 1/f_c == 0.02*c
T == 2*π
θ == 0.488
17.268*4 = 69.072
θ := 0.02*0.279/(2*π) = 0.000888085  # с
θ == 0.889*мс
# Построение диаграмм входного и выходного напряжения на выпрямителе.
# На входе:
u_вх(t) := U_c*cos(2*π*f_c*t)
U_c = 21.1992
u_вых(t) := U_в + U_пульс.В*cos(2*π*f_c*t)
U_в = 19.1781
U_пульс.В = 0.163242
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(u_вых(0) - u_вых(0.01))/2 = 0.163242
# Выводы:
# В первой части была выбрана схема и рассчитаны параметры стабилизатора напряжения. При выборе схемы надо было учитывать, что напряжение стабилизации каждого типа стабилитрона может иметь разброс порядка +-10%, и поэтому необходимо обеспечить регулировку выходного значения Еп. Но введение такого элемента в простой диодной схеме приводит к большим потерям мощности, поэтому мы используем усилитель тока на биполярном транзисторе и вводим цепь регулировки выходного напряжения, состоящую из потенциометра и  сопротивления. При использовании этой схемы достигаются более высокие значения коэффициента стабилизации и более высокие значения КПД при заданном коэффициенте стабилизации.
# Так же были найдены постоянное напряжение Uв=17.1 В, которое должно быть обеспечено на выходе выпрямителя, постоянный ток Iвх.ст=0.11 А, потребляемый входом стабилизатора напряжения, и допустимый уровень пульсации на выходе выпрямителя Uпульс.в=0.04 В, кпд равно 42 %
# Если посмотреть на диаграммы входного и выходного напряжения на стабилизаторе, то мы заметим, что амплитуда выходного напряжения увеличилась, а значение напряжения стало вполовину меньше.
#
# Во второй части производился расчет выпрямителя. Использовалась мостовая схема диодного выпрямителя. Были найдены амплитуда переменного напряжения Uc=19.6 В  на вторичной обмотке сетевого трансформатора,  амплитуда потребляемого от сети переменного тока Ic=0.23 А и потребляемая мощность P=2.3 Вт, пкд равен 90 %. КПД показывает отношение мощности выпрямителя к мощности потребляемой на обмотке трансформатора, в нашем случае мощность практически не теряется.
# Если посмотреть на диаграммы входного и выходного напряжения на выпрямителе, то мы заметим, что частота сигнала удвоилась потому, что работают не только положительные части гармоничесокго напряжение но и отрицаткельные. Амплитуда выходного сигнала стала очень маленькой по сравнениюс амплитудой входного.
# Часть 3. Расчет компонентов схемы 1го каскада усилителя, коэффициента усиления на средних частотах и выбор рабочей точки.
# Схема рассчитываемого каскада:
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# где параметры генератора усиливаемого сигнала:  Uг - амплитуда напряжения холостого хода;
# Rг - выходное сопротивление;
I_y1 = 0.007  # А
E_пк := 12  # В - напряжение питания коллектора;
R_н := R_вх = 3000
f_н := 6*10^3
I_у1 == 8  # мА - ток, потребляемый 1-м каскадом усилителя;
R_н = 3000  # Ом
R_вх == 2  # кОм - входное сопротивление 2-го каскада усилителя;
f_н = 6000  # Гц
f_н == 6  # кГц - нижняя граничная частота полосы усиления;
U_г == 1  # мВ - амплитуда напряжения генератора сигнала;
R_г = 2000  # Ом
R_г == 3  # кОм - выходное сопротивление генератора сигнала;
# U.бэ - напряжение база-эмиттер;
# U.кэ - напряжение коллектор-эмиттер;
# Тип транзистора в первом каскаже усилителя - КТ306В;
# Сэ - конденсатор эмиттера;
# Rэ - сопротивление эмиттера;
# Rд1, Rд2 - сопротивления делителя.
E_пк := 7
# Паспортные данные транзистора КТ306В:
I_к.доп := 50*10^-3  # А
U_кэ.доп := 10  # В - максимально допустимое напряжение коллектор-эмиттер;
I_к.доп == 10  # мА - максимально допустимый ток через коллектор;
f_гр := 800*10^6  # Гц
β_мин := 20
β_макс := 100  # - статистический коэффициент передачи тока базы транзистора;
C_к := 3*10^-12  # Ф
f_гр == 300  # МГц
C_э := 2.5*10^-12  # Ф
C_к == 5  # пФ
C_э == 4, 5  # пФ
P_к.доп := 150*10^-3  # Вт
P_к.доп == 150  # мВт
τ_к := 150*10^-12  # c
τ_к == 500  # пс
# Расчет по постоянному току:
# Выберем соотношение токов, протекающих соответственно через делитель напряжения Rд1, Rд2 и через коллекторную цепь транзистора. Пусть  Iд>Iк, тогда уменьшается сопротивление в базовой цепи и уменьшается Kвх, поэтому очевидно нужно выбирать Iд<Iк. Однако при малом токе делителя Iд ухудшается стабильность рабочей точки каскада. Желательно иметь Iб<Iд<Iк.
I_к := 10/11*I_y1
I_к = 0.00636364  # А
# Пусть
I_д == 0, 1*I_к
I_д := 1/11*I_y1
# Так как
I_y1 == I_к + I_д
# то
I_к == 10/11*I_y1 == 7.273  # мА
I_д = 0.000636364  # А
I_д == 1/11*I_y1 == 0, 7273  # мА
# Выбираем постоянное напряжение:
U_кэ == E_пк/2 == 6  # В
U_кэ := E_пк/2
# Такоим образом наша рабочая точка будет находиться в активной области и получим максимально усиленный неискаженный сигнал.
U_кэ = 3.5  # В
R_к + R_э == (E_пк - U_кэ)/I_к == 825*Ом
R_к.экв := (E_пк - U_кэ)/I_к
# Выберем сообношение между Rк и Rэ:
R_к.экв = 550  # Ом
E_п == I_к*R_к + I_э*R_э
R_к := 0.8*R_к.экв
# Если выбрать большое Rэ, то Rк уменьшается, уменьшается коэффициент передачи Ku. Если сделать большое Rк, то теряем стабильность рабочей точки. Поэтому:
R_к = 440  # Ом
R_к0 == 0, 8*(R_к + R_э) == 660*Ом
R_э := R_к.экв - R_к
R_э0 == 0, 2*(R_к + R_э) == 165*Ом
R_э = 110  # Ом
# Расчет делителя в цепи базы.
β_ср := sqrt(40*120)
# Для оценки тока базы вначале оценивается статистический коэффициент передачи тока базы транзистора β:
β_ср = 69.282
# Для этого возьмем среднее значение из заданнного диапазона:
β_ср == sqrt(20*100) == 44.721
β := β_ср = 69.282
# Постоянный ток базы находится по формуле:
I_б := I_к/β = 9.18512e-5
I_б == I_к/β == 0, 91  # мкА
# Падение напряжения на сопротивлении эмиттерного автосмещения:
I_б = 9.18512e-5  # А
U_э == R_э*(I_к + I_б) == 1.215  # В
U_э := R_э*(I_к + I_б) = 0.710104
# Мы используем кремниевый транзистор, поэтому принимаем
U_бэ := 0.65
U_бэ == 0, 7*В
U_бэ + U_э = 1.3601
# Напряжение базы:
U_б == U_бэ.0 + U_э == 1, 814  # В
U_б := (U_бэ + U_э) = 1.3601  # В
# Сопротивления делителя находим по формулам:
R_д1 := (E_пк - U_б)/I_д = 8862.69
R_д1 == (E_пк - U_б)/I_д == 14  # кОм
R_д1 = 8862.69  # Ом
R_д2 == U_б/(I_д - I_б) == 2.851  # кОм
R_д2 := U_б/(I_д - I_б) = 2497.84
# Расчет усиления сигнала на средних частотах.
# Малосигнальная эквивалентная схема первого каскада для средних частот:
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U_г := 2.5*10^-3
R_б := R_д1*R_д2/(R_д1 + R_д2) = 1948.64
# Заменим источник сигнала эквивалентным источником с учетом влияния Rб и введем полное сопротивление нагрузки в цепи коллектора Rн.
# Упрощенная эквивалентная схема:
R_б = 1948.64
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k := R_б/(R_г + R_б) = 0.493496
U'_г := k*U_г
U'_г = 0.00123374  # В
R'_г := k*R_г
R'_г = 986.993  # Ом
# В этой схеме:
U'_г == k*U_г == 0, 44  # мВ
# где
k == R_б/(R_г + R_б)
ϕ_т := 25*10^-3  # В
R'_г == k*R_г == 1, 32  # кОм
k = 0.493496
S_п := I_к/ϕ_т
R_б == R_д1*R_д2/(R_д1 + R_д2) == 2.369  # кОм
S_п = 0.254545
R_н == (1/R_к + 1/r_кэ + 1/R_вх)^-1
# rкэ много больше Rк и Rвх, поэтому его не учитываем при расчете.
R_н := (1/R_к + 1/R_вх)^-1
R_н == 496.24*Ом
R_н = 383.721  # Ом
# Крутизна по переходу:
S_п == I_к/ϕ_т == 0.291  # А/В
# где
ϕ_т == 25  # мВ
r_β := β_ср/S_п = 272.179
C_ка := C_к/2 = 1.5e-12
# Сопротивление рекомбинации:
r_β == β_ср/S_п == 153.73  # Ом
r_β = 272.179  # Ом
r_б == τ_к/C_ка == 200  # Ом
# где
C_ка := 0.5*C_к
r_б := τ_к/C_ка
C_ка == 2, 5  # пФ
r_б = 100  # Ом
# Коэффициент усиления напряжения на переходе:
(K'_U == -S_п*R_н == -144.36)
# Знак минус показывает то, что напряжение на входе и на выходе находятся в противофазе.
C_ка = 1.5e-12  # Ф
# Сквозной коэффициент усиления:
K_U.скв == -k*r_β/(R'_г + r_б + r_β)*S_п*R_н == -5.84
K'_U := -S_п*R_н
K'_U = -97.6744
K_U.скв := K'_U*k*r_β/(R'_г + r_б + r_β)
K_U.скв = -9.65263
# Часть 4. Расчет частотной характеристики 1го каскада усилителя и определение верхней граничной частоты полосы усиления.
# Расчет верхней граничной частоты полосы сквозного усиления.
# Упрощенная малосигнальная эквивалентная схема каскада для умеренно высоких частот:
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S_п = 0.254545
f_гр = 800000000
154*10^-12 = 1.54e-10
# где
C_β == C_д + C_э
# Cд - дифузионная емкость.
C_β := S_п/(2*π*f_гр) = 5.06402e-11
# Полагая, что верхняя граничная частота fв определяется полосой пропускания входной цепи (от генератора до эмиттерного перехода) рассчитаем ее по формуле:
C_β = 5.06402e-11  # Ф
f_β := f_гр/β_ср
f_в := 1/(2*π)*(1/(R'_г + r_б) + 1/r_β)*1/(C_β + (1 + S_п*R_н)*C_к)
f_β = 11547005
# где
(C_β == S_п/(2*π*f_гр) == 154.3)  # пФ
# Следовательно
f_в == 1.3  # МГц
f_B := 1/(2*π)*(1/(R'_г + r_б) + 1/r_β)*1/(C_β + (1 + S_п*R_н)*C_к) = 2109136
# Для сравнения определим что у данного транзистора:
f_в = 2109136
f_β == f_гр/β_ср == 6.7  # МГц
# На снижение верхней граниной частоты влияют Rг и Свх.
C_э := 10*S_п*r_β/(2*π*f_н*(r_β + r_б)) = 4.93784e-5  # Гц
# Лист 17
# Расчет емкостей Сэ, Ср1, Ср2 и АЧХ каскада.
C_э := 100/(2*π*f_н*R_э)
# Для того,чтобы исключить влияние цепи автосмещения на коэффициент усиления каскада, потребуем, чтобы на частоте fн падение напряжения на емкости Cэ было в несколько раз меньше, чем Uбэ. Для этого возьмем сопротивление емкости Сэ в 100 разменьше, чем Rэ, т. е.
Гц
C_э = 2.41144e-5  # Ф
1/(2*π*f_н*C_э) == 0, 01*R_э
# =>
C_э == 100/(2*π*f_н*R_э) == 16.1  # мкФ
# Необходимость большой Сэ при малой величине fн - недостаток этой схемы.
# Эквивалентная схема для расчета коэффициента передачи напряжения сигнала на низких частотах на вход каскада:
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R_вх := 1/(1/R_б + 1/(r_б + r_β))
R_вх = 312.495
# На этой схеме:
R_вх == 1/(1/R_б + 1/(r_б + r_β)) == 307.766  # Ом - входное сопротивление каскада на низких частотах.
# Коэффициент передачи напряжения Uг на вход каскада в области низких и средних частот:
Ом
K_вх(jω) := U_б/U_г
# Записывается в виде:
K_вх(jω) := R_вх/(R_вх + R_г + 1/(jω*C_р1))  # error: Эта переменная не определена.
ω_вх.н := 2*π*f_н = 37699.1
# На средних частотах
|1/(ω*C_р1)| < (R_вх + R_г)
# и
K_вх.сч := R_вх/(R_вх + R_г) = 0.135133
# На низких и средних частотах Квх(jω) можно записать в виде:
K_вх.сч/sqrt(2) = 0.0955536
C_р1 := 1/(ω_вх.н*(R_вх + R_г)) = 1.14707e-8
K_вх(jω) == K_вх.сч*jω/ω_вх.н/(1 + jω/ω_вх.н)
где
ω_вх.н := 1/(C_р1*(R_вх + R_г))
# - нижняя граничная угловая частота входной цепи, т.е. частота,
# на которой
K_вх(jω) := K_вх.сч*jω/ω_вх.н/(1 + jω/ω_вх.н)  # Ф
|K_вх(jω)| == K_вх.сч/sqrt(2)
# Если допустить на частоте fн такой спад модуля коэффициента усиления, то тогда
C_р1 = 1.14707e-8
ω_вх.н == 2*π*f_н
# Выразим Ср1
C_р1 == 1/(2*π*f_н*(R_вх + R_г)) == 8  # нФ
# Если уменьшить допустимый спад модуля Квх(jω) на частоте fн, задав его равным D, т.е. положив, что
K_вх.сч*ω_н/ω_вх.н/sqrt(1 + (ω_н/ω_вх.н)^2) == D*K_вх.сч
0.64*2*π*f_н = 24127.4
C_р1 := 1/(0.64*2*π*f_н*(R_вх + R_г)) = 1.79229e-8
# Тогда
ω_вх.н == 2*π*f_н*sqrt(1/D^2 - 1)  # Пусть
D := 1/nthroot(2, 4)
# Ниэняя граничная частота входной цепи -
ω_вх.н == 2*π*f_н*sqrt(sqrt(2) - 1) == 0, 64*2*π*f_н
C_р1 = 1.79229e-8  # Ф
# =>
C_р1 == 1/(0.64*2*π*f_н*(R_вх + R_г)) == 12, 5  # нФ
C_р2 := sqrt(1 - D^2)/(D*f_н*R_вх)
# Расчет емкости Ср2:
C_р2 = 3.43256e-7  # Ф
sqrt(1 - (1/nthroot(2, 4))^2)/(1/nthroot(2, 4)*f_н*1000) = 1.07266e-7
D == 1/sqrt(1 + f_н^2*C_р2*R_вх)
# =>
C_р2 == sqrt(1 - D^2)/(D*f_н*R_вх) == 0, 35  # мкФ
# Рассчитаем и построим АЧХ для данного усилительного каскада:
j := sqrt(-1)
K_вх(ω) == K_вх.вч(ω)*K_вх.нч(ω)
# ,где
K_вх.нч(ω) == К_вх(ω)/K_вх.сч(ω) == j*ω/ω_вх.н/(1 + j*ω/ω_вх.н)
K_вх.вч(ω) == 1/(1 + j*ω/ω_в)
f_вх.н := f_н
ω_в := 2*π*f_в
K_вх(f) := j*f/f_вх.н/(1 + j*f/f_вх.н)*1/(1 + j*f/f_в)  # - нормированный коэффициент передачи усилительного какада
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# Рассмотрим влияние разброса β на работу каскада.
# Уравнение входной цепи:
E_пб == R_б*I_б + U_бэ + R_э*(I_б + I_к)
E_пб := R_б*I_б + U_бэ + R_э*(I_б + I_к) = 1.53909
# Для активной области
I_б == I_к/β
# Получаем:
I_к(U_бэ) == (E_пб - U_бэ)/(1/β*(R_б + R_э) + R_э)
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# При уменьшении β прямая смещения идет ниже, ток коллектора Iк уменьшается. При β=βmax Iк максимален. При этом увеличивается падение напряжения на Rк и Rэ и уменьшается Uкэ
β := 120
U_кэ == E_пк - (R_к + R_э)*I_к
# Возникает опасноть попадания рабочей точки в область насыщения.
E_пб := R_д2/(R_д1 + R_д2)*E_п = 1.75896
# Найдем Iкmax, полагая Uбэ=0.7 и β=βmax=100
E_пб == R_д2/(R_д1 + R_д2)*E_п == 2.029*B
I_кmax := (E_пб - U_бэ)/(1/β*(R_б + R_э) + R_э) = 0.00872129
I_кmax == (E_пб - U_бэ)/(1/β*(R_б + R_э) + R_э) == 6.759*мА
U_кэ := E_пк - (R_к + R_э)*I_кmax = 2.20329
U_кэ == E_пк - (R_к + R_э)*I_кmax == 6.4*B
# Вывод: транзистор остается в АО.
7 - 550*I_кmax = 2.20329
# Принципиальная схема рассчитанной части устройства:
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K_U.скв = -9.65263
K_Umax := |K_U.скв|
|K_U.скв| = 9.65263
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U_г(t) := 1*10^-3*cos(2*π*50*t)
U_вых(t) := K_U.скв*(1*10^-3*cos(2*π*50*t))
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