E_пк := 8
I_к0 := 6.36
U_кэ0 := 4
е(U_кэ, I_к) := (E_пк - U_кэ)/I_к
I_к(x, U_кэ) := x*(1 - e^(-2*U_кэ))
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β_min := 40
R_b := 2130
β_max := 120
R_e := 125.7
β_cr := 69.3
E_пб := 1.657
U_бэ0 := 0.65
I_к0 = 6.36
е(U_бэ, β) := (E_пб - U_бэ)/((R_b + R_e)/β + R_e)
U_бэ0 := 0.65
I_к(U_бэ) := e^(89*U_бэ - 56)
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е(U_бэ0, β_cr) = 0.00636336
R_к := 502.9
R_э := 125.7
е(U_бэ0, β_max) = 0.00696898
U_ke.min := E_пк - (R_к + R_э)*е(U_бэ0, β_max) = 3.6193
f := 50
f := 10^6
1/f = 1e-6
