E_п := 8
δE_п := 0.015
ΔE_п := δE_п*E_п = 0.12
U_пульс := 1.5*10^-3
I_y1 := 6*10^-3
I_y := 120*10^-3
U_г := 1.4*10^-3
R_г := 400
f_н := 10*10^3
R_вх := 2*10^3
δU_c := 0.2
K_ст0 := δU_c/δE_п = 13.3333
R_эн := E_п/I_y = 66.6667
# Условия выбора транзистора:
U_кэ > U_кэmin
U_кэmin := 2
U_kmin := E_п + U_кэmin = 10
U_kmax := (1 + δU_c)/(1 - δU_c)*U_kmin = 15
I_kmax > I_y
I_y = 0.12
P_kmax := (U_kmax - E_п)*I_y = 0.84
# Выбираем транзистор | КТ630Д
U_бэ := 0.6
P_kmax1 := 1.5
I_kmax1 := 0.3
β_min := 50
β_max := 300
β := β_min = 50
I_б := I_y/(1 + β) = 0.00235294
U_б := E_п + U_бэ = 8.6
R_б := U_б/I_б = 3655
R_нс := R_б/2 = 1827.5
# Условия выбора стабилитрона:
U_ст.мин > 8.6
# Выбран стабилитрон Д814В, с параметрами:
U_ст.ном := 10
I_ст.ном := 5*10^-3
U_ст.мин := 9
U_ст.макс := 10.5
I_ст.мин := 3*10^-3
I_ст.макс := 32*10^-3
r_диф0 := 12
R_б1 := R_б*(U_ст.макс - (E_п + U_бэ))/U_ст.макс = 661.381
R_б2 := R_б - R_б1 = 2993.62
R_б = 3655
R_б1 = 661.381
R_б2 = 2993.62
r_диф0*sqrt(5/10) = 8.48528
I_ст.мин := 5*10^-3
I_ст.макс := 25*10^-3
r_диф(I_ст) := r_диф0*sqrt((10*10^-3/I_ст)^-1)
δU_в := δU_c = 0.2
U_ст.макс = 10.5
r_диф(I_ст.мин) = 8.48528
I_Rc.min := I_ст.мин + U_ст.макс/R_нс = 0.0107456
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I_Rc.max := I_ст.макс + U_ст.мин/R_нс = 0.0299248
R_нс = 1827.5
γ := (1 - δU_в)/(1 + δU_в) = 0.666667
R_c := (U_ст.макс - γ*U_ст.мин)/(γ*I_Rc.max - I_Rc.min) = 488.903
U_в := (R_c*I_Rc.min + U_ст.макс)/(1 - δU_в) = 19.6919
U_кэ.мин := (1 - δU_в)*U_в - E_п = 7.75353
U_кэ.мин > 2
I_б = 0.00235294
I_к := I_б*β = 0.117647
P_рас := (U_в*(1 + δU_в) - E_п)*I_к = 1.83886
P_рас > 1.5  # - Это плохо, добавляем Rк
ΔU_к := 5
R_к := ΔU_к/I_к = 42.5
U_кэ.мин.Д := U_кэ.мин - ΔU_к = 2.75353
P_рас.Д := (U_в*(1 + δU_в) - E_п - ΔU_к)*I_к = 1.25062
P_рас.Д < 1.5
r_ст.ср := U_ст.ном/I_ст.ном = 2000
r_диф := 8.485
K_ст := (1/r_диф + 1/R_c + 1/R_нс)/(1/r_ст.ср + 1/R_c + 1/R_нс) = 38.9471
K_ст > K_ст0
K_п := 1/R_c/(1/r_диф + 1/R_c + 1/R_нс) = 0.0169816
U_пульс.В := U_пульс/K_п = 0.0883307
I_Rc.max = 0.0299248
I_Rc.min = 0.0107456
I_Rc := 0.5*(I_Rc.max + I_Rc.min) = 0.0203352
I_вх.ст := (β/(β + 1))*I_y + I_Rc = 0.137982
U_в = 19.6919
R_вх.ст := U_в/I_вх.ст = 142.713
P_вх.ст := U_в*I_вх.ст = 2.71713
η_ст := E_п*I_y/P_вх.ст = 0.353313
# РАСЧЕТ ВЫПРЯМИТЕЛЯ
f_с := 50
U_в = 19.6919
I_вх.ст = 0.137982
R_н := R_вх.ст = 142.713
U_пульс.В = 0.0883307
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# Условия выбора диодов:
I_д0 := I_вх.ст/2 = 0.0689911
# Выбран диод Д206, с параметрами:
I_д0макс := 100*10^-3 = 0.1
U_обр.доп := 100
E_д := 0.5
S_д := 1.2
i_д.м.апр := 10*I_д0 = 0.689911
S_дэ := S_д/2 = 0.6
E_дэ := 2*E_д = 1
β_0 := 1/(S_д*R_н*(1 + E_дэ/U_в)) = 0.00555701
θ := nthroot(3*β_0*π, 3)/deg = 21.4368
θ := 21*deg = 0.366519
cos(θ) = 0.93358
γ_1 := 0.01017 = 0.01017
γ_2 := 0.00977 = 0.00977
U_c := (U_в + 2*E_д)/cos(θ) = 22.164
I_1.с := S_д*U_c*γ_1 = 0.27049
P_сп := I_1.с*U_c/2 = 2.99757
η_в := P_вх.ст/P_сп = 0.906444
I_вх.ст = 0.137982
C_н := I_вх.ст/(2*π*f_с*U_пульс.В) = 0.00497235
U_c = 22.164
U_в = 19.6919
U_д.макс.обр := |E_д - U_c/2 - U_в/2| = 20.428
# ЧАСТЬ 3
# Параметры БТ КТ316Д
U_kbdop := 10
I_kdop := 50*10^-3
β_min := 60
β_max := 300
f_gr := 800*10^6
τ_k := 15*10^-12
C_k := 3*10^-12
φ_t := 25*10^-3
C_e := 2.5*10^-12
U_be := 0.6
P_kdop := 0.150
I_d1 := 0.1*I_y1 = 0.0006
I_d := 1/11*I_y1 = 0.000545455
I_k := 10/11*I_y1 = 0.00545455
U_ke := 0.5*E_п = 4
R_k + R_e == 0.5*E_п/I_k
0.5*E_п/I_k = 733.333
R_k := 0.8*0.5*E_п/I_k = 586.667
R_e := 0.2*0.5*E_п/I_k = 146.667
β := sqrt(β_min*β_max) = 134.164
I_b := I_k/β = 4.06558e-5
I_e := I_b + I_k = 0.0054952
U_e := R_e*(I_k + I_b) = 0.805963
U_b := U_be + U_e = 1.40596
R_d1 := (E_п - U_b)/I_d = 12089.1
R_d2 := U_b/(I_d - I_b) = 2785.19
S_p := I_k/φ_t = 0.218182
r_β := β/S_p = 614.919
C_ka := 0.5*C_k = 1.5e-12
r_b := τ_k/C_ka = 10
R_b := R_d1*R_d2/(R_d1 + R_d2) = 2263.67
R_b = 2263.67
R_n := (R_k^-1 + R_вх^-1)^-1 = 453.608
k_go := R_b/(R_b + R_г) = 0.849831
U_g := U_г*k_go = 0.00118976
R_g := R_г*k_go = 339.932
K_u := -(S_p*R_n) = -98.9691
K_uskv := -(k_go*r_β/(R_g + r_b + r_β)*S_p*R_n) = -53.6031
C_d := S_p/(2*π*f_gr) = 4.34059e-11
C_β := C_d + C_e = 4.59059e-11
f_v := 1/(2*π)*(1/(R_g + r_b) + 1/r_β)*1/(C_β + (1 + S_p*R_n)*C_k) = 2063655
C_ea := 100*S_p*r_β/(2*π*f_н*(r_β + r_b)) = 0.00034169
R_b = 2263.67
R_vhys := 1/(1/R_b + 1/(r_β + r_b)) = 489.723
C_p1 := 1/(2*π*f_н*(R_vhys + R_г)) = 1.78881e-8
C_p1 := 1/(2*π*f_н*0.64*(R_vhys + R_г)) = 2.79502e-8
C_P2 := 1/(2*π*f_н*0.64*R_вх) = 1.2434e-8
K_uckb(f) := K_uskv*f/f_н/sqrt((1 + f^2/f_н^2)*(1 + f^2/f_v^2))
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R_e = 146.667
R_b = 2263.67
I_b = 4.06558e-5
E_pb := R_b*I_b + U_be + R_e*(I_b + I_k) = 1.49799
I_b + I_k = 0.0054952
I_k1(U_be1, β_1) := (E_pb - U_be1)/(((R_b + R_e)/β_1) + R_e)
I_k1(U_be, β_max) = 0.0058047
I_k1(U_be, β_min) = 0.00480625
R_k = 586.667
I_k1(U_be, β) = 0.00545455
U_kemin(U_be1, β_1) := E_п - (R_k + R_e)*I_k1(U_be1, β_1)
U_kemin(U_be, β_max) = 3.74322
I_k = 0.00545455
