E_п := 5
δE_п := 0.012
ΔE_п := δE_п*E_п = 0.06
U_пульс := 1.5*10^-3
I_y1 := 7*10^-3
I_y := 140*10^-3
U_г := 0.7*10^-3
R_г := 300
f_н := 8*10^3
R_вх := 1.5*10^3
δU_c := 0.2
K_ст0 := δU_c/δE_п = 16.6667
R_эн := E_п/I_y = 35.7143
# Условия выбора транзистора:
U_кэ > U_кэmin
U_кэmin := 2
U_kmin := E_п + U_кэmin = 7
U_kmax := (1 + δU_c)/(1 - δU_c)*U_kmin = 10.5
I_kmax > I_y
I_y = 0.14
P_kmax := (U_kmax - E_п)*I_y = 0.77
# Выбираем транзистор | КТ630Д
U_бэ := 0.6
P_kmax1 := 1.5
I_kmax1 := 0.3
β_min := 50
β_max := 300
β := β_min = 50
I_б := I_y/(1 + β) = 0.0027451
U_б := E_п + U_бэ = 5.6
R_б := U_б/I_б = 2040
R_нс := R_б/2 = 1020
# Условия выбора стабилитрона:
U_ст.мин > 5.6
# Выбран стабилитрон КС168А, с параметрами:
U_ст.ном := 6.8
I_ст.ном := 10*10^-3
U_ст.мин := 6.12
U_ст.макс := 7.48
I_ст.мин := 3*10^-3
I_ст.макс := 45*10^-3
r_диф := 5
R_б1 := R_б*(U_ст.макс - (E_п + U_бэ))/U_ст.макс = 512.727
R_б2 := R_б - R_б1 = 1527.27
R_б = 2040
R_б1 = 512.727
R_б2 = 1527.27
I_ст.мин := 5*10^-3
I_ст.макс := 25*10^-3
δU_в := δU_c = 0.2
U_ст.макс = 7.48
I_Rc.min := I_ст.мин + U_ст.макс/R_нс = 0.0123333
I_Rc.max := I_ст.макс + U_ст.мин/R_нс = 0.031
R_нс = 1020
γ := (1 - δU_в)/(1 + δU_в) = 0.666667
R_c := (U_ст.макс - γ*U_ст.мин)/(γ*I_Rc.max - I_Rc.min) = 408
U_в := (R_c*I_Rc.min + U_ст.макс)/(1 - δU_в) = 15.64
U_кэ.мин := (1 - δU_в)*U_в - E_п = 7.512
U_кэ.мин > 2
I_б = 0.0027451
I_к := I_б*β = 0.137255
P_рас := (U_в*(1 + δU_в) - E_п)*I_к = 1.88973
P_рас > 0.8  # - Это плохо, добавляем Rк
ΔU_к := 4
R_к := ΔU_к/I_к = 29.1429
U_кэ.мин.Д := U_кэ.мин - ΔU_к = 3.512
P_рас.Д := (U_в*(1 + δU_в) - E_п - ΔU_к)*I_к = 1.34071
P_рас.Д < 1.5
r_ст.ср := U_ст.ном/I_ст.ном = 680
K_ст := (1/r_диф + 1/R_c + 1/R_нс)/(1/r_ст.ср + 1/R_c + 1/R_нс) = 41.5
K_ст > K_ст0
K_п := 1/R_c/(1/r_диф + 1/R_c + 1/R_нс) = 0.0120482
U_пульс.В := U_пульс/K_п = 0.1245
I_Rc.max = 0.031
I_Rc.min = 0.0123333
I_Rc := 0.5*(I_Rc.max + I_Rc.min) = 0.0216667
I_вх.ст := (β/(β + 1))*I_y + I_Rc = 0.158922
U_в = 15.64
R_вх.ст := U_в/I_вх.ст = 98.4133
P_вх.ст := U_в*I_вх.ст = 2.48553
η_ст := E_п*I_y/P_вх.ст = 0.28163
# РАСЧЕТ ВЫПРЯМИТЕЛЯ
f_с := 50
U_в = 15.64
I_вх.ст = 0.158922
R_н := R_вх.ст = 98.4133
U_пульс.В = 0.1245
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# Условия выбора диодов:
I_д0 := I_вх.ст/2 = 0.0794608
# Выбран диод Д206, с параметрами:
I_д0макс := 100*10^-3 = 0.1
U_обр.доп := 100
E_д := 0.5
S_д := 1.2
i_д.м.апр := 10*I_д0 = 0.794608
S_дэ := S_д/2 = 0.6
E_дэ := 2*E_д = 1
β_0 := 1/(S_д*R_н*(1 + E_дэ/U_в)) = 0.00795881
θ := nthroot(3*β_0*π, 3)/deg = 24.1636
θ := 24*deg = 0.418879
cos(θ) = 0.913545
α_0 := 0.08863 = 0.08863
γ_0 := 0.00766 = 0.00766
α_1 := 0.17417 = 0.17417
γ_1 := 0.01506 = 0.01506
α_2 := 0.16516 = 0.16516
γ_2 := 0.01428 = 0.01428
U_c := (U_в + 2*E_д)/cos(θ) = 18.2147
I_1.с := S_д*U_c*γ_1 = 0.329177
P_сп := I_1.с*U_c/2 = 2.99794
η_в := P_вх.ст/P_сп = 0.829081
I_вх.ст = 0.158922
C_н := I_вх.ст/(2*π*f_с*U_пульс.В) = 0.00406316
U_c = 18.2147
U_д.макс.обр := |E_д - U_c/2 - U_в/2| = 16.4274
# ЧАСТЬ 3
# Параметры БТ КТ368
U_kbdop := 15
I_kdop := 30*10^-3
β_min := 50
β_max := 300
f_gr := 900*10^6
τ_k := 15*10^-12
C_k := 1.7*10^-12
φ_t := 25*10^-3
C_e := 3*10^-12
U_be := 0.6
P_kdop := 0.225
I_d1 := 0.1*I_y1 = 0.0007
I_d := 1/11*I_y1 = 0.000636364
I_k := 10/11*I_y1 = 0.00636364
U_ke := 0.5*E_п = 2.5
R_k + R_e == 0.5*E_п/I_k
0.5*E_п/I_k = 392.857
R_k := 0.8*0.5*E_п/I_k = 314.286
R_e := 0.2*0.5*E_п/I_k = 78.5714
β := sqrt(β_min*β_max) = 122.474
I_b := I_k/β = 5.19589e-5
U_e := R_e*(I_k + I_b) = 0.504082
U_b := U_be + U_e = 1.10408
R_d1 := (E_п - U_b)/I_d = 6122.16
R_d2 := U_b/(I_d - I_b) = 1889.24
S_p := I_k/φ_t = 0.254545
r_β := β/S_p = 481.15
C_ka := 0.5*C_k = 8.5e-13
r_b := τ_k/C_ka = 17.6471
R_b := R_d1*R_d2/(R_d1 + R_d2) = 1443.72
R_n := (R_k^-1 + R_вх^-1)^-1 = 259.843
k_go := R_b/(R_b + R_г) = 0.827954
U_g := U_г*k_go = 0.000579568
R_g := R_г*k_go = 248.386
K_u := -(S_p*R_n) = -66.1417
K_uskv := -(k_go*r_β/(R_g + r_b + r_β)*S_p*R_n) = -35.2643
C_d := S_p/(2*π*f_gr) = 4.50135e-11
C_β := C_d + C_e = 4.80135e-11
f_v := 1/(2*π)*(1/(R_g + r_b) + 1/r_β)*1/(C_β + (1 + S_p*R_n)*C_k) = 5729305
C_ea := 100*S_p*r_β/(2*π*f_н*(r_β + r_b)) = 0.000488486
R_vhys := 1/(1/R_b + 1/(r_β + r_b)) = 370.717
C_p1 := 1/(2*π*f_н*(R_vhys + R_г)) = 2.96614e-8
C_p1 := 1/(2*π*f_н*0.64*(R_vhys + R_г)) = 4.63459e-8
C_P2 := 1/(2*π*f_н*0.64*R_вх) = 2.07233e-8
K_uckb(f) := K_uskv*f/f_н/sqrt((1 + f^2/f_н^2)*(1 + f^2/f_v^2))
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E_pb := R_b*I_b + U_be + R_e*(I_b + I_k) = 1.1791
I_k1(U_be1, β_1) := (E_pb - U_be1)/(((R_b + R_e)/β_1) + R_e)
I_k1(U_be, β_max) = 0.00692321
I_k1(U_be, β_min) = 0.00531197
I_k1(U_be, β) = 0.00636364
U_kemin(U_be1, β_1) := E_п - (R_k + R_e)*I_k1(U_be1, β_1)
U_kemin(U_be, β_max) = 2.28017
