E_п := 5
δE_п := 0.015
ΔE_п := δE_п*E_п = 0.075
U_пульс := 1.2*10^-3
I_y1 := 8*10^-3
I_y := 160*10^-3
U_г := 2*10^-3
R_г := 500
f_н := 6*10^3
R_вх := 2*10^3
δU_c := 0.2
K_ст0 := δU_c/δE_п = 13.3333
R_эн := E_п/I_y = 31.25
# Условия выбора транзистора:
U_кэ > U_кэmin
U_кэmin := 2
U_kmin := E_п + U_кэmin = 7
U_kmax := (1 + δU_c)/(1 - δU_c)*U_kmin = 10.5
I_kmax > I_y
I_y = 0.16
P_kmax := (U_kmax - E_п)*I_y = 0.88
# Выбираем транзистор | КТ630Д
U_бэ := 0.6
P_kmax1 := 1.5
I_kmax1 := 0.3
β_min := 50
β_max := 300
β := β_min = 50
I_б := I_y/(1 + β) = 0.00313725
U_б := E_п + U_бэ = 5.6
R_б := U_б/I_б = 1785
R_нс := R_б/2 = 892.5
# Условия выбора стабилитрона:
U_ст.мин > 5.6
# Выбран стабилитрон 2С156А, с параметрами:
U_ст.ном := 5.6
I_ст.ном := 10*10^-3
U_ст.мин := 5.04
U_ст.макс := 6.16
I_ст.мин1 := 3*10^-3
I_ст.макс1 := 55*10^-3
r_диф0 := 46
R_б1 := R_б*(U_ст.макс - (E_п + U_бэ))/U_ст.макс = 162.273
R_б2 := R_б - R_б1 = 1622.73
R_б = 1785
R_б1 = 162.273
R_б2 = 1622.73
I_ст.мин := 5*10^-3
I_ст.макс := 25*10^-3
δU_в := δU_c = 0.2
U_ст.макс = 6.16
I_Rc.min := I_ст.мин + U_ст.макс/R_нс = 0.011902
r_диф := r_диф0*sqrt(I_ст.мин1/I_ст.мин) = 35.6314
I_Rc.max := I_ст.макс + U_ст.мин/R_нс = 0.0306471
R_нс = 892.5
γ := (1 - δU_в)/(1 + δU_в) = 0.666667
r_диф := 12
R_c := (U_ст.макс - γ*U_ст.мин)/(γ*I_Rc.max - I_Rc.min) = 328.276
U_в := (R_c*I_Rc.min + U_ст.макс)/(1 - δU_в) = 12.5839
U_кэ.мин := (1 - δU_в)*U_в - E_п = 5.06713
U_кэ.мин > 2
I_б = 0.00313725
I_к := I_б*β = 0.156863
P_рас := (U_в*(1 + δU_в) - E_п)*I_к = 1.58442
P_рас > 1.5  # - Это плохо, добавляем Rк
ΔU_к := 3
R_к := ΔU_к/I_к = 19.125
U_кэ.мин.Д := U_кэ.мин - ΔU_к = 2.06713
P_рас.Д := (U_в*(1 + δU_в) - E_п - ΔU_к)*I_к = 1.11383
P_рас.Д < 1.5
r_ст.ср := U_ст.ном/I_ст.ном = 560
K_ст := (1/r_диф + 1/R_c + 1/R_нс)/(1/r_ст.ср + 1/R_c + 1/R_нс) = 14.7
K_ст > K_ст0
K_п := 1/R_c/(1/r_диф + 1/R_c + 1/R_нс) = 0.0348139
U_пульс.В := U_пульс/K_п = 0.034469
I_Rc := 0.5*(I_Rc.max + I_Rc.min) = 0.0212745
I_вх.ст := (β/(β + 1))*I_y + I_Rc = 0.178137
R_вх.ст := U_в/I_вх.ст = 70.6416
P_вх.ст := U_в*I_вх.ст = 2.24166
η_ст := E_п*I_y/P_вх.ст = 0.356878
# РАСЧЕТ ВЫПРЯМИТЕЛЯ
f_с := 50
U_в = 12.5839
I_вх.ст = 0.178137
R_н := R_вх.ст = 70.6416
U_пульс.В = 0.034469
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# Условия выбора диодов:
I_д0 := I_вх.ст/2 = 0.0890686
# Выбран диод Д206, с параметрами:
I_д0макс := 100*10^-3 = 0.1
U_обр.доп := 100
E_д := 0.5
S_д := 1.2
i_д.м.апр := 10*I_д0 = 0.890686
S_дэ := S_д/2 = 0.6
E_дэ := 2*E_д = 1
β_0 := 1/(S_д*R_н*(1 + E_дэ/U_в)) = 0.0109282
θ := nthroot(3*β_0*π, 3)/deg = 26.8573
θ := 26*deg = 0.453786
cos(θ) = 0.898794
α_0 := 0.08863 = 0.08863
γ_0 := 0.00971 = 0.00971
α_1 := 0.17417 = 0.17417
γ_1 := 0.01903 = 0.01903
α_2 := 0.16516 = 0.16516
γ_2 := 0.01788 = 0.01788
U_c := (U_в + 2*E_д)/cos(θ) = 15.1135
I_1.с := S_д*U_c*γ_1 = 0.345131
P_сп := I_1.с*U_c/2 = 2.60807
η_в := P_вх.ст/P_сп = 0.85951
I_вх.ст = 0.178137
C_н := I_вх.ст/(2*π*f_с*U_пульс.В) = 0.0164504
U_c = 15.1135
U_д.макс.обр := |E_д - U_c/2 - U_в/2| = 13.3487
# ЧАСТЬ 3
# Параметры БТ КТ325Б
U_kbdop := 15
I_kdop := 30*10^-3
β_min := 70
β_max := 210
f_gr := 800*10^6
τ_k := 125*10^-12
C_k := 2.5*10^-12
φ_t := 25*10^-3
C_e := 2.5*10^-12
U_be := 0.6
P_kdop := 0.225
I_d1 := 0.1*I_y1 = 0.0008
I_d := 1/11*I_y1 = 0.000727273
I_k := 10/11*I_y1 = 0.00727273
U_ke := 0.5*E_п = 2.5
R_k + R_e == 0.5*E_п/I_k
0.5*E_п/I_k = 343.75
R_k := 0.8*0.5*E_п/I_k = 275
R_e := 0.2*0.5*E_п/I_k = 68.75
β := sqrt(β_min*β_max) = 121.244
I_b := I_k/β = 5.99844e-5
U_e := R_e*(I_k + I_b) = 0.504124
U_b := U_be + U_e = 1.10412
R_d1 := (E_п - U_b)/I_d = 5356.83
R_d2 := U_b/(I_d - I_b) = 1654.64
S_p := I_k/φ_t = 0.290909
r_β := β/S_p = 416.775
C_ka := 0.5*C_k = 1.25e-12
r_b := τ_k/C_ka = 100
R_b := R_d1*R_d2/(R_d1 + R_d2) = 1264.16
R_n := (R_k^-1 + R_вх^-1)^-1 = 241.758
k_go := R_b/(R_b + R_г) = 0.716579
U_g := U_г*k_go = 0.00143316
R_g := R_г*k_go = 358.29
K_u := -(S_p*R_n) = -70.3297
K_uskv := -(k_go*r_β/(R_g + r_b + r_β)*S_p*R_n) = -24.0029
C_d := S_p/(2*π*f_gr) = 5.78745e-11
C_β := C_d + C_e = 6.03745e-11
f_v := 1/(2*π)*(1/(R_g + r_b) + 1/r_β)*1/(C_β + (1 + S_p*R_n)*C_k) = 3054700
C_ea := 100*S_p*r_β/(2*π*f_н*(r_β + r_b)) = 0.000622338
R_vhys := 1/(1/R_b + 1/(r_β + r_b)) = 366.822
C_p1 := 1/(2*π*f_н*(R_vhys + R_г)) = 3.06012e-8
C_p1 := 1/(2*π*f_н*0.64*(R_vhys + R_г)) = 4.78144e-8
C_P2 := 1/(2*π*f_н*0.64*R_вх) = 2.07233e-8
K_uckb(f) := K_uskv*f/f_н/sqrt((1 + f^2/f_н^2)*(1 + f^2/f_v^2))
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E_pb := R_b*I_b + U_be + R_e*(I_b + I_k) = 1.17995
R_b = 1264.16
I_b = 5.99844e-5
I_k1(U_be1, β_1) := (E_pb - U_be1)/(((R_b + R_e)/β_1) + R_e)
I_k = 0.00727273
R_e = 68.75
I_k1(U_be, β_max) = 0.00772271
β_max = 210
I_k1(U_be, β_min) = 0.00660603
R_k = 275
I_k1(U_be, β) = 0.00727273
U_kemin(U_be1, β_1) := E_п - (R_k + R_e)*I_k1(U_be1, β_1)
U_kemin(U_be, β_max) = 2.34532
