l(x) :=
    0 if x < 0
    1 if x ≥ 0
i := sqrt(-1)
W_0 := 1
ω_v := 10^3
α := 1*10^2
K(ω) := α^2/(α^2 + ω^2)
W_x(ω) := W_0*Φ(ω_v - |ω|)
W_y(ω) := W_0*Φ(ω_v - |ω|)*K(ω)
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r_x(τ) := sin(ω_v*τ)/(ω_v*τ)
τ_x := π/(2*α)*10^3
τ_y := 10^3/α
r_y(τ) := e^(-α*|τ|)
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K(ω, n) := (n*α)^2/((n*α)^2 + ω^2)
W_x(ω) := W_0*l(ω_v - |ω|)
W_y(ω, n) := W_0*l(ω_v - |ω|)*K(ω, n)
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r_x(τ, n) := sin(n*ω_v*τ)/(n*ω_v*τ)
τ_x := π/(2*α)*10^3
τ_y := 10^3/α
r_y(τ, n) := e^(-n*α*|τ|)
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i := 0 .. 100
j := 0, 2 .. 100
N := 100
X1 := rnorm(N, 0, 3)
X2 := rnorm(N, 0, 1)
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W_y1(ω) := W_0*K(ω, 1)
W_y2(ω) := W_0*l(α - |ω|)
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r_y1(τ) := e^(-α*|τ|)
r_y2(τ) := sin(α*τ)/(α*τ)
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A := 6
P_x(x) := l(A - |x|)/(2*A)
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σ_y1 := □
1/sqrt(2*π) = 0.398942
integral(P_x(x), x = -∞ .. ∞) = 0.999993
integral(dnorm(x, 0, 2), x = -∞ .. ∞) = 1
integral(dnorm(x, 0, 1), x = -∞ .. ∞) = 1
σ_y := W_0*α/2 = 50
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ω_р := 20*10^3
W_y(ω) := W_0*(α^2/(α^2 + (ω + ω_р)^2) + α^2/(α^2 + (ω - ω_р)^2))
ω_p := 20
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δ(τ) :=
    1 if τ == 0
    0
r_x(τ) :=
    W_0 if τ == 0
    0 otherwise
r_y(τ) := e^(-α*|τ|)*cos(ω_р*τ)
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i := 0, 2 .. 100
j := 0, 5 .. 100
N := 110
X1 := rnorm(N, 0, 0.5)
X2 := rnorm(N, 0, 2)
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