A := 3
σ(x) :=
    1 if x == 0
    0 otherwise
P_0 := 1/(2*A)
P_x(x) :=
    P_0 if |x| ≤ A
    0 if |x| > A
y_x(x) :=
    (-4) if x < -2
    (2*x) if -2 ≤ x ≤ 1
    2 if x > 1
integral(P_x(x), x = -∞ .. ∞) = 1
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integral(P_x(x), x = -∞ .. -2) = 0.166667
k_1 := integral(P_x(x), x = -∞ .. -2) = 0.166667
P_y(y) := {
    2*P_0 if -3 ≤ y ≤ 2
    0 if y < -1
    0 if y > A/2
} + k_1*σ(y + 1)
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integral(P_y(y), y = -∞ .. ∞) + k_1 = 0.999983
y_cp := integral(P_y(y)*y, y = -∞ .. ∞) - k_1 = 0.0416185
y_cpkv := integral(P_y(y)*y^2, y = -∞ .. ∞) + k_1 = 0.652856
D_y := y_cpkv - y_cp^2 = 0.651124
σ_y := sqrt(D_y) = 0.806923
integral(P_y(y), y = -∞ .. ∞) + k_1 = 0.999983
