j := sqrt(-1)
σ_x := sqrt(10) = 3.16228
α_x := 10^5
R_x(τ) := σ_x^2*e^(-α_x*|τ|)
τ_kx := 1/α_x = 1e-5
R_x(τ_kx) = 3.67879
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W_xmax := 2*σ_x^2/α_x = 0.0002
W_x(ω) := W_xmax*α_x^2/(α_x^2 + ω^2)
Δω_xef := π*α_x/2 = 157080
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R := 1*10^3
L := 10*10^-3
α_y := R/L = 100000
K2(ω) := α_y^2/(α_y^2 + ω^2)
Δω_шум := π*α_y/2 = 157080
W_ymax := W_xmax
W_y(ω) := W_x(ω)*K2(ω)
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W_x(Δω_xef) = 5.76801e-5
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P(x, x_cp, σ) := 1/(σ*sqrt(2*π))*e^(-(x - x_cp)^2/(2*σ^2))
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