T_и := 6*10^-3  # c
α := 4*10^4  # c^-1
l(x) :=
    1 if x ≥ 0
    0 if x < 0
σ_x := 0.7  # B
R_x(τ) := σ_x^2*sin(α*τ)/(α*τ)
τ_kx := π/(2*α) = 3.92699e-5
W_max.x := π*σ_x^2/α = 3.84845e-5
Δω_ef.x := α = 40000
W_x(ω) := W_max.x*l(α - |ω|)
U_0 := 2
U(t) := U_0 - U_0*3/T_и*t*l(t) + U_0*3/T_и*(t - T_и/3)*l(t - T_и/3) + U_0*l(t - 2*T_и/3) - U_0*l(t - T_и)
N_Rx := 5
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τ_kx :=
    1/α if N_Rx == 1
    2/α if N_Rx == 2
    8/(3*α) if N_Rx == 3
    sqrt(π/2)*1/α if N_Rx == 4
    π/(2*α) if N_Rx == 5
R_x(τ) :=
    σ_x^2*e^(-α*|τ|) if N_Rx == 1
    σ_x^2*(1 + α*|τ|)*e^(-α*|τ|) if N_Rx == 2
    σ_x^2*(1 + α*|τ| + α^2*τ^2/3)*e^(-α*|τ|) if N_Rx == 3
    σ_x^2*e^(-α^2*τ^2/2) if N_Rx == 4
    σ_x^2*sin(α*τ)/(α*τ) if N_Rx == 5
W_max.x :=
    2*σ_x^2/α if N_Rx == 1
    4*σ_x^2/α if N_Rx == 2
    16*σ_x^2/(3*α) if N_Rx == 3
    sqrt(2*π)*σ_x^2/α if N_Rx == 4
    π*σ_x^2/α if N_Rx == 5
Δω_ef.x :=
    π*α/2 if N_Rx == 1
    π*α/4 if N_Rx == 2
    3*π*α/16 if N_Rx == 3
    α*sqrt(π/2) if N_Rx == 4
    α if N_Rx == 5
W_x(ω) :=
    W_max.x*α^2/(α^2 + ω^2) if N_Rx == 1
    W_max.x*(α^2/(α^2 + ω^2))^2 if N_Rx == 2
    W_max.x*(α^2/(α^2 + ω^2))^3 if N_Rx == 3
    W_max.x*e^(-ω^2/(2*α^2)) if N_Rx == 4
    W_max.x*l(α - |ω|) if N_Rx == 5
Q_вх := U_0^2/σ_x^2 = 8.16327
# График функции корреляции на входе фильтра
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# График спектра мощности шума на входе фильтра
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β_0 := 10*α = 400000
Δω_шум(β) := π*β/2
K(ω, β) := β^2/(β^2 + ω^2)
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W_y(ω) := W_x(ω)*K(ω, β_0)
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U(t) := U_0 - U_0*3/T_и*t*l(t) + U_0*3/T_и*(t - T_и/3)*l(t - T_и/3) + U_0*l(t - 2*T_и/3) - U_0*l(t - T_и)
