a := 0.7
b := 0
c := 0.8
d := 0
l(x) :=
    0 if x < 0
    1 if x ≥ 0
sign(x) :=
    -1 if x < 0
    1 if x ≥ 0
A := 1/(2*a^4) = 2.08247
P_x(x) := A*l(x)*x^3*e^(-x^2/(2*a^2))
y_x(x) := c*sign(x)*x^2
integral(P_x(x), x = -∞ .. ∞) = 1
x_cp := integral(P_x(x)*x, x = -∞ .. ∞) = 1.31596  # В
y_cp := integral(P_x(x)*y_x(x), x = -∞ .. ∞) = 1.568  # В
4*c*a^2 = 1.568
24*c^2*a^4 = 3.68794
x_cpkv := integral(P_x(x)*x^2, x = -∞ .. ∞) = 1.96  # В^2
y_cpkv := integral(P_x(x)*y_x(x)^2, x = -∞ .. ∞) = 3.68794  # В^2
D_x := x_cpkv - x_cp^2 = 0.228245  # В^2
D_y := y_cpkv - y_cp^2 = 1.22931  # В^2
8*c^2*a^4 = 1.22931
σ_x := sqrt(D_x) = 0.47775  # В
σ_y := sqrt(D_y) = 1.10874  # В
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P_y(y) :=
    y/(4*a^4*c^2)*e^(-y/(2*c*a^2))
    0 if y < 0
integral(P_y(y), y = 0 .. ∞) = 1
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T2(n, p) := ((2*n - 1)!)!/(2*(2*p)^n)*sqrt(π/p)
# для степеней 0,2,4...
2*n
T1(n, p) := n!/(2*p^(n + 1))
# для степеней 1,3,5...
2*n + 1
T1(1, 1/(2*a^2)) = 0.4802
T2(2, 1/(2*a^2)) = 151.664
A*T2(2, 1/(2*a^2)) = 315.835
360*a^5*sqrt(2*π) = 151.664
1.316/1.755 = 0.749858
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a*sqrt(2*π) = 1.75464
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T1(2, 1/(2*a^2)) = 0.941192
A*T1(2, 1/(2*a^2)) = 1.96
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