a := 1.2
b := 0.11
c := 0.19
d := 0
l(x) :=
    0 if x < 0
    1 if x ≥ 0
A := 1/(2*a) = 0.416667
P_x(x) :=
    A if b - a ≤ x ≤ b + a
    0 otherwise
y_x(x) := c*|x|^3
integral(P_x(x), x = -∞ .. ∞) = 1.00004
x_cp := integral(P_x(x)*x, x = b - a .. b + a) = 0.11
y_cp := integral(P_x(x)*y_x(x), x = -∞ .. ∞) = 0.08625
x_cpkv := integral(P_x(x)*x^2, x = -∞ .. ∞) = 0.492042
y_cpkv := integral(P_x(x)*y_x(x)^2, x = -∞ .. ∞) = 0.0180799
D_x := x_cpkv - x_cp^2 = 0.479942
D_y := y_cpkv - y_cp^2 = 0.0106409
σ_x := sqrt(D_x) = 0.692779
σ_y := sqrt(D_y) = 0.103155
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P_y(y) := {
    1/(6*a*nthroot(c*y^2, 3)) if 0 ≤ y ≤ c*(b + a)^3
    0 otherwise
} + {
    1/(6*a*nthroot(c*y^2, 3)) if 0 ≤ y ≤ -(c*(b - a)^3)
    0 otherwise
}
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-(c*(b - a)^3) = 0.246056
c*(b + a)^3 = 0.427137
integral(P_y(y), y = 0 .. ∞) = 1
integral(P_y(y)*y, y = 0 .. ∞) = 0.0862746
integral(P_y(y)*y^2, y = 0 .. ∞) = 0.0182134
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P_x(x)/|d/dx(y_x(x))|
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