a := 1.4
b := 0
c := 0.12
P_x(x) := A*e^(-(x - b)^2/(2*a^2))
integral(P_x(x), x = -∞ .. ∞) = 3.50928 A
A := 1/integral(e^(-(x - b)^2/(2*a^2)), x = -∞ .. ∞) = 0.284959
A := 1/(sqrt(2*π)*a) = 0.284959
P_x(x) := A*e^(-(x - b)^2/(2*a^2))
integral(P_x(x), x = -∞ .. ∞) = 1
y_x(x) := c*x^2
x_cp := integral(P_x(x)*x, x = -∞ .. ∞) = 0
y_cp := integral(P_x(x)*y_x(x), x = -∞ .. ∞) = 0.2352
x_cpkv := integral(P_x(x)*x^2, x = -∞ .. ∞) = 1.96
y_cpkv := integral(P_x(x)*y_x(x)^2, x = -∞ .. ∞) = 0.165957
D_x := x_cpkv - x_cp^2 = 1.96
D_y := y_cpkv - y_cp^2 = 0.110638
σ_x := sqrt(D_x) = 1.4
σ_y := sqrt(D_y) = 0.332623
x_y(y) := sqrt(y/c)
P_y(y) := 2*1/(sqrt(2*π)*a)*e^(-(sqrt(y/c) - b)^2/(2*a^2))*1/(2*c*sqrt(y/c))
integral(P_y(y), y = 0 .. ∞) = 1
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