a := 0.8
c := 1.1
d := 1.6
A := 2/sqrt(π*a^3)
c*d = 1.76
P_x(x) :=
    (A*sqrt(x)*e^(-x/a)) if x ≥ 0
    0 if x < 0
0.302^2 = 0.091204
2*0.302*0.75 = 0.453
integral(P_x(x), x = 0 .. ∞) = 1
0.75^2 = 0.5625
sqrt(π*a^3)/2 = 0.634132
y_x(x) :=
    c*(x - d) if x > d
    c*(d - x) if x < d
    0 if x < 0
P_y(y) := A/c*sqrt(y/c + d)*e^(-(y/c + d)/a) + {
    A/c*sqrt(d - y/c)*e^(-(d - y/c)/a) if 0 ≤ y ≤ c*d
    0 otherwise
}
integral(P_y(y), y = 0 .. ∞) = 1.00011
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x_cp := integral(P_x(x)*x, x = -∞ .. ∞) = 1.2
y_cp := integral(P_x(x)*y_x(x), x = -∞ .. ∞) = 0.970105
x_cpkv := integral(P_x(x)*x^2, x = -∞ .. ∞) = 2.4
y_cpkv := integral(P_x(x)*y_x(x)^2, x = -∞ .. ∞) = 1.3552
D_x := x_cpkv - x_cp^2 = 0.96
D_y := y_cpkv - y_cp^2 = 0.414097
σ_x := sqrt(D_x) = 0.979796
σ_y := sqrt(D_y) = 0.643504
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c^2*(15*a^2/4 - 3*d*a + d^2) = 1.3552
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1.355 - 0.44^2 = 1.1614
P_y1(y) :=
    A/c*sqrt(y/c + d)*e^(-(y/c + d)/a) if y > 0
    A/c*sqrt(d - y/c)*e^(-(d - y/c)/a) if y > 0
sqrt(1.161) = 1.0775
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P_y4(y) :=
    A/c*sqrt(d - y/c)*e^(-(d - y/c)/a) if 0 ≤ y ≤ c*d
    0 otherwise
P_y5(y) := A/c*sqrt(y/c + d)*e^(-(y/c + d)/a) + {
    A/c*sqrt(d - y/c)*e^(-(d - y/c)/a) if 0 ≤ y ≤ c*d
    0 otherwise
}
P_y3(y) := A/c*sqrt(y/c + d)*e^(-(y/c + d)/a)
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c = 1.1
integral(P_y5(y), y = 0 .. ∞) = 1.00011
d = 1.6
a = 0.8
y := 2*c*d/sqrt(π*a^3)*integral(sqrt(x)*e^(-x/a), x = 0 .. d) - 2*c/sqrt(π*a^3)*integral(x*sqrt(x)*e^(-x/a), x = 0 .. d) + 2*c/sqrt(π*a^3)*integral(x*sqrt(x)*e^(-x/a), x = d .. ∞) - 2*c*d/sqrt(π*a^3)*integral(sqrt(x)*e^(-x/a), x = d .. ∞) = 0.970106
integral(sqrt(x)*e^(-x/a), x = 0 .. d) = 0.46833
integral(x*sqrt(x)*e^(-x/a), x = d .. ∞) = 0.418083
integral(sqrt(x)*e^(-x/a), x = d .. ∞) = 0.165803
integral(x*sqrt(x)*e^(-x/a), x = 0 .. d) = 0.342876
0.418 - 0.343 = 0.075
0.468 - 0.166 = 0.302
y2 := 2*c^2/sqrt(π*a^3)*(d^2*integral(sqrt(x)*e^(-x/a), x = 0 .. d) - 2*d*integral(x*sqrt(x)*e^(-x/a), x = 0 .. d) + integral(x^2*sqrt(x)*e^(-x/a), x = 0 .. d) + integral(x^2*sqrt(x)*e^(-x/a), x = d .. ∞) - 2*d*integral(x*sqrt(x)*e^(-x/a), x = d .. ∞) + d^2*integral(sqrt(x)*e^(-x/a), x = d .. ∞)) = 1.3552
integral(sqrt(x)*e^(-x/a), x = 0 .. d) = 0.46833
integral(x^2*sqrt(x)*e^(-x/a), x = d .. ∞) = 1.18676
integral(x*sqrt(x)*e^(-x/a), x = 0 .. d) = 0.342876
integral(x*sqrt(x)*e^(-x/a), x = d .. ∞) = 0.418083
integral(x^2*sqrt(x)*e^(-x/a), x = 0 .. d) = 0.335161
integral(sqrt(x)*e^(-x/a), x = d .. ∞) = 0.165803
0.468 + 0.166 = 0.634
0.335 + 1.187 = 1.522
-2*0.343 - 2*0.418 = -1.522
2*c^2/sqrt(π*a^3)*(d^2*0.634 - d*1.522 + 1.522) = 1.35446
y2 - y^2 = 0.414097
sqrt(y2 - y^2) = 0.643504
