a := 0.5
b := -0.2
c := 1.5
P_x(x) :=
    A if 1 - |x - b|/a ≥ 0
    0 if 1 - |x - b|/a < 0
integral(P_x(x), x = b - a .. a + b) = 1 A
y_x(x) := c*x^3
P_y(y) :=
    1/(6*a*nthroot(c*y^2, 3)) if c*(b - a)^3 < y < c*(a + b)^3
    0 otherwise
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p(x) := A*(1 - |x - b|/a)
x_sr := b = -0.2
x_2 := (a^2 + 3*b^2)/3 = 0.123333
D_x := x_2 - x_sr^2 = 0.0833333
σ := sqrt(D_x) = 0.288675
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y_sr := c*b*(a^2 + b^2) = -0.087
y_2 := c^2/7*(a^6 + 21*a^4*b^2 + 35*b^4*a^2 + 7*b^6) = 0.0265413
D_y := y_2 - y_sr^2 = 0.0189723
σ_y := sqrt(D_y) = 0.13774
integral(P_y(y), y = -∞ .. ∞) = 1
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integral(y*P_y(y), y = -∞ .. ∞) = -0.0869731
integral(y^2*P_y(y), y = -∞ .. ∞) = 0.0265493
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жёппка
