a := 2
b := 1.5
c := 1.5
d := 0
l(x) :=
    0 if x < 0
    1 if x ≥ 0
A := 1/(2*a)  # (y/c)^2
P_x(x) := A*l(1 - |x - b|/(2*a))*(1 - |x - b|/(2*a))
y_x(x) := c*l(x)*sqrt(x)
integral(P_x(x), x = -∞ .. ∞) = 0.999999
x_cp := integral(P_x(x)*x, x = -∞ .. ∞) = 1.5
y_cp := integral(P_x(x)*y_x(x), x = -∞ .. ∞) = 1.63579
x_cpkv := integral(P_x(x)*x^2, x = -∞ .. ∞) = 4.91667
y_cpkv := integral(P_x(x)*y_x(x)^2, x = -∞ .. ∞) = 3.7412
D_x := x_cpkv - x_cp^2 = 2.66667
D_y := y_cpkv - y_cp^2 = 1.0654
σ_x := sqrt(D_x) = 1.63299
σ_y := sqrt(D_y) = 1.03218
B_1(x) := 1/(2*a)*(1 - (x - b)/(2*a))
B_2(x) := 1/(2*a)*(1 - (b - x)/(2*a))
P_y(y) :=
    0 if 0 > y > c*sqrt(b - 2*a)
    y/(a*c^2)*(1 - (b - (y/c)^2)/(2*a)) if c*sqrt(b) > y > 0
    y/(a*c^2)*(1 - ((y/c)^2 - b)/(2*a)) if c*sqrt(b + 2*a) > y > c*sqrt(b)
    0 if y > c*sqrt(b + 2*a)
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x_y(y) :=
    0 if y < 0
    (y/c)^2 if y ≥ 0
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integral(P_y(y), y = 0 .. ∞) = 0.804737
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y_cp = 1.63579
1/(2*a)*integral(c*sqrt(x)*(1 - |x - b|/(2*a)), x = 0 .. b + 2*a) = 1.63578
c/(2*a)*integral(sqrt(x)*(1 - |x - b|/(2*a)), x = 0 .. b + 2*a) = 1.63578
c/(2*a)*integral(sqrt(x) - sqrt(x)*|x - b|/(2*a), x = 0 .. b + 2*a) = 1.63578
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c/(2*a)*(integral(sqrt(x), x = 0 .. b + 2*a) - integral(sqrt(x)*|x - b|/(2*a), x = 0 .. b + 2*a)) = 1.63578
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c/(2*a)*(integral(sqrt(x), x = 0 .. b + 2*a) - (integral(sqrt(x)*(b - x)/(2*a), x = 0 .. b) + integral(sqrt(x)*(x - b)/(2*a), x = b .. b + 2*a))) = 1.63578
c/(2*a)*(2*sqrt(b + 2*a)^3/3 - 1/(2*a)*(integral(sqrt(x)*(b - x), x = 0 .. b) + integral(sqrt(x)*(x - b), x = b .. b + 2*a))) = 1.63578
c/(2*a)*(2*sqrt(b + 2*a)^3/3 - 1/(2*a)*(integral(sqrt(x)*b, x = 0 .. b) - integral(sqrt(x)*x, x = 0 .. b) + integral(sqrt(x)*x, x = b .. b + 2*a) - integral(sqrt(x)*b, x = b .. b + 2*a))) = 1.63578
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c/(2*a)*(2*sqrt(b + 2*a)^3/3 - 1/(2*a)*(2*sqrt(b)^5/3 - 2*sqrt(b)^5/5 + 2*(sqrt(b + 2*a)^5 - sqrt(b)^5)/5 - 2*b*(sqrt(b + 2*a)^3 - sqrt(b)^3)/3)) = 1.63578
y_cpkv = 3.7412
1/(2*a)*integral(c^2*x*(1 - |x - b|/(2*a)), x = 0 .. b + 2*a) = 3.74119
c^2/(2*a)*integral(x*(1 - |x - b|/(2*a)), x = 0 .. b + 2*a) = 3.74119
c^2/(2*a)*integral(x - x*|x - b|/(2*a), x = 0 .. b + 2*a) = 3.74119
c^2/(2*a)*(integral(x, x = 0 .. b + 2*a) - integral(x*|x - b|/(2*a), x = 0 .. b + 2*a)) = 3.74119
c^2/(2*a)*(integral(x, x = 0 .. b + 2*a) - (integral(x*(b - x)/(2*a), x = 0 .. b) + integral(x*(x - b)/(2*a), x = b .. b + 2*a))) = 3.74121
c^2/(2*a)*((b + 2*a)^2/2 - 1/(2*a)*(integral(x*(b - x), x = 0 .. b) + integral(x*(x - b), x = b .. b + 2*a))) = 3.74121
c^2/(2*a)*((b + 2*a)^2/2 - 1/(2*a)*(integral(x*b, x = 0 .. b) - integral(x^2, x = 0 .. b) + integral(x^2, x = b .. b + 2*a) - integral(x*b, x = b .. b + 2*a))) = 3.74121
c^2/(2*a)*((b + 2*a)^2/2 - 1/(2*a)*(b*b^2/2 - b^3/3 + ((b + 2*a)^3 - b^3)/3 - b*((b + 2*a)^2 - b^2)/2)) = 3.74121
(b + 2*a)^2/2 - 1/(2*a)*(b*b^2/2 - b^3/3 + ((b + 2*a)^3 - b^3)/3 - b*((b + 2*a)^2 - b^2)/2) = 6.65104
