a := 0.5
b := 1.4
c := 0.1
d := 0
l(x) :=
    0 if x < 0
    1 if x ≥ 0
sign(x) :=
    -1 if x < 0
    1 if x ≥ 0
A := 1/(sqrt(2*π)*a)
P_x(x) := A*e^(-(x - b)^2/(2*a^2))
y_x(x) := c*|x|^3
integral(P_x(x), x = -∞ .. ∞) = 1
x_cp := integral(P_x(x)*x, x = -∞ .. ∞) = 1.4  # В
y_cp := integral(P_x(x)*y_x(x), x = -∞ .. ∞) = 0.379408  # В
x_cpkv := integral(P_x(x)*x^2, x = -∞ .. ∞) = 2.21  # В^2
y_cpkv := integral(P_x(x)*y_x(x)^2, x = -∞ .. ∞) = 0.276824  # В^2
D_x := x_cpkv - x_cp^2 = 0.25  # В^2
D_y := y_cpkv - y_cp^2 = 0.132873  # В^2
σ_x := sqrt(D_x) = 0.5  # В
σ_y := sqrt(D_y) = 0.364518  # В
P_y(y) :=
    1/(3*a*sqrt(2*π)*nthroot(c*y^2, 3))*(e^(-(nthroot(y/c, 3) - b)^2/(2*a^2)) + e^(-(-nthroot(y/c, 3) - b)^2/(2*a^2)))
    0 if y < 0
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integral(P_y(y), y = 0 .. ∞) = 1
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