U_0 := 0.2
a := 0.7
γ := 0.5*10^3
l(x) :=
    0 if x < 0
    1 if x ≥ 0
U(t) := l(t)*U_0*e^(-γ*t)
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P_x(x) := 1/(2*a^4)*l(x)*x^3*e^(-x^2/(2*a^2))
x_cp := integral(P_x(x)*x, x = -∞ .. ∞) = 1.31596
x_cpkv := integral(P_x(x)*x^2, x = -∞ .. ∞) = 1.96
D_x := x_cpkv - x_cp^2 = 0.228245
σ_x := sqrt(D_x) = 0.47775
K(p, α) := (α/(p + α))^2
U_p(p) := U_0*1/(p + γ)
V(p, α) := K(p, α)*U_p(p)
U_0*α^2/((s + γ)*(s + α)^2) invlaplace → α^2*(e^(-500.0*t) - 1.0*e^(-1.0*α*t) + 500.0*t*e^(-1.0*α*t) - 1.0*α*t*e^(-1.0*α*t))/(5.0*α^2 - 5000.0*α + 1250000)
V_p(p, α) := U_0*α^2/((p + γ)*(p + α)^2)
V(t, α) := α^2*(e^(-500.0*t) - 1.0*e^(-1.0*α*t) + 500.0*t*e^(-1.0*α*t) - 1.0*α*t*e^(-1.0*α*t))/(5.0*α^2 - 5000.0*α + 1250000)
Δω_эф := 10^6
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Δω_эф == β*sqrt(π/2)
β := Δω_эф*sqrt(2/π) = 797885
W_x.max := sqrt(2*π)*σ_x^2/β = 7.17054e-7
W_y.max == W_x.max*K(0)^2 == W_x.max
W_y.max(σ_y, α) := 4*σ_y^2/α
σ_y(α) := sqrt(sqrt(2*π)*σ_x^2*α/(4*β))
q(t, α) := V(t, α)/σ_y(α)
α1 := 600
α2 := 800
α3 := 1000
α4 := 1200
α5 := 1400
α6 := 1600
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α8 := 1000
α9 := 1050
α10 := 1100
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t_opt := 2.431*10^-3
α_opt := 1050
q(t_opt, α_opt) = 6.08585
σ_y(α_opt) = 0.0137196
σ_y1 := σ_y(α_opt)
σ_y(α_opt)^2 = 0.000188227
α_optt := 1.05
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V(t_opt, α_opt) = 0.0834953
τ_к.вх := sqrt(π/2)*1/β = 1.5708e-6
τ_к.вых := 2/α_opt = 0.00190476
Δω_эф.вых := π*α_opt/4 = 824.668
Δf_эф.вых := Δω_эф.вых/(2*π) = 131.25
Δf_эф.вх := Δω_эф/(2*π) = 159155
q_вх := U_0/σ_x = 0.418629
# Вход | Выход
x_cp = 1.31596
y_cp := x_cp = 1.31596  # В
σ_x^2 = 0.228245
σ_y1^2 = 0.000188227  # В^2
σ_x = 0.47775
σ_y1 = 0.0137196  # В
W_x.max = 7.17054e-7
W_y.max(σ_y1, α_opt) = 7.17054e-7  # В^2/Гц
Δf_эф.вх = 159155
Δf_эф.вых = 131.25  # Гц
Δω_эф = 1000000
Δω_эф.вых = 824.668  # рад/с
τ_к.вх = 1.5708e-6
τ_к.вых = 0.00190476  # с
# -
t_opt = 0.002431  # с
U_0 = 0.2
V(t_opt, α_opt) = 0.0834953  # В
q_вх = 0.418629
q(t_opt, α_opt) = 6.08585  # безразмерное
α_opt = 1050  # рад/с
β = 797885
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W_max := 0.717
W_вх(f) := W_max*e^(-(2*π*f)^2/(2*β^2))
Δf_эф.вх = 159155
Δf_ef.vx := 159.155
Δf_эф.вых = 131.25
Δf_ef.vix := 131.25
W_вых(f) := W_max*(α_opt^2/(α_opt^2 + (2*π*f)^2))^2
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R_вх(τ) := σ_x^2*e^(-β^2*τ^2/2)
τ_к.вх = 1.5708e-6
τ_k.vx := 1.571
R_вых(τ) := σ_y(α_opt)^2*(1 + α_opt*|τ|)*e^(-(α_opt*|τ|))
τ_к.вых = 0.00190476
τ_k.vix := 1.905
r_вх(τ) := R_вх(τ)/σ_x^2
r_вых(τ) := R_вых(τ)/σ_y(α_opt)^2
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P_вых(y) := 1/(σ_y(α_opt)*sqrt(2*π))*e^(-(y - y_cp)^2/(2*σ_y(α_opt)^2))
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x_cp + 3*σ_x = 2.74921
x_cp = 1.31596
x_cp - 3*σ_x = -0.11729
y_cp := x_cp = 1.31596
σ_x = 0.47775
σ_y1 = 0.0137196
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τ_к.вых(α) := 2/α
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β = 797885
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α_opt = 1050
σ_y(α_opt) = 0.0137196
τ_к.вых(α_opt) = 0.00190476
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10*α_opt = 10500
σ_y(10*α_opt) = 0.0433851
τ_к.вых(10*α_opt) = 0.000190476
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0.1*α_opt = 105
σ_y(0.1*α_opt) = 0.00433851
τ_к.вых(0.1*α_opt) = 0.0190476
