U_0 := 0.6
a := 2.8
A := 1/27.513 = 0.0363465
γ := 10^4
c := 0.4
P_x(x) :=
    (A*x^2*e^(-x^2/(2*a^2))) if x ≥ 0
    0 if x < 0
d := 2.3
l(t) :=
    1 if t ≥ 0
    0 if t < 0
x_cp := integral(P_x(x)*x, x = -∞ .. ∞) = 4.46811
x_cpkv := integral(P_x(x)*x^2, x = -∞ .. ∞) = 23.5198
U(t) := l(t)*U_0*exp(-γ*t)
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D_x := x_cpkv - x_cp^2 = 3.55575
σ_x := sqrt(D_x) = 1.88567
K(p, α) := α/(p + α)
U_p(p) := U_0*1/(p + γ)
V(p, α) := K(p, α)*U_p(p)
V_p(p, α) := U_0*α/((p + γ)*(p + α))
V(t, α) := U_0*α*1/(γ - α)*(e^(-α*t) - e^(-γ*t))
Δf_эф := 5*10^6
Δω_эф := 2*π*Δf_эф = 31415927
Δω_эф == β
β := Δω_эф = 31415927
W_x.max := π*σ_x^2/β = 3.55575e-7
W_y.max(σ_y, α) := 2*σ_y^2/α
W_x.max == W_y.max
σ_y(α) := sqrt(W_x.max*α/2)
α1 := 5000
α2 := 7000
α3 := 10001
q(t, α) := V(t, α)/σ_y(α)
α4 := 15000
α5 := 20000
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α6 := 9001
α7 := 10001
α8 := 11001
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t_opt := 100*10^-6
α_opt := 10001
q(t_opt, α_opt) = 5.23487
σ_y(α_opt) = 0.042167
σ_y(α_opt)^2 = 0.00177805
α_optt := 10
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V(t_opt, α_opt) = 0.220739
τ_к.вх := π/(2*β) = 5e-8
τ_к.вых := 1/α_opt = 9.999e-5
Δω_эф.вых := π*α_opt/2 = 15709.5
Δf_эф.вых := Δω_эф.вых/(2*π) = 2500.25
q_вх := U_0/σ_x = 0.318189
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W_max := W_x.max = 3.55575e-7
W_вх(f) := W_max*l(β - |2*π*f|)
Δf_эф = 5000000
W_вых(f) := W_max*α_opt^2/(α_opt^2 + (2*π*f)^2)
Δf_эф.вых = 2500.25
Δf_eff1.vx := Δf_эф*10^-6 = 5  # МГц
Δf_eff1.vix := Δf_эф.вых*10^-6 = 0.00250025  # МГц
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Δf_eff2.vx := Δf_эф*10^-3 = 5000  # кГц
Δf_eff2.vix := Δf_эф.вых*10^-3 = 2.50025  # кГц
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R_вх(τ) := σ_x^2*sin(β*τ)/(β*τ)
τ_к.вх = 5e-8
R_вых(τ) := σ_y(α_opt)^2*e^(-α_opt*|τ|)
τ_к.вых = 9.999e-5
r_вх(τ) := R_вх(τ)/σ_x^2
τ_k1.vx := τ_к.вх*10^6 = 0.05
r_вых(τ) := R_вых(τ)/σ_y(α_opt)^2
τ_k1.vix := τ_к.вых*10^6 = 99.99
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P_вх(x) :=
    (A*x^2*e^(-x^2/(2*a^2))) if x ≥ 0
    0 if x < 0
x_cp = 4.46811
P_вых(x) := 1/(σ_y(α_opt)*sqrt(2*π))*e^(-(x - x_cp)^2/(2*σ_y(α_opt)^2))
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x_cp = 4.46811  # В
x_cp + 3*σ_x = 10.1251
y_cp := 4.468  # В
x_cp - 3*σ_x = -1.1889
σ_x = 1.88567  # В
σ_y1 := σ_y(α_opt) = 0.042167  # В
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τ_к.вых(α) := 1/α
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α_opt = 10001
σ_y(α_opt) = 0.042167
τ_к.вых(α_opt) = 9.999e-5
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10*α_opt = 100010
σ_y(10*α_opt) = 0.133344
τ_к.вых(10*α_opt) = 9.999e-6
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0.1*α_opt = 1000.1
σ_y(0.1*α_opt) = 0.0133344
τ_к.вых(0.1*α_opt) = 0.0009999
