U_0 := 0.25
a := 0.5
A := 1/(2*a)
b := -0.2
T_0 := 0.3*10^-3
c := 1.5
U(t) := U_0*Φ(t) - U_0/T_0*t*Φ(t) + U_0/T_0*(t - T_0)*Φ(t - T_0)
P_x(x) :=
    A if 1 - |x - b|/a ≥ 0
    0 if 1 - |x - b|/a < 0
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x_cp := integral(P_x(x)*x, x = -∞ .. ∞) = -0.19992
x_cpkv := integral(P_x(x)*x^2, x = -∞ .. ∞) = 0.123319
D_x := x_cpkv - x_cp^2 = 0.0833515
σ_x := sqrt(D_x) = 0.288707
K(p, α) := (α/(p + α))^2
U_p(p) := U_0*1/p - U_0/T_0*1/p^2 + U_0/T_0*1/p^2*e^(-p*T_0)
V(p, α) := K(p, α)*U_p(p)
V_p(p, α) := U_0*1/p*(α/(p + α))^2 - U_0/T_0*1/p^2*(α/(p + α))^2 + U_0/T_0*1/p^2*(α/(p + α))^2*e^(-p*T_0)
V(t, α) := U_0*(1 - (1 + α*t)*e^(-α*t))*Φ(t) - U_0/T_0*(1 - e^(-α*t))^2*Φ(t) + U_0/T_0*(1 - e^(-α*(t - T_0)))^2*Φ(t - T_0)
β := 3*10^6
Δω_эф := π*β/(2*sqrt(2)) = 3332162
W_x.max := 2*sqrt(2)*σ_x^2/β = 7.85845e-8
W_x.max == W_y.max
W_y.max(σ_y, α) := 4*σ_y^2/α
σ_y(α) := sqrt(W_x.max*α/4)
q(t, α) := V(t, α)/σ_y(α)
α1 := 1000
α2 := 5000
α3 := 10001
α4 := 20000
α5 := 30000
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α6 := 9001
α7 := 10001
α8 := 11001
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t_opt := 100*10^-6
α_opt := 10001
q(t_opt, α_opt) = -23753.2
σ_y(α_opt) = 0.0140172
σ_y(α_opt)^2 = 0.000196481
α_optt := 10
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V(t_opt, α_opt) = -332.953
τ_к.вх := π/(2*β) = 5.23599e-7
τ_к.вых := 1/α_opt = 9.999e-5
Δω_эф.вых := π*α_opt/2 = 15709.5
Δf_эф.вых := Δω_эф.вых/(2*π) = 2500.25
q_вх := U_0/σ_x = 0.865931
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W_max := W_x.max = 7.85845e-8
W_вх(f) := W_max*l(β - |2*π*f|)  # error: Значение должно быть функцией, но имеет форму: объем.
Δf_эф =  # error: Эта переменная не определена.
W_вых(f) := W_max*α_opt^2/(α_opt^2 + (2*π*f)^2)
Δf_эф.вых = 2500.25
Δf_eff1.vx := Δf_эф*10^-6  # error: Эта переменная не определена.  # МГц
Δf_eff1.vix := Δf_эф.вых*10^-6 = 0.00250025  # МГц
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Δf_eff2.vx := Δf_эф*10^-3  # error: Эта переменная не определена.  # кГц
Δf_eff2.vix := Δf_эф.вых*10^-3 = 2.50025  # кГц
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R_вх(τ) := σ_x^2*sin(β*τ)/(β*τ)
τ_к.вх = 5.23599e-7
R_вых(τ) := σ_y(α_opt)^2*e^(-α_opt*|τ|)
τ_к.вых = 9.999e-5
r_вх(τ) := R_вх(τ)/σ_x^2
τ_k1.vx := τ_к.вх*10^6 = 0.523599
r_вых(τ) := R_вых(τ)/σ_y(α_opt)^2
τ_k1.vix := τ_к.вых*10^6 = 99.99
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P_вх(x) :=
    (A*x^2*e^(-x^2/(2*a^2))) if x ≥ 0
    0 if x < 0
x_cp = -0.19992
P_вых(x) := 1/(σ_y(α_opt)*sqrt(2*π))*e^(-(x - x_cp)^2/(2*σ_y(α_opt)^2))
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x_cp = -0.19992  # В
x_cp + 3*σ_x = 0.666199
y_cp := 4.468  # В
x_cp - 3*σ_x = -1.06604
σ_x = 0.288707  # В
σ_y1 := σ_y(α_opt) = 0.0140172  # В
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τ_к.вых(α) := 1/α
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α_opt = 10001
σ_y(α_opt) = 0.0140172
τ_к.вых(α_opt) = 9.999e-5
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10*α_opt = 100010
σ_y(10*α_opt) = 0.0443262
τ_к.вых(10*α_opt) = 9.999e-6
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0.1*α_opt = 1000.1
σ_y(0.1*α_opt) = 0.00443262
τ_к.вых(0.1*α_opt) = 0.0009999
