U_0 := 0.8
a := 2
b := 1.5
T_0 := 0.8*10^-3
l(x) :=
    0 if x < 0
    1 if x ≥ 0
A := 1/(2*a)
U(t) := U_0*Φ(t) - U_0*Φ(t - T_0)
P_x(x) := A*l(1 - |x - b|/(2*a))*(1 - |x - b|/(2*a))
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x_cp := integral(P_x(x)*x, x = -∞ .. ∞) = 1.5
x_cpkv := integral(P_x(x)*x^2, x = -∞ .. ∞) = 4.91667
D_x := x_cpkv - x_cp^2 = 2.66667
σ_x := sqrt(D_x) = 1.63299
γ(α) := α/sqrt(2)
g(t, α) := l(t)*(1 - e^(-γ(α)*t)*(cos(γ(α)*t) + sin(γ(α)*t)))
f(t, α) := l(t)*(t - 1/γ(α) + 1/γ(α)*e^(-γ(α)*t)*cos(γ(α)*t))
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K(p, α) := α^3/(p^2 + sqrt(2)*α*p + α^2)
U_p(p) := U_0*1/p - U_0*1/p*e^(-p*T_0)
V(p, α) := K(p, α)*U_p(p)
V_p(p, α) := U_0*1/p*α^3/(p^2 + sqrt(2)*α*p + α^2) - U_0*1/p*α^3/(p^2 + sqrt(2)*α*p + α^2)*e^(-p*T_0)
V(t, α) := U_0*g(t, α)*Φ(t) - U_0*g(t - T_0, α)*Φ(t - T_0)
Δf_эф := 0.5*10^6  # Гц
Δω_эф := 2*π*Δf_эф = 3141593  # с^-1
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Δω_эф == 3*π*β/16
β := 16*Δω_эф/(3*π) = 5333333  # с^-1
W_x.max := 16*σ_x^2/(3*β) = 2.66667e-6  # Гц/В^2
W_y.max(σ_y, α) := 2*sqrt(2)*σ_y^2/α
W_y.max == W_x.max*K(0)^2 == W_x.max
σ_y(α) := sqrt(W_x.max*α/(2*sqrt(2)))
q(t, α) := V(t, α)/σ_y(α)
α1 := 1000
α2 := 2000
α3 := 3000
α4 := 4000
α5 := 5000
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α8 := 3200
α9 := 3300
α10 := 3400
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t_opt := 0.86*10^-3
α_opt := 3300
q(t_opt, α_opt) = 13.1531
σ_y(α_opt) = 0.0557788
α_optt := 3.3
σ_y(α_opt)^2 = 0.00311127
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V(t_opt, α_opt) = 0.733665
τ_к.вх := 8/(3*β) = 5e-7
τ_к.вых := sqrt(2)/α_opt = 0.00042855
Δω_эф.вых := π*α_opt/(2*sqrt(2)) = 3665.38
Δf_эф.вых := Δω_эф.вых/(2*π) = 583.363
q_вх := U_0/σ_x = 0.489898
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W_max := W_x.max*10^6 = 2.66667
W_вх(ω) := W_max*β^2/(β^2 + ω^2)*β^2/(β^2 + ω^2)*β^2/(β^2 + ω^2)
Δf_эф = 500000
W_вых(ω) := W_max*α_opt^4/(α_opt^4 + ω^4)
Δf_эф.вых = 583.363
Δf_efvx := 0.5
Δf_efvix := 0.583
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R_вх(τ) := σ_x^2*(1 + β*|τ| + β^2*τ^2/3)*e^(-(β*|τ|))
τ_к.вх = 5e-7
R_вых(τ) := σ_y(α_opt)^2*e^(-γ(α_opt)*|τ|)*(cos(γ(α_opt)*τ) + sin(γ(α_opt)*|τ|))
τ_к.вых = 0.00042855
r_вх(τ) := R_вх(τ)/σ_x^2
τ_kvix := 0.42855
r_вых(τ) := R_вых(τ)/σ_y(α_opt)^2
τ_kvx := 0.5
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P_вх(x) :=
    A*(1 - (x - b)/(2*a)) if x > b
    A*(1 + (x - b)/(2*a)) if x < b
y_cp := x_cp
P_вых(y) := 1/(σ_y(α_opt)*sqrt(2*π))*e^(-(y - y_cp)^2/(2*σ_y(α_opt)^2))
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integral(P_вых(y), y = -∞ .. ∞) = 1
x_cp = 1.5  # В
x_cp + 3*σ_x = 6.39898
y_cp := x_cp = 1.5  # В
x_cp - 3*σ_x = -3.39898
σ_x = 1.63299  # В
σ_y1 := σ_y(α_opt) = 0.0557788  # В
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U(0) + x_cp + 3*σ_x = 6.79898
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τ_к.вых(α) := sqrt(2)/α
β = 5333333
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α_opt = 3300
σ_y(α_opt) = 0.0557788
τ_к.вых(α_opt) = 0.00042855
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10*α_opt = 33000
σ_y(10*α_opt) = 0.176388
τ_к.вых(10*α_opt) = 4.2855e-5
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0.1*α_opt = 330
σ_y(0.1*α_opt) = 0.0176388
τ_к.вых(0.1*α_opt) = 0.0042855
