U_0 := 0.6
K(p, α) := α/(p + α)
T_0 := 150*10^-6
U(t) := U_0/T_0*t*Φ(t) - 2*U_0/T_0*(t - T_0)*Φ(t - T_0) + U_0/T_0*(t - 2*T_0)*Φ(t - 2*T_0)
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U_p(p) := U_0/T_0*1/p^2 - 2*U_0/T_0*e^(-p*T_0)/p^2 + U_0/T_0*e^(-p*2*T_0)/p^2
V(p, α) := K(p, α)*U_p(p)
V_p(p, α) := U_0/T_0*1/p^2*α/(p + α) - 2*U_0/T_0*e^(-p*T_0)/p^2*α/(p + α) + U_0/T_0*e^(-p*2*T_0)/p^2*α/(p + α)
V(t, α) := U_0/T_0*(α*t - (1 - e^(-α*t)))/α*Φ(t) - 2*U_0/T_0*(α*(t - T_0) - (1 - e^(-α*(t - T_0))))/α*Φ(t - T_0) + U_0/T_0*(α*(t - 2*T_0) - (1 - e^(-α*(t - 2*T_0))))/α*Φ(t - 2*T_0)
Δf_эф := 0.25*10^6
a := 0.8
A := 2/sqrt(π*a^3)
c := 1.1
P_x(x) :=
    (A*sqrt(x)*e^(-x/a)) if x ≥ 0
    0 if x < 0
Δω_эф := 2*π*Δf_эф = 1570796
d := 1.6
x_cp := integral(P_x(x)*x, x = -∞ .. ∞) = 1.2
x_cpkv := integral(P_x(x)*x^2, x = -∞ .. ∞) = 2.4
β := 2*sqrt(2)*Δω_эф/π = 1414214
t_1 := 100*10^-6
D_x := x_cpkv - x_cp^2 = 0.96
t_2 := 150*10^-6
σ_x := sqrt(D_x) = 0.979796
W_x.max := 2*sqrt(2)*σ_x^2/β = 1.92e-6
t_3 := 200*10^-6
t_4 := 250*10^-6
t_5 := 300*10^-6
W_y.max(σ_y, α) := 2*σ_y^2/α
t_6 := 350*10^-6
W_x.max == W_y.max
t_7 := 400*10^-6
t_8 := 450*10^-6
σ_y(α) := sqrt(W_x.max*α/2)
t_9 := 500*10^-6
t_10 := 50*10^-6
q(t, α) := V(t, α)/σ_y(α)
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t_1 := 219  # мс
t_2 := 220.5  # мс
t_3 := 221  # мс
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t_opt := 220.5*10^-6  # c
α_opt := 7185
q(t_opt, α_opt) = 3.82855
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σ_y(α_opt) = 0.0830518
σ_y(α_opt)^2 = 0.0068976
V(t_opt, α_opt) = 0.317968
Δω_эф.вых := π*α_opt/2 = 11286.2
Δf_эф.вых := Δω_эф.вых/(2*π) = 1796.25
τ_к.вх := sqrt(2)/β = 1e-6
τ_к.вых := 1/α_opt = 0.000139179
q_вх := U_0/σ_x = 0.612372
W_y.max := W_x.max
T_и := T_0
U_и := U_0
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W_вх(f) := W_x.max*β^4/(β^4 + (2*π*f)^4)
W_x.max = 1.92e-6
Δf_эф.вых := Δω_эф.вых/(2*π) = 1796.25
Δf_эф := Δf_эф*10^-6 = 0.25  # МГц
W_вых(f) := W_y.max*α_opt^2/(α_opt^2 + (2*π*f)^2)
Δf_эф.вых := Δf_эф.вых*10^-6 = 0.00179625  # МГц
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Δf_эф := Δf_эф*10^3 = 250  # КГц
Δf_эф.вых := Δf_эф.вых*10^3 = 1.79625  # КГц
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γ := β/sqrt(2) = 1e6
R_вх(τ) := σ_x^2*e^(-γ*|τ|)*(cos(γ*τ) + sin(γ*|τ|))
τ_к.вх = 1e-6  # c
R_вых(τ) := σ_y(α_opt)^2*e^(-α_opt*|τ|)
τ_к.вых = 0.000139179  # c
R_вхнорм(τ) := R_вх(τ)/σ_x^2
τ_к.вх := τ_к.вх*10^3 = 0.001  # мс
R_выхнорм(τ) := R_вых(τ)/σ_y(α_opt)^2
τ_к.вых := τ_к.вых*10^3 = 0.139179  # мс
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τ_к.вх := τ_к.вх*10^3 = 1
τ_к.вых := τ_к.вых*10^3 = 139.179
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σ_y(α_opt) = 0.0830518
P_вх(x) :=
    (A*sqrt(x)*e^(-x/a)) if x ≥ 0
    0 if x < 0
P_вых(x) := 1/(σ_y(α_opt)*sqrt(2*π))*e^(-(x - x_cp)^2/(2*σ_y(α_opt)^2))
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τ_к.вх := sqrt(2)/β = 1e-6  # c
τ_к.вых := 1/α_opt = 0.000139179  # c
x_cp + 3*σ_x = 4.13939
x_cp = 1.2  # В
x_cp - 3*σ_x = -1.73939
y_cp := 1.2  # В
σ_x = 0.979796  # В
σ_y1 := σ_y(α_opt) = 0.0830518  # В
σ_x/τ_к.вх = 979796
U_вх(t) := x_cp + σ_x*cos(1/τ_к.вх*t)
U_вых(t) := y_cp + σ_y1*cos(1/τ_к.вых*t)
σ_y1/τ_к.вых = 596.727
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τ_к.вых(α) := 1/α
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α_opt = 7185
σ_y(α_opt) = 0.0830518
τ_к.вых(α_opt) = 0.000139179
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10*α_opt = 71850
σ_y(10*α_opt) = 0.262633
τ_к.вых(10*α_opt) = 1.39179e-5
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0.1*α_opt = 718.5
σ_y(0.1*α_opt) = 0.0262633
τ_к.вых(0.1*α_opt) = 0.00139179
