U_0 := 0.5
a := 1.2
b := 0.11
T_0 := 0.7*10^-3
l(x) :=
    0 if x < 0
    1 if x ≥ 0
A := 1/(2*a) = 0.416667
U(t) := U_0*Φ(t) - U_0/T_0*t*Φ(t) + U_0/T_0*(t - T_0)*Φ(t - T_0)
P_x(x) :=
    A if b - a ≤ x ≤ b + a
    0 otherwise
integral(P_x(x), x = -∞ .. ∞) = 1.00004
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x_cp := b = 0.11
x_cpkv := a^2/3 + b^2 = 0.4921
D_x := x_cpkv - x_cp^2 = 0.48
σ_x := sqrt(D_x) = 0.69282
γ(α) := α/sqrt(2)
g(t, α) := l(t)*(1 - e^(-γ(α)*t)*(cos(γ(α)*t) + sin(γ(α)*t)))
ff(t, α) := l(t)*(t - 1/γ(α) + 1/γ(α)*e^(-γ(α)*t)*cos(γ(α)*t))
K(p, α) := α^3/(p^2 + sqrt(2)*α*p + α^2)
U_p(p) := U_0*1/p - U_0/T_0*1/p^2 + U_0/T_0*1/p^2*e^(-p*T_0)
V_p(p, α) := K(p, α)*U_p(p)
V_p(p, α) := U_0*1/p*α^3/(p^2 + sqrt(2)*α*p + α^2) - U_0/T_0*1/p^2*α^3/(p^2 + sqrt(2)*α*p + α^2) + U_0/T_0*1/p^2*α^3/(p^2 + sqrt(2)*α*p + α^2)*e^(-p*T_0)
V(t, α) := U_0*g(t, α)*Φ(t) - U_0/T_0*ff(t, α)*Φ(t) + U_0/T_0*ff(t - T_0, α)*Φ(t - T_0)
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Δω_эф := 3*10^6
β := Δω_эф = 3000000
W_x.max := π*σ_x^2/β = 5.02655e-7
W_y.max(σ_y, α) := 2*sqrt(2)*σ_y^2/α
W_y.max == W_x.max*K(0) == W_x.max
σ_y(α) := sqrt(W_x.max*α/(2*sqrt(2)))
q(t, α) := V(t, α)/σ_y(α)
t_0 := 1*10^-3
α_optt := 2
α_opt := 2*10^3
q_max := q(t_0, α_opt) = 7.58366
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σ_y1 := σ_y(α_opt)*10^3 = 18.8529
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1/c
V(t_0, α_opt) = 0.142974  # В
τ_к.вх := π/(2*β) = 5.23599e-7  # с
τ_к.вых := sqrt(2)/α_opt = 0.000707107  # с
Δω_эф.вых := π*α_opt/(2*sqrt(2)) = 2221.44
1/с
Δf_эф.вых := Δω_эф.вых/(2*π) = 353.553  # Гц
q_вх := U_0/σ_x = 0.721688
Δf_эф.вх := Δω_эф/(2*π) = 477465
# Вход | Выход
x_cp = 0.11
y_cp := x_cp = 0.11  # В
σ_x^2 = 0.48
σ_y(α_opt)^2 = 0.000355431  # В^2
σ_x = 0.69282
σ_y(α_opt) = 0.0188529  # В
W_x.max = 5.02655e-7
W_y.max(σ_y(α_opt), α_opt) = 5.02655e-7  # В^2/Гц
Δf_эф.вх = 477465
Δf_эф.вых = 353.553  # Гц
Δω_эф = 3000000
Δω_эф.вых = 2221.44  # рад/с
τ_к.вх = 5.23599e-7
τ_к.вых = 0.000707107  # с
# -
t_0 = 0.001  # с
U_0 = 0.5
V(t_0, α_opt) = 0.142974  # В
q_вх = 0.721688
q(t_0, α_opt) = 7.58366  # безразмерное
α_opt = 2000  # рад/с
β = 3000000
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W_вх(f) := W_x.max*l(β - |2*π*f|)
Δf_эф.вх = 477465
Δf_ef.vx := 0.477465
W_вых(f) := W_x.max*α_opt^4/(α_opt^4 + (2*π*f)^4)
Δf_эф.вых = 353.553
Δf_ef.vix := 0.353553
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r_вх(τ) := sin(β*τ)/(β*τ)
γ := α_opt/sqrt(2)
τ_к.вх = 5.23599e-7
τ_k.vx := 0.523599
r_вых(τ) := e^(-γ*|τ|)*(cos(γ*τ) + sin(γ*|τ|))
τ_к.вых = 0.000707107
τ_k.vix := 0.707107
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r_вх(τ_к.вх) = 0.63662
r_вых(τ_к.вых) = 0.508326
P_вых(y) := 1/(sqrt(2*π)*σ_y(α_opt))*e^(-(y - y_cp)^2/(2*σ_y(α_opt)^2))
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b - a = -1.09
b + a = 1.31
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τ_к.вых(α) := sqrt(2)/α
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α_opt = 2000
σ_y(α_opt) = 0.0188529
τ_к.вых(α_opt) = 0.000707107
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10*α_opt = 20000
σ_y(10*α_opt) = 0.059618
τ_к.вых(10*α_opt) = 7.07107e-5
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0.1*α_opt = 200
σ_y(0.1*α_opt) = 0.0059618
τ_к.вых(0.1*α_opt) = 0.00707107
