a := 2.8
A := 1/27.513
P_x(x) :=
    (A*x^2*e^(-x^2/(2*a^2))) if x ≥ 0
    0 if x < 0
integral(P_x(x), x = 0 .. ∞) = 0.999991
c := 0.4
d := 2.3
y_x(x) :=
    (c*(x - d)) if x - d ≥ 0
    0 if x - d < 0
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