# Техническая электродинамика. Лабораторная работа №1. Домашняя подготовка
# Бригада №5
# Прямоугольный волновод с размерами
a := 23*10^-3  # м
b := 10*10^-3  # м
c := 3*10^8  # м/c
# Частота
f := 10^10  # Гц
# Длина волны в свободном пространстве
λ_0 := c/f = 0.03  # м
# Критическая длинна волны
λ_кр10 := 2*a = 0.046  # м
# Длина волны в H_10 в прямоугольном волноводе
λ_в := λ_0/sqrt(1 - (λ_0/λ_кр10)^2) = 0.0395742  # м
# Индуктивная диафрагма
d_L := 14*10^-3  # м
# Емкостная диафрагма
d_C := 6*10^-3  # м
# Нормированная реактивная проводимость индуктивной диафрагмы
b_L := (λ_в/a)*cot(π*d_L/(2*a))^2 = 0.857319
# Нормированная реактивная проводимость емкостной диафрагмы
b_C := (4*b/λ_в)*ln(csc(π*d_C/(2*b))) = 0.214216
j := sqrt(-1)
W := 120*π/sqrt(1 - (λ_0/λ_кр10)^2)
β := 2*π/λ_в
Zn := W
# = >
Γ := (Zn - W)/(Zn + W)
Γ = 0
U_норм(z) := e^(j*β*z)*(1 + Γ*e^(-2*j*β*z))
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Z_n := 0
Γ := (Z_n - W)/(Z_n + W)
U_норм(z) := e^(j*β*z)*(1 + Γ*e^(-2*j*β*z))
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Z_n := ∞
Γ := (Z_n - W)/(Z_n + W)
U_норм(z) := e^(j*β*z)*(1 + Γ*e^(-2*j*β*z))
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Z_n1 := 1/b_L
Γ := (Z_n1 - W)/(Z_n1 + W)
U_норм(z) := e^(j*β*z)*(1 + Γ*e^(-2*j*β*z))
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