r := 0.5
X := 0.5
z_н(Imx) := r + 1j*Imx
y_н(z) := 1/z
x(Δf) := X*Δf
Δf := [0.8; 0.85; 0.9; 0.95; 1; 1.05; 1.1; 1.15; 1.2]
z_н(x(Δf)) = [0.5 + 0.4i; 0.5 + 0.425i; 0.5 + 0.45i; 0.5 + 0.475i; 0.5 + 0.5i; 0.5 + 0.525i; 0.5 + 0.55i; 0.5 + 0.575i; 0.5 + 0.6i]
K(z_н) := (1 - |(z_н - 1)/(z_н + 1)|)/(1 + |(z_н - 1)/(z_н + 1)|)
KBV := [
    K(z_н(x(Δf[0])));
    K(z_н(x(Δf[1])));
    K(z_н(x(Δf[2])));
    K(z_н(x(Δf[3])));
    K(z_н(x(Δf[4])));
    K(z_н(x(Δf[5])));
    K(z_н(x(Δf[6])));
    K(z_н(x(Δf[7])));
    K(z_н(x(Δf[8])))
] = [0.415968; 0.407547; 0.39905; 0.390512; 0.381966; 0.373439; 0.364958; 0.356544; 0.348216]
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