r := 0.5
X := 0.5
j := sqrt(-1)
z_н(Δf) := r + j*(X*Δf)
y_н(Δf) := 1/z_н(Δf)
Δf := [0.8; 0.85; 0.9; 0.95; 1; 1.05; 1.1; 1.15; 1.2]
z_н(Δf) = [0.5 + 0.4i; 0.5 + 0.425i; 0.5 + 0.45i; 0.5 + 0.475i; 0.5 + 0.5i; 0.5 + 0.525i; 0.5 + 0.55i; 0.5 + 0.575i; 0.5 + 0.6i]
y_н(Δf) = [1.21951 - 0.97561i; 1.1611 - 0.986938i; 1.10497 - 0.994475i; 1.05125 - 0.998686i; 1 - 1i; 0.951249 - 0.998811i; 0.904977 - 0.995475i; 0.861141 - 0.990312i; 0.819672 - 0.983607i]
K(y_н) := (1 - |(1 - y_н)/(1 + y_н)|)/(1 + |(1 - y_н)/(1 + y_н)|)
KBV := [
    K(y_н(Δf[0]));
    K(y_н(Δf[1]));
    K(y_н(Δf[2]));
    K(y_н(Δf[3]));
    K(y_н(Δf[4]));
    K(y_н(Δf[5]));
    K(y_н(Δf[6]));
    K(y_н(Δf[7]));
    K(y_н(Δf[8]))
] = [0.415968; 0.407547; 0.39905; 0.390512; 0.381966; 0.373439; 0.364958; 0.356544; 0.348216]
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