# Зададим заданную нагрузку в виде функций:
r := 0.5
X := 0.5
z_н(Imx) := r + 1j*Imx
x(Δf) := X*Δf
y_н(z) := 1/z
# Зададим значения f/f0 в виде матрицы Δ и рассчитаем y:
Δ := [0.8; 0.85; 0.9; 0.95; 0.975; 1; 1.025; 1.05; 1.1; 1.15; 1.2]
z_н(x(Δ)) = [0.5 + 0.4i; 0.5 + 0.425i; 0.5 + 0.45i; 0.5 + 0.475i; 0.5 + 0.4875i; 0.5 + 0.5i; 0.5 + 0.5125i; 0.5 + 0.525i; 0.5 + 0.55i; 0.5 + 0.575i; 0.5 + 0.6i]
y_н(z_н(x(Δ))) = [1.21951 - 0.97561i; 1.1611 - 0.986938i; 1.10497 - 0.994475i; 1.05125 - 0.998686i; 1.02531 - 0.99968i; 1 - 1i; 0.975312 - 0.999695i; 0.951249 - 0.998811i; 0.904977 - 0.995475i; 0.861141 - 0.990312i; 0.819672 - 0.983607i]
# Реактивная проводимость нагрузки на центральной частоте равна -1. Находим длину параллельного шлейфа, компенсирующую эту реактивность. Выбираем шлейф с холостым ходом.
y(Y, l) := (Y + 1j*tan(2*π*l))/(1 + 1j*Y*tan(2*π*l))
y(0, 0.125) = 1i
# Подобрана длина этого шлейфа - 0.125λ_0 на центральной частоте. Рассчитаем его проводимость в полосе частот.
L_шл := 0.125*Δ = [0.1; 0.10625; 0.1125; 0.11875; 0.121875; 0.125; 0.128125; 0.13125; 0.1375; 0.14375; 0.15]
y_шл := y(0, 0.125*Δ) = [0.726543i; 0.788336i; 0.854081i; 0.92439i; 0.961481i; 1i; 1.04006i; 1.08179i; 1.17085i; 1.26849i; 1.37638i]
# Просуммируем проводимости нагрузки и шлейфа:
y_нсум := y_шл + y_н(z_н(x(Δ))) = [1.21951 - 0.249067i; 1.1611 - 0.198601i; 1.10497 - 0.140394i; 1.05125 - 0.0742954i; 1.02531 - 0.0381981i; 1; 0.975312 + 0.0403665i; 0.951249 + 0.082983i; 0.904977 + 0.175374i; 0.861141 + 0.278182i; 0.819672 + 0.392775i]
# Из условия получения на центральной частоте значения проводимости, равной 1/К_доп, находим волновое сопротивление четвертьволнового трансформатора:
# Для расчёта волнового сопротивления трансформатора, немного увеличим Kдоп, для того чтобы гарантированно попасть полосой согласования в область КБВ > 0.8:
K_доп := 1.1
z_втр := 1/sqrt(1/K_доп*Re(y_н(z_н(x(1))))) = 1.04881
Re(y_н(z_н(x(1)))) = 1
# Пересчитываем в полосе частот суммарную проводимость нагрузки и шлейфа на вход трансформатора:
y_aai(i) := y(y_нсум[i]*z_втр, 0.5*Δ[i])/z_втр
y_aa := [
    y_aai(0);
    y_aai(1);
    y_aai(2);
    y_aai(3);
    y_aai(4);
    y_aai(5);
    y_aai(6);
    y_aai(7);
    y_aai(8);
    y_aai(9);
    y_aai(10)
] = [1.22583 + 0.243558i; 1.23525 + 0.0917843i; 1.16524 - 0.0119955i; 1.07123 - 0.03872i; 1.03077 - 0.026083i; 1; 0.981522 + 0.0365096i; 0.977467 + 0.0806523i; 1.02182 + 0.180855i; 1.15819 + 0.271348i; 1.42134 + 0.28221i]
a(x) := K_доп*x/x
# Строим график частотной зависимости активной и реактивной составляющих проводимости:
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# По графику определяем максимальную полосу частот согласования по уровню активной составляющей проводимости. В нашем случае fн/f0 = 0.84 и fв/f0 = 1.175.
# Находим параметры компенсирующего параллельного шлейфа из условия компенсации реактивной составляющей суммарной проводимости на данных частотах.
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# Частота, при которой полученная прямая пересекает частотную ось является резонансной частотой шлейфа fш/f0 = 0.965 (но в расчёте будем использовать значение 0.97 для более симметричной зависимости КБВ от частоты).
# Волновое сопротивление шлейфа находится из условия компенсации шлейфом реактивной проводимости на частоте, у которой компенсируемая реактивность больше по модулю:
Im(y_aa) = [0.243558; 0.0917843; -0.0119955; -0.03872; -0.026083; 0; 0.0365096; 0.0806523; 0.180855; 0.271348; 0.28221]
Im(y_aa(f_в)) == -0.62
f_всогл := 1.13
f_шрез := 0.93
z_вшл := -1/0.27*cot(π/2*f_всогл/f_шрез) = 1.301
# Рассчитаем частотную зависимость проводимости шлейфа:
y_шл := 1/z_вшл*cot(π/2*Δ/f_шрез) = [0.171539; 0.104497; 0.038981; -0.025975; -0.0585342; -0.0913036; -0.124404; -0.157959; -0.226976; -0.299531; -0.377036]
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# Проводимость шлейфа близка к нарисованной ранее прямой.
# Суммируем проводимость в сечении а-а и проводимость шлейфа. Строим график частотной зависимости КБВ на входе согласующего устройства:
y_аа.сум := y_aa + 1j*y_шл = [1.22583 + 0.415097i; 1.23525 + 0.196281i; 1.16524 + 0.0269855i; 1.07123 - 0.0646949i; 1.03077 - 0.0846172i; 1 - 0.0913036i; 0.981522 - 0.0878941i; 0.977467 - 0.0773072i; 1.02182 - 0.0461201i; 1.15819 - 0.0281824i; 1.42134 - 0.0948255i]
ρ(x) := (1 - 1/x)/(1 + 1/x)
K(x) := (1 - |x|)/(1 + |x|)
КБВ := [
    K(ρ(y_аа.сум[0]));
    K(ρ(y_аа.сум[1]));
    K(ρ(y_аа.сум[2]));
    K(ρ(y_аа.сум[3]));
    K(ρ(y_аа.сум[4]));
    K(ρ(y_аа.сум[5]));
    K(ρ(y_аа.сум[6]));
    K(ρ(y_аа.сум[7]));
    K(ρ(y_аа.сум[8]));
    K(ρ(y_аа.сум[9]));
    K(ρ(y_аа.сум[10]))
] = [0.654663; 0.759723; 0.85646; 0.911251; 0.915161; 0.912769; 0.913359; 0.921802; 0.950784; 0.861428; 0.697465]
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