Δf := [0.8; 0.85; 0.9; 0.95; 1; 1.05; 1.1; 1.15; 1.2]
I_n := 0.162*Δf = [0.1296; 0.1377; 0.1458; 0.1539; 0.162; 0.1701; 0.1782; 0.1863; 0.1944]
l_1 := I_n + 0.051 = [0.1806; 0.1887; 0.1968; 0.2049; 0.213; 0.2211; 0.2292; 0.2373; 0.2454]
KBV_1 := [0.8; 0.85; 0.9; 0.95; 1; 0.95; 0.91; 0.86; 0.8]
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