r := 0.5
x(F) := 0.5*F  # - значения из таблицы . для индуктивности F в числителе
z_n(F) := r + sqrt(-1)*x(F)  # F=f / f0
FF := 0.8, 0.85 .. 1.2
a1 := 0.074
a2 := 0
a3 := 0.162  # расстояние от нагр до шл или трансформ
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b1 := 0.125
b2 := 0.125
z_tr := 1.62
bh1 := 0.446
bh2 := 0.397  # длинна шлейфа
# Далее всё само считается
a1*FF = [0.0592; 0.0629; 0.0666; 0.0703; 0.074; 0.0777; 0.0814; 0.0851; 0.0888]
b1*FF = [0.1; 0.10625; 0.1125; 0.11875; 0.125; 0.13125; 0.1375; 0.14375; 0.15]
FF = [0.8; 0.85; 0.9; 0.95; 1; 1.05; 1.1; 1.15; 1.2]
z_1(F, a) := (z_n(F) + sqrt(-1)*tan(2*π*a*F))/(1 + sqrt(-1)*z_n(F)*tan(2*π*a*F))
z_2(F, b) := sqrt(-1)*tan(2*π*b*F)  # кз шл  # формулы для пересчета  сопротивления нагрузки и шлейфа
z_3(F, b) := 1/(sqrt(-1)*tan(2*π*b*F))  # хх шл
ZA(F) := z_1(F, a1) + z_2(F, b1)
z_n(FF) = [0.5 + 0.4i; 0.5 + 0.425i; 0.5 + 0.45i; 0.5 + 0.475i; 0.5 + 0.5i; 0.5 + 0.525i; 0.5 + 0.55i; 0.5 + 0.575i; 0.5 + 0.6i]
ZA(FF) = [0.767824 + 1.4853i; 0.814896 + 1.60538i; 0.868912 + 1.73111i; 0.931026 + 1.86294i; 1.00262 + 2.00131i; 1.08535 + 2.14654i; 1.18118 + 2.29885i; 1.29241 + 2.45816i; 1.42168 + 2.62403i]
YB(F) := 1/z_1(F, a2) + 1/z_2(F, b2)
# БУКВА C
zo(f) := z_1(f, a3)  # пересчет сопротивления нагр к тр
z_tr1(f) := zo(f)/z_tr
z_tr2(F) := (z_tr1(F) + sqrt(-1)*tan(π/2*F))/(1 + sqrt(-1)*z_tr1(F)*tan(π/2*F))  # внутри трансформатора считаем
YB(FF) = [1.21951 - 2.35199i; 1.1611 - 2.25543i; 1.10497 - 2.16532i; 1.05125 - 2.08048i; 1 - 2i; 0.951249 - 1.9232i; 0.904977 - 1.84956i; 0.861141 - 1.77865i; 0.819672 - 1.71015i]
ZC(F) := z_tr2(F)*z_tr
# БУКВА D
ZC(FF) = [1.58441 - 0.904962i; 1.3193 - 0.695309i; 1.14947 - 0.466966i; 1.04891 - 0.233994i; 1.00243 + 0.00146606i; 1.00378 + 0.242353i; 1.05478 + 0.493864i; 1.1666 + 0.761853i; 1.36426 + 1.05022i]
zd1(F) := z_n(F) + z_2(F, bh1)  # шлейф и нагрузка вместе
zd2(F) := (zd1(F) + sqrt(-1)*tan(2*π*F/8))/(1 + sqrt(-1)*zd1(F)*tan(2*π*F/8))  # пересчет сопротивления
ZD(F) := zd2(F) + z_2(F, bh2)  # второй линия от нагр и первого шл + шлейф
# Ответы (в виде массивов сопротивлений)
π/2*FF = [1.25664; 1.33518; 1.41372; 1.49226; 1.5708; 1.64934; 1.72788; 1.80642; 1.88496]
FF = [0.8; 0.85; 0.9; 0.95; 1; 1.05; 1.1; 1.15; 1.2]
ZA(FF) = [0.767824 + 1.4853i; 0.814896 + 1.60538i; 0.868912 + 1.73111i; 0.931026 + 1.86294i; 1.00262 + 2.00131i; 1.08535 + 2.14654i; 1.18118 + 2.29885i; 1.29241 + 2.45816i; 1.42168 + 2.62403i]
YB(FF) = [1.21951 - 2.35199i; 1.1611 - 2.25543i; 1.10497 - 2.16532i; 1.05125 - 2.08048i; 1 - 2i; 0.951249 - 1.9232i; 0.904977 - 1.84956i; 0.861141 - 1.77865i; 0.819672 - 1.71015i]
ZC(FF) = [1.58441 - 0.904962i; 1.3193 - 0.695309i; 1.14947 - 0.466966i; 1.04891 - 0.233994i; 1.00243 + 0.00146606i; 1.00378 + 0.242353i; 1.05478 + 0.493864i; 1.1666 + 0.761853i; 1.36426 + 1.05022i]
ZD(FF) = [0.275699 - 2.35456i; 0.376407 - 1.55151i; 0.513966 - 0.948179i; 0.714216 - 0.44579i; 1.02301 - 0.0106121i; 1.51637 + 0.323205i; 2.26414 + 0.370529i; 3.03134 - 0.267419i; 2.94201 - 1.45434i]
