U_g := 0.5*10^-3  # Транзистор КТ312В
β_min := 50
β_max := 280
R_g := 2*10^3
β := sqrt(β_min*β_max) = 118.322
f_min := 5*10^3
f_max := 600*10^3
C_k := 5*10^-12
C_e := 20*10^-12
U_n := 1
I_km := 30*10^-3
P_k_max := 225*10^-3
R_n := 100
F_T := 120*10^6
τ := 15*10^-12
E_p := 10
φ_T := 25*10^-3
# 1. Расчёт сквозного коэффициента усиления
K_skv := -U_n/U_g = -2000
K_vh := 0.8
K_u7 := 0.9
K_u5 := 0.9
K_u3 := 0.9
K_u1 := 0.9
K_u4 := nthroot(K_skv/(K_vh*K_u1*K_u3*K_u5*K_u7), 3) = -15.6191
α := 0.5
K_u2 := α*K_u4 = -7.80956
K_u6 := α^-1*K_u4 = -31.2382
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# Расчёт простого ЭП1
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R_e1 := R_n = 100  # Ом
U_e1 := U_n = 1
R_e1_ekv := R_e1*R_n/(R_e1 + R_n) = 50
I_e11 := U_n/R_e1_ekv = 0.02
I_e01 := 1.25*I_e11 = 0.025
# Расчитать постоянное напряжение на сопротивлении в цепи эмиттера
U_e01 := R_e1*I_e01 = 2.5
I_e_max := I_e01 + I_e11 = 0.045
U_e_max := U_e01 + U_e1 = 3.5
# Проверить условие нахождения БТ в АО
E_p - U_e_max = 6.5  # В > 1 В
I_e_max = 0.045  # А < 30 мА
# Условие не выполнено. Используем ЭП с генератором тока
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I_n := U_n/R_n = 0.01
I_n = 0.01
I_e11 := I_n = 0.01
# Чтобы БТ не заходил в ОО и не вносил нелинейные скажения, примем
I_e01 := 1.25*I_e11 = 0.0125
# Расчет токов эммитера и базы транзистора VTгт
β_gt := β = 118.322
I_e01 + I_e11 = 0.0225
I_k0_gt := I_e01 = 0.0125
# меньше чем Iк импульсное допустимое, поэтому мы можем использовать этот транзистор в этом каскаде
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I_b0_gt := I_k0_gt/β_gt = 0.000105644
I_e0_gt := (β_gt + 1)*I_b0_gt = 0.0126056
# Выбор Rэгт
# Для обеспечения достаточной стабильности постоянного тока коллектора и повышения
# выходного сопротивления транзистора по переменному сигналу в 10-15 раз, достаточно выбрать Rэгт=25-30Ом
R_e_gt := 25  # Ом
# Расчёт делителя
I_del := 10*I_b0_gt = 0.00105644
U_b0_gt := I_e0_gt*R_e_gt + 0.6 = 0.915141
R_del1 := (E_p - U_b0_gt)/I_del = 8599.48
R_del2 := U_b0_gt/I_del = 866.248
# Выбор постоянного напряжения на эмметере БТ VT1
U_ke1_min == E_p - U_e01 - U_n
U_ke_gt_min == U_e01 - R_e_gt*I_e0_gt - U_n
U_ke1_min ≥ 1
# Если учесть что
U_ke_min_dop == 1
U_e01 := 2 + U_n + R_e_gt*I_e0_gt = 3.31514
U_ke1_min := E_p - U_e01 - U_n = 5.68486  # В > 1 В
U_ke_gt_min := U_e01 - R_e_gt*I_e0_gt - U_n = 2  # В > 1 В
# Расчёт первого каскада
I_b01 := I_e01/(1 + β) = 0.000104759
I_k01 := β*I_b01 = 0.0123952
r_b1 := τ/(0.5*C_k) = 6
r_β1 := φ_T/I_b01 = 238.643
I_b11 := I_e11/(1 + β) = 8.38071e-5
K_u1 := R_n*(1 + β)/(R_n*(1 + β) + r_β1 + r_b1) = 0.979909
U_b11 := (r_β1 + r_b1)*I_b11 + R_n*I_n = 1.0205
U_b01 := U_e01 + 0.6 = 3.91514
R_vh1 := R_n*(1 + β) + r_β1 + r_b1 = 12176.8
# Итоги ЭП1
U_b01 = 3.91514
R_vh1 = 12176.8
I_b01 = 0.000104759
r_b1 = 6
U_b11 = 1.0205
I_e01 = 0.0125
r_β1 = 238.643
K_u1 = 0.979909
I_k01 = 0.0123952
# Расчет УС2
# Порядок расчёта УС2
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I_k02 := 30*I_b01 = 0.00314277
U_k02 := U_b01 = 3.91514
R_k2 := (E_p - U_k02)/(I_k02 + I_b01) = 1873.69
R_k2_ekv := R_k2*R_vh1/(R_k2 + R_vh1) = 1623.83
R_k2/R_vh1 = 0.153874  # < 1 - проверка условия слабого влияния след. каскада
K_u2 = -7.80956
K_u2 == -β*R_k2_ekv/(r_b2 + r_β2 + (β + 1)*R_e2)
# Постоянная составляющая тока
I_b02 := I_k02/β = 2.65612e-5
I_e02 := (1 + 1/β)*I_k02 = 0.00316933
r_β2 := φ_T/I_b02 = 941.221
r_b2 := τ/(0.5*C_k) = 6
R_e2 := 1/(1 + β)*(β*R_k2_ekv/|K_u2| - (r_b2 + r_β2)) = 198.247
# Переменная составляющая напряжения в цепи коллектора
U_k12 := U_b11 = 1.0205
U_b12 := U_k12/|K_u2| = 0.130674
# Переменная составляющая тока
I_k12 := U_k12/R_k2 = 0.000544649
I_e12 := (1 + 1/β)*I_k12 = 0.000549252
I_b12 := I_k12/β = 4.60312e-6
# Постоянное напряжение
U_e02 := R_e2*I_e02 = 0.62831
U_b02 := U_e02 + 0.6 = 1.22831
# Входное и выходное сопротивления
R_vh2 := r_b2 + r_β2 + (β + 1)*R_e2 = 24602.4
R_vih2 := U_e02/I_e02 = 198.247
U_ke2_min := U_k02 - U_k12 - U_e02 - I_e12*R_e2 = 2.15744  # > 1В
# Итоги УС2
U_b02 = 1.22831
R_vh2 = 24602.4
R_k2 = 1873.69
I_b02 = 2.65612e-5
U_b12 = 0.130674
R_vih2 = 198.247
r_b2 = 6
I_e02 = 0.00316933
K_u2 = -7.80956
R_e2 = 198.247
r_β2 = 941.221
I_k02 = 0.00314277
# Расчет ЭП3
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n := 1  # Число диодов в цепи эмиттера
U_e03 := U_b02 + n*0.6 = 1.82831
R_v2 := 490
# Постоянный ток
I_Rv2 := U_b02/R_v2 = 0.00250675
I_e03 := I_Rv2 + I_b02 = 0.00253332
I_b03 := I_e03/(1 + β) = 2.1231e-5
I_k03 := β*I_b03 = 0.00251208
# Расчёт диф сопротивлений диодов
R_dif := φ_T/I_e03 = 9.86849
R_dif_sum := n*R_dif = 9.86849
R_e3 := R_dif_sum + R_v2*R_vh2/(R_v2 + R_vh2) = 490.3  # сопротивление цепи эмиттера
# Расчёт коэффициента передачи ЭП3
r_b3 := τ/(0.5*C_k) = 6
r_β3 := φ_T*(1 + β)/I_e03 = 1177.52
K_u3 := (1 + β)*R_e3/((1 + β)*R_e3 + r_β3 + r_b3)*R_v2/(R_v2 + R_dif_sum) = 0.96082
# Переменная и постоянная составляющие напряжения на базе БТ
U_b13 := U_b12/|K_u3| = 0.136002
U_b03 := U_e03 + 0.6 = 2.42831
U_k13 := U_b12 = 0.130674
# Входное сопротивление ЭП
R_vh3 := r_b3 + r_β3 + (β + 1)*R_e3 = 59686.9
# Выходное сопротивление ЭП
R_vih3 := U_e03/I_e03 = 721.706
U_ke3_min := E_p - U_k13 - U_e03 - I_b12*R_e3 = 8.03876  # > 1В
# Итоги ЭП3
U_b03 = 2.42831
R_vh3 = 59686.9
I_b03 = 2.1231e-5
U_b13 = 0.136002
R_vih3 = 721.706
r_b3 = 6
I_e03 = 0.00253332
K_u3 = 0.96082
R_v2 = 490
r_β3 = 1177.52
I_k03 = 0.00251208
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# Расчет УС4
# Выбор Rк
R_k4 := R_vh3/8 = 7460.86
R_k4_ekv := R_k4*R_vh3/(R_k4 + R_vh3) = 6631.88
R_k4/R_vh3 = 0.125
U_k04 := U_b03 = 2.42831
I_k04 := (E_p - U_k04)/R_k4_ekv = 0.00114171
I_b04 := I_k04/β = 9.64922e-6
I_e04 := I_k04*(1 + 1/β) = 0.00115136
# Расчёт Rе4
r_β4 := φ_T*β/I_k04 = 2590.88
r_b4 := τ/(0.5*C_k) = 6
R_e4 := 1/(β + 1)*(β*R_k4_ekv/|K_u4| - (r_b4 + r_β4)) = 399.278
K_u4 = -15.6191
R_vh4 := r_b4 + r_β4 + (β + 1)*R_e4 = 50239.3
U_e04 := R_e4*I_e04 = 0.459713
U_b04 := U_e04 + 0.6 = 1.05971
U_b14 := U_b13/|K_u4| = 0.0087074
U_k14 := U_b13 = 0.136002
I_k14 := U_k14/R_k4 = 1.82287e-5
I_b14 := I_k14/β = 1.54061e-7
I_e14 := (1 + 1/β)*I_k14 = 1.83828e-5
R_vih4 := U_e04/I_e04 = 399.278
U_ke4_min := U_k04 - U_b13 - (U_e04 + R_e4*I_e14) = 1.82526  # > 1В
# Итоги УС4
U_b04 = 1.05971
R_vh4 = 50239.3
R_k4 = 7460.86
I_b04 = 9.64922e-6
U_b14 = 0.0087074
R_vih4 = 399.278
r_b4 = 6
I_e04 = 0.00115136
K_u4 = -15.6191
R_e4 = 399.278
r_β4 = 2590.88
I_k04 = 0.00114171
n_5 := 1  # Расчёт ЭП5
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U_e05 := U_b04 + n_5*0.6 = 1.65971
R_v4 := 798.92 = 798.92
I_Rv4 := U_b04/R_v4 = 0.00132643
I_e05 := I_Rv4 + I_b04 = 0.00133608
I_b05 := I_e05/(1 + β) = 1.11973e-5
I_k05 := β*I_b05 = 0.00132488
R_dif5 := φ_T/I_e05 = 18.7114
R_dif_sum5 := n_5*R_dif5 = 18.7114
R_e5 := R_dif_sum5 + R_v4*R_vh4/(R_v4 + R_vh4) = 805.126
r_b5 := τ/(0.5*C_k) = 6
r_β5 := φ_T*(1 + β)/I_e05 = 2232.68
K_u5 := (1 + β)*R_e5/((1 + β)*R_e5 + r_β5 + r_b5)*R_v4/(R_v4 + R_dif_sum5) = 0.954864
U_b15 := U_b14/|K_u5| = 0.009119
U_b05 := U_e05 + 0.6 = 2.25971
U_k15 := U_b14 = 0.0087074
R_vh5 := r_b5 + r_β5 + (β + 1)*R_e3 = 60742
R_vih5 := U_e05/I_e05 = 1242.22
U_ke5_min := E_p - U_k15 - U_e05 - I_b14*R_e5 = 8.33146  # > 1В
# Итоги ЭП5
U_b05 = 2.25971
R_vh5 = 60742
I_b05 = 1.11973e-5
U_b15 = 0.009119
R_vih5 = 1242.22
r_b5 = 6
I_e05 = 0.00133608
K_u5 = 0.954864
R_v4 = 798.92
r_β5 = 2232.68
I_k05 = 0.00132488
# Расчет УС6
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R_k6 := R_vh5/9 = 6749.12
R_k6_ekv := R_k6*R_vh5/(R_k6 + R_vh5) = 6074.2
U_k06 := U_b05 = 2.25971
I_k06 := (E_p - U_k06)/R_k6_ekv = 0.00127429
I_b06 := I_k06/β = 1.07697e-5
I_e06 := I_k06*(1 + 1/β) = 0.00128506
r_β6 := φ_T*β/I_k06 = 2321.33
r_b6 := τ/(0.5*C_k) = 6
R_e6 := 1/(β + 1)*(β*R_k6_ekv/|K_u6| - (r_b6 + r_β6)) = 173.313
K_u6 = -31.2382
R_vh6 := r_b6 + r_β6 + (β + 1)*R_e6 = 23007.4
K_u6 := -24
U_e06 := R_e6*I_b06*(1 + β) = 0.222718
U_b06 := U_e06 + 0.6 = 0.822718
U_k16 := U_b15 = 0.009119
U_b16 := U_k16/|K_u6| = 0.000379958
I_k16 := U_k16/R_k6 = 1.35114e-6
I_b16 := I_k16/β = 1.14192e-8
I_e16 := (1 + 1/β)*I_k16 = 1.36256e-6
R_vih6 := U_e06/I_e06 = 173.313
U_ke6_min := U_k06 - U_b15 - (U_e06 + R_e6*I_e16) = 2.02764  # > 1В
# Итоги УС6
U_b06 = 0.822718
R_vh6 = 23007.4
R_k6 = 6749.12
I_b06 = 1.07697e-5
U_b16 = 0.000379958
R_vih6 = 173.313
r_b6 = 6
I_e06 = 0.00128506
K_u6 = -24
R_e6 = 173.313
r_β6 = 2321.33
I_k06 = 0.00127429
# Расчёт 7-го каскада
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# Расчет ЭП7
R_e7 := 613
I_Re7 := U_b06/R_e7 = 0.00134212
I_e07 := I_Re7 + I_b06 = 0.00135289
I_b07 := I_e07/(1 + β) = 1.13382e-5
I_k07 := β*I_b07 = 0.00134155
U_e07 := I_e07*R_e7 = 0.82932
U_b07 := U_e07 + 0.6 = 1.42932
r_β7 := φ_T*β/I_k07 = 2204.94
r_b7 := τ/(0.5*C_k) = 6
R_vh7 := r_b7 + r_β7 + (β + 1)*R_e7*R_vh6/(R_e7 + R_vh6) = 73456.8
K_u7 := (β + 1)*R_e7*R_vh6/(R_e7 + R_vh6)/((β + 1)*R_e7*R_vh6/(R_e7 + R_vh6) + r_β7 + r_b7) = 0.969901
U_ke7_min := E_p - U_b16 - U_e07 - I_b16*R_e7 = 9.17029  # > 1В
# Итоги ЭП7
U_b07 = 1.42932
R_e7 = 613
I_b07 = 1.13382e-5
K_u7 = 0.969901
r_b7 = 6
I_e07 = 0.00135289
R_vh7 = 73456.8
r_β7 = 2204.94
I_k07 = 0.00134155
R_vh_us := R_vh7 = 73456.8
K_vh_us := R_vh_us/(R_vh_us + R_g) = 0.973495
I_b0_us := I_b07 = 1.13382e-5
U_b0_us := U_b07 = 1.42932
# Проверка суммарного коэффициента усилителя
K_skv = -2000
K_u1 = 0.979909
K_skv_sum := 0.8*K_u1*K_u2*K_u3*K_u4*K_u5*K_u6*K_u7 = -2042.12
K_u2 = -7.80956
K_u3 = 0.96082
K_u4 = -15.6191
K_u5 = 0.954864
K_u6 = -24
K_u7 = 0.969901
I_k01 = 0.0123952
U_ke1_min = 5.68486
U_ke_gt_min = 2
I_k02 = 0.00314277
U_ke2_min = 2.15744
I_k03 = 0.00251208
U_ke3_min = 8.03876
I_k04 = 0.00114171
U_ke4_min = 1.82526
I_k05 = 0.00132488
U_ke5_min = 8.33146
I_k06 = 0.00127429
U_ke6_min = 2.02764
U_ke7_min = 9.17029
I_k07 = 0.00134155
I_b07 = 1.13382e-5
U_b07 = 1.42932
U_e01 = 3.31514
# ЧАСТЬ 2
# Рассчитаем  цепь обратой связи
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R_g = 2000
K_vh_us := 0.8
R_vh7 = 73456.8
R_vh_sum := 4*R_g = 8000
R_g = 2000
R_b := R_vh_sum*R_vh7/(R_vh7 - R_vh_sum) = 8977.74
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I_Ros1 := 4*I_b07 = 4.53526e-5
U_Ros2 := U_b07 + I_b07*R_b = 1.53111
R_os1 := (U_e01 - U_Ros2)/I_Ros1 = 39336.9
R_os2 := U_Ros2/(I_Ros1 - I_b07) = 45013.5
K_Uos := U_b07/U_e01 = 0.431149
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T_f := K_Uos*3*|K_skv|/(2*π*f_min) = 0.0823434
R_os_sum := 1/(1/R_os2 + 1/R_os1 + 1/(R_b + R_vh7)) = 16731.4
C_f := T_f*(1/R_os2 + 1/R_os1) = 3.92259e-6
# Часть 3. Расчёт частотных характеристик.
# Расчёт ЭП1
S_p1 := I_k01/φ_T = 0.49581
C_dif1 := S_p1/(2*π*F_T) = 6.57588e-10
C_vh1 := C_dif1/(1 + S_p1*R_n) + C_k = 1.80007e-11
r_vh1 := r_β1 + (1 + β)*R_n = 12170.8
R_d1 := R_vih2 + r_b1 = 204.247
R_vih2 := R_k2 = 1873.69
f_v1 := 1/(2*π*C_vh1*R_d1*r_vh1/(R_d1 + r_vh1)) = 44015212
K_u11(f) := K_u1/sqrt(1 + (f/f_v1)^2)
K_u1 = 0.979909
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# Расчёт УС2
S_p2 := I_k02/φ_T = 0.125711
C_dif2 := S_p2/(2*π*F_T) = 1.66729e-10
K_u2_0 := β*R_k2/(r_β2 + (β + 1)*R_e2) = 9.01345
r_vh2 := r_β2 + (1 + β)*R_k2 = 224513
C_vh2 := C_dif2/(1 + S_p2*R_e2) + C_k*(1 + K_u2_0) = 5.64992e-11
R_g2 := r_b2 = 6
f_v2 := 1/(2*π*C_vh2*R_g2*r_vh2/(R_g2 + r_vh2)) = 469502469
K_u22(f) := K_u2*1*1/sqrt(1 + f^2/f_v2^2)
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# Расчёт ЭП3
S_p3 := I_b03*β/φ_T = 0.100483
C_dif3 := S_p3/(2*π*F_T) = 1.3327e-10
C_vh3 := C_dif3/(1 + S_p3*R_e3) + C_k = 7.65125e-12
r_vh3 := r_β3 + (1 + β)*R_e3 = 59680.9
R_vih4 := R_k4 = 7460.86
R_d3 := R_vih4 + r_b3 = 7466.86
f_v3 := 1/(2*π*C_vh3*R_d3*r_vh3/(R_d3 + r_vh3)) = 3134339
K_u3 = 0.96082
K_u33(f) := K_u3/sqrt(1 + (f/f_v3)^2)
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# Расчёт УС4
S_p4 := I_k04/φ_T = 0.0456685
C_dif4 := S_p4/(2*π*F_T) = 6.05697e-11
K_u4_0 := β*R_k4/(r_β4 + (β + 1)*R_e4) = 17.5736
r_vh4 := r_β4 + (1 + β)*R_k4 = 892833
C_vh4 := C_dif4/(1 + S_p4*R_e4) + C_k*(1 + K_u4_0) = 9.60171e-11
R_g4 := r_b4 = 6
f_v4 := 1/(2*π*C_vh4*R_g4*r_vh4/(R_g4 + r_vh4)) = 276263332
K_u44(f) := K_u4*1*1/sqrt(1 + f^2/f_v4^2)
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# Расчёт ЭП5
S_p5 := I_b05*β/φ_T = 0.0529953
C_dif5 := S_p5/(2*π*F_T) = 7.02872e-11
C_vh5 := C_dif5/(1 + S_p5*R_e5) + C_k = 6.60959e-12
r_vh5 := r_β5 + (1 + β)*R_e5 = 98301.6
R_vih6 := R_k6_ekv = 6074.2
R_d5 := R_vih6 + r_b5 = 6080.2
f_v5 := 1/(2*π*C_vh5*R_d5*r_vh5/(R_d5 + r_vh5)) = 4205251
K_u55(f) := K_u5/sqrt(1 + (f/f_v5)^2)
K_u5 = 0.954864
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# Расчёт УС6
S_p6 := I_k06/φ_T = 0.0509715
C_dif6 := S_p6/(2*π*F_T) = 6.76031e-11
K_u6_0 := β*R_k6_ekv/(r_β6 + (β + 1)*R_e6) = 31.2464
r_vh6 := r_β6 + (1 + β)*R_k6_ekv = 727105
C_vh6 := C_dif6/(1 + S_p6*R_e6) + C_k*(1 + K_u6_0) = 1.68106e-10
R_g6 := r_b6 = 6
K_u6 = -24
f_v6 := 1/(2*π*C_vh6*R_g6*r_vh6/(R_g6 + r_vh6)) = 157793206
K_u66(f) := K_u6*1*1/sqrt(1 + f^2/f_v6^2)
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# Расчёт ЭП7
S_p7 := I_b07*β/φ_T = 0.0536619
C_dif7 := S_p7/(2*π*F_T) = 7.11714e-11
C_vh7 := C_dif7/(1 + S_p7*R_e7) + C_k = 7.09977e-12
r_vh7 := r_β7 + (1 + β)*R_e7 = 75349.1
R_vih7 := R_g*R_vh_sum/(R_g + R_vh_sum) = 1600
R_d7 := R_vih7 = 1600
K_u7 = 0.969901
f_v7 := 1/(2*π*C_vh7*R_d7*r_vh7/(R_d7 + r_vh7)) = 14308071
K_u77(f) := K_u7/sqrt(1 + (f/f_v7)^2)
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# Расчёт разделительных ёмкостей
R_vh_us = 73456.8
ω_min := 2*π*f_min = 31415.9
R_g = 2000
R_n = 100
C_p1 := 1/(sqrt(0.41)*ω_min*(R_vh_sum + R_g)) = 4.97117e-9
j := sqrt(-1)
C_p2 := 1/(sqrt(0.41)*ω_min*R_n) = 4.97117e-7  # В спецификации Ср1=5,1нФ  Ср2=2,4мФ
# Запишем выражения для коэффициентов передачи входной и выходной цепей
K_vh(f) := j*2*π*f*C_p1*R_vh_sum/(1 + j*2*π*f*C_p1*(R_vh_sum + R_g))
K_vih(f) := j*2*π*f*C_p2*R_n/(1 + j*2*π*f*C_p2*R_n)
# Расчитаем АЧХ всего усилителя
K_u_sum(f) := K_u77(f)*K_u66(f)*K_u55(f)*K_u44(f)*K_u33(f)*K_u22(f)*K_u11(f)*|K_vh(f)|*|K_vih(f)|
K_u_sum(f_min) = -1448.31
K_u_sum(f_max) = -1983.59
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f0 := 1*10^5
|K_u77(f0)| = 0.969878
|K_u66(f0)| = 24
|K_u55(f0)| = 0.954594
|K_u44(f0)| = 15.6191
|K_u33(f0)| = 0.960332
|K_u22(f0)| = 7.80956
|K_u11(f0)| = 0.979907
|K_vh(f0)| = 0.79959
|K_vih(f0)| = 0.999488
|K_u77(f0)|*|K_u66(f0)|*|K_u55(f0)|*|K_u44(f0)|*|K_u33(f0)|*|K_u22(f0)|*|K_u11(f0)|*0.8 = 2040.45
# Так как верхняя частота полосы усиления каскада меньше заданной, мы должны поставить навесную ёмкость на выход 6го каскада
# Расчёт УС6
S_p6 := I_k06/φ_T = 0.0509715
C_dif6 := S_p6/(2*π*F_T) = 6.76031e-11
K_u6_0 := β*R_k6_ekv/(r_β6 + (β + 1)*R_e6) = 31.2464
r_vh6 := r_β6 + (1 + β)*R_k6_ekv = 727105
C_vh6 := C_dif6/(1 + S_p6*R_e6) + C_k*(1 + K_u6_0) = 1.68106e-10
R_g6 := r_b6 = 6
C_sum := 1/(2*π*f_max*R_g6*r_vh6/(R_g6 + r_vh6)) = 4.42101e-8
C_nav := C_sum - C_vh6 = 4.4042e-8
f_v6 := 1/(2*π*C_sum*R_g6*r_vh6/(R_g6 + r_vh6)) = 600000
K_u6 = -24
K_u66(f) := K_u6*1*1/sqrt(1 + f^2/f_v6^2)
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# Расчитаем АЧХ всего усилителя
K_u_sum(f) := K_u77(f)*K_u66(f)*K_u55(f)*K_u44(f)*K_u33(f)*K_u22(f)*K_u11(f)*|K_vh(f)|*|K_vih(f)|
K_u_sum(f_min) = -1448.26
K_u_sum(f_max) = -1402.62
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