# Исходные данные
U_g := 4*10^-3
R_g := 6*10^3
U_n := 1.3
R_n := 250
E_p := 10
f_min := 100
f_max := 150*10^3
# Тип биполярного транзистора (БТ) - КТ333В3
β_min := 70
β_max := 280
β := sqrt(β_min*β_max) = 140
F := 450*10^6
C_k := 3.5*10^-12
C_e := 4*10^-12
τ := 300*10^-12
φ := 0.025
I_kb0 := 0.4*10^-6
I_km := 20*10^-3
# Эскизный расчёт всего усилителя, приближённый расчёт
# коэффициентов усиления промежуточных каскадов
K_скв := U_n/U_g = 325
r_b := τ/C_k = 85.7143
Ku_na1 := β*R_n/(200 + 250 + R_g) = 5.42636
K_скв = 325
K_u1ex := 0.9
K_u3ex := 0.9
K_u5ex := 0.9
K_u7ex := 0.9
K_вх := 0.8
K_u2ex := nthroot(K_скв/(K_вх*K_u1ex*K_u3ex*K_u5ex*K_u7ex*8), 3) = 4.26165
K_u2ex := -K_u2ex = -4.26165
K_u4ex := 2*K_u2ex = -8.5233
K_u6ex := 2*K_u4ex = -17.0466
# Расчёт каскадов
# ЭП1
R_e1 := R_n = 250
U_e11 := U_n = 1.3
I_n := U_n/R_n = 0.0052
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I_e11 := I_n = 0.0052
I_b11 := I_e11/(1 + β) = 3.68794e-5
I_k11 := I_b11*β = 0.00516312
I_e01 := 1.25*I_e11 = 0.0065
I_b01 := I_e01/(1 + β) = 4.60993e-5
I_k01 := I_b01*β = 0.0064539
I_k0gt := I_e01 = 0.0065
β_gt := β = 140
I_e11 + I_e01 = 0.0117
I_b0gt := I_k0gt/β_gt = 4.64286e-5
I_e0gt := (β_gt + 1)*I_b0gt = 0.00654643
R_egt := 30
U_b0gt := I_e0gt*R_egt + 0.6 = 0.796393
I_del := 10*I_b0gt = 0.000464286
R_d1 := (E_p - U_b0gt)/I_del = 19823.2
R_d2 := U_b0gt/(I_del - I_b0gt) = 1905.9
U_e01 := 2 + U_n + I_e0gt*R_egt = 3.49639
r_b1 := τ/C_k = 85.7143
r_β1 := φ/I_b01 = 542.308
K_u1 := R_n*(1 + β)/(R_n*(1 + β) + r_b1 + r_β1) = 0.982496
U_b11 := (r_b1 + r_β1)*I_b11 + U_n = 1.32316
U_b01 := U_e01 + 0.6 = 4.09639
R_vx1 := R_n*(1 + β) + r_b1 + r_β1 = 35878
U_k11 := 0
U_b01 = 4.09639
E_p - U_e01 - U_e11 = 5.20361
U_k01 := E_p = 10
I_B1(t) := I_b01 + I_b11*cos(F*t)
I_b01 = 4.60993e-5
U_B1(t) := U_b01 + U_b11*cos(F*t)
U_b01 = 4.09639
I_E1(t) := I_e01 + I_e11*cos(F*t)
I_e01 = 0.0065
U_E1(t) := U_e01 + U_e11*cos(F*t)
U_e01 = 3.49639
I_K1(t) := I_k01 + I_k11*sin(F*t)
I_k01 = 0.0064539
U_K1(t) := U_k01 + U_k11*sin(F*t)
U_k01 = 10
U_ke1.min := E_p - U_e01 - U_n = 5.20361
5.204 > 1
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U_kegt.min := U_e01 - U_n - I_e0gt*R_egt = 2
2 > 1
I_k01 = 0.0064539
I_km = 0.02  # Условие выполнено
I_b01 = 4.60993e-5
10*I_kb0 = 4e-6  # Условие выполнено
U_ke1min := E_p - U_b11 - U_e01 - U_e11 = 3.88045
□ > 1  # Условие выполнено
# Расчёт усилителя УС_2
K_u2ex = -4.26165
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# Дано:
U_b01 = 4.09639
R_vx1 = 35878
r_β1 = 542.308
I_b01 = 4.60993e-5
U_b11 = 1.32316
K_u1 = 0.982496
r_b1 = 85.7143
I_b11 = 3.68794e-5
# Расчет:
I_k02 := 2*10^-3
I_b02 := I_k02/β = 1.42857e-5
I_e02 := I_b02*(1 + β) = 0.00201429
# Добавляем n диодов в цепь эмиттера
R_dif2 := φ/I_e02 = 12.4113
n_2 := 0
U_k02 := U_b01 = 4.09639
U_k12 := U_b11 = 1.32316
U_b12 := U_k12/|K_u2ex| = 0.310481
R_k2 := (E_p - U_k02)/(I_k02 + I_b01) = 2885.3
I_k12 := U_k12/R_k2 = 0.000458587
I_b12 := I_k12/β = 3.27562e-6
I_e12 := I_b12*(1 + β) = 0.000461863
R_k2/R_vx1 = 0.0804197  # Условие выполнено
R_kper2 := R_k2*R_vx1/(R_k2 + R_vx1) = 2670.53
r_b2 := τ/C_k = 85.7143
r_β2 := φ/I_b02 = 1750
R_e2 := 1/(1 + β)*(β*R_kper2/|K_u2ex| - (r_b2 + r_β2)) = 609.18
U_e02 := R_e2*I_e02 + n_2*0.6 = 1.22706
U_e12 := R_e2*I_e12 = 0.281358
U_b02 := U_e02 + 0.6 = 1.82706
I_B2(t) := I_b02 + I_b12*cos(F*t)
I_b02 = 1.42857e-5
U_B2(t) := U_b02 + U_b12*cos(F*t)
U_b02 = 1.82706
I_E2(t) := I_e02 + I_e12*cos(F*t)
I_e02 = 0.00201429
R_vx2 := R_e2*(β + 1) + r_b2 + r_β2 = 87730.1
U_E2(t) := U_e02 + U_e12*cos(F*t)
U_e02 = 1.22706
I_K2(t) := I_k02 + I_k12*sin(F*t)
I_k02 = 0.002
U_K2(t) := U_k02 + U_k12*sin(F*t)
U_k02 = 4.09639
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U_k02 = 4.09639
U_b11 = 1.32316
U_e02 = 1.22706
U_e12 = 0.281358
I_k02 = 0.002
I_km = 0.02  # Условие выполнено
I_b02 = 1.42857e-5
10*I_kb0 = 4e-6  # Условие выполнено
U_ke2min := U_k02 - U_b11 - U_e02 - U_e12 = 1.26481
□ > 1  # Условие выполнено
# Расчёт усилителя УС_3
K_u4ex = -8.5233
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# Добавляем n диодов в цепь коллектора
R_dif3 := φ/I_b02 = 1750
n_3 := 1
U_k03 := U_b02 + n_3*0.6 = 2.42706
U_k13 := U_b12 = 0.310481
# Выбираем резистор R_к3
R_k3 := R_vx2/11 = 7975.46
R_k3per := R_k3*(R_vx2 + R_dif3)/(R_k3 + R_vx2 + R_dif3) = 7322.77
# Постоянные токи
I_k03 := (E_p - U_k03)/R_k3per = 0.00103416
I_b03 := I_k03/β = 7.38687e-6
I_e03 := I_k03 + I_b03 = 0.00104155
# Расчет R_э3
r_β3 := β*φ/I_k03 = 3384.38
r_b3 := τ/C_k = 85.7143
R_e3 := 1/(β + 1)*(β*R_k3per/|K_u4ex| - r_b3 - r_β3) = 828.444
R_vx3 := r_b3 + r_β3 + (β + 1)*R_e3 = 120281
I_k13 := U_k13/R_k3 = 3.89295e-5
I_b13 := I_k13/β = 2.78068e-7
I_e13 := I_k13 + I_b13 = 3.92076e-5
U_e03 := R_e3*I_e03 = 0.862865
U_b03 := U_e03 + 0.6 = 1.46287
U_b13 := U_k13/|K_u4ex| = 0.0364273
U_e13 := R_e3*I_e13 = 0.0324813
I_k03 = 0.00103416
I_km = 0.02  # Условие выполнено
I_b03 = 7.38687e-6
10*I_kb0 = 4e-6  # Условие выполнено
U_ke3min := U_k03 - U_b12 - U_e03 - U_e13 = 1.22123
□ > 1  # Условие выполнено
# Расчёт усилителя УС_4
K_u6ex = -17.0466
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# Добавляем n диодов в цепь коллектора
K_u6ex := -11.615
R_dif4 := φ/I_b03 = 3384.38
n_4 := 1
U_k04 := U_b03 + n_4*0.6 = 2.06287
U_k14 := U_b13 = 0.0364273
# Выбираем резистор R_к4
R_k4 := R_vx3/12 = 10023.4
R_k4per := R_k4*(R_vx3 + n_4*R_dif4)/(R_k4 + R_vx3 + n_4*R_dif4) = 9271.88
# Постоянные токи
I_k04 := (E_p - U_k04)/R_k4per = 0.000856044
I_b04 := I_k04/β = 6.1146e-6
I_e04 := I_k04 + I_b04 = 0.000862158
# Расчет R_э4
r_β4 := β*φ/I_k04 = 4088.58
r_b4 := τ/C_k = 85.7143
R_e4 := 1/(β + 1)*(β*R_k4per/|K_u6ex| - r_b4 - r_β4) = 763.001
R_vx4 := r_b4 + r_β4 + (β + 1)*R_e4 = 111757
I_k14 := U_k14/R_k4 = 3.63423e-6
I_b14 := I_k14/β = 2.59588e-8
I_e14 := I_k14 + I_b14 = 3.66019e-6
U_e04 := R_e4*I_e04 = 0.657828
U_b04 := U_e04 + 0.6 = 1.25783
U_b14 := U_k14/|K_u6ex| = 0.00313623
U_e14 := R_e4*I_e14 = 0.00279273
I_k04 = 0.000856044
I_km = 0.02  # Условие выполнено
I_b04 = 6.1146e-6
10*I_kb0 = 4e-6  # Условие выполнено
U_ke4min := U_k04 - U_b13 - U_e04 - U_e14 = 1.36582
□ > 1  # Условие выполнено
# Расчет ЕП_5
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R_e5 := R_vx4/70 = 1596.54
I_Re5 := U_b04/R_e5 = 0.000787848
I_e05 := I_Re5 + I_b04 = 0.000793963
I_b05 := I_e05/(1 + β) = 5.63094e-6
I_k05 := β*I_b05 = 0.000788332
r_β5 := φ/I_b05 = 4439.75
R_e5per := R_e5*R_vx4/(R_e5 + R_vx4) = 1574.05
r_b5 := τ/C_k = 85.7143
R_vx5 := r_b5 + r_β5 + (β + 1)*R_e5per = 226466
K_u5 := ((β + 1)*R_e5per)/(r_b5 + r_β5 + (β + 1)*R_e5per) = 0.980017
U_e15 := U_b14 = 0.00313623
I_e15 := U_e15/R_e5 = 1.9644e-6
U_e05 := U_b04 = 1.25783
U_b05 := U_e05 + 0.6 = 1.85783
I_k05 = 0.000788332
I_km = 0.02  # Условие выполнено
I_b05 = 5.63094e-6
10*I_kb0 = 4e-6  # Условие выполнено
U_ke5min := E_p - U_b14 - U_e05 - U_e15 = 8.7359
□ > 1  # Условие выполнено
K_u1 = 0.982496
K_u2ex = -4.26165
K_u4ex = -8.5233
K_u6ex = -11.615
K_u5 = 0.980017
K_скв = 325
R_vx1 = 35878
R_vx2 = 87730.1
R_vx3 = 120281
R_vx4 = 111757
R_vx5 = 226466
I_k01 = 0.0064539
I_k02 = 0.002
I_k03 = 0.00103416
I_k04 = 0.000856044
I_k05 = 0.000788332
K_вх*K_u5*K_u6ex*K_u4ex*K_u2ex*K_u1 = -324.982
I_b01 = 4.60993e-5
I_b02 = 1.42857e-5
I_b03 = 7.38687e-6
I_b04 = 6.1146e-6
I_b05 = 5.63094e-6
U_ke1min = 3.88045
U_ke2min = 1.26481
U_ke3min = 1.22123
U_ke4min = 1.36582
U_ke5min = 8.7359
R_k1 := □  # error: Пустой местозаполнитель.
R_k2 = 2885.3
R_k3 = 7975.46
R_k4 = 10023.4
R_k5 =  # error: Эта переменная не определена.
R_e1 = 250
R_e2 = 609.18
R_e3 = 828.444
R_e4 = 763.001
R_e5 = 1596.54
U_e01 = 3.49639
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ω_min := 2*π*f_min = 628.319
R_vx.us := R_vx5 = 226466
I_b0us := I_b05 = 5.63094e-6
U_b0us := U_b05 = 1.85783
K_vx.us := R_vx.us/(R_vx.us + R_g) = 0.97419
R_vxΣ := 4*R_g = 24000  # Ом
R_b := R_vxΣ*R_vx.us/(R_vx.us - R_vxΣ) = 26844.9  # Ом
I_Roc1 := 4*I_b0us = 2.25238e-5  # А
U_Roc2 := U_b0us + I_Roc1*R_b = 2.46248  # В
R_oc1 := (U_e01 - U_Roc2)/I_Roc1 = 45903.3  # Ом
R_oc2 := U_Roc2/(I_Roc1 - I_b0us) = 145771  # Ом
K_uoc0 := U_b0us/U_e01 = 0.531356
T_ф := K_uoc0*3*K_скв/ω_min = 0.824537  # с
R_ocΣ := (R_oc1^-1 + R_oc2^-1 + (R_b + R_vx.us)^-1)^-1 = 30681.7  # Ом
C_ф := T_ф*(R_oc1^-1 + R_oc2^-1) = 2.36189e-5  # Ф
# 3 часть
# ЭП 1
R_vix2 := R_k2 = 2885.3
R_g1 := R_vix2 + r_b1 = 2971.01
S_p1 := I_k01/φ = 0.258156
C_d1 := S_p1/(2*π*F) = 9.1304e-11
r_bx1 := r_β1 + (1 + β)*R_n = 35792.3
C_bx1 := C_d1/(1 + S_p1*R_n) = 1.39312e-12
f_v1 := 1/(2*π*C_bx1*R_g1*r_bx1/(R_g1 + r_bx1)) = 41644424
ω_v1 := 2*π*f_v1
K_1(ω) := K_u1/sqrt(1 + (ω/ω_v1)^2)
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# УС 2
R_vix3 := R_k3 = 7975.46
K_u2 := |K_u2ex| = 4.26165
R_g2 := R_vix3 + r_b2 = 8061.18
S_p2 := I_k02/φ = 0.08
C_d2 := S_p2/(2*π*F) = 2.82942e-11
r_bx2 := r_β2 + (1 + β)*R_e2 = 87644.4
C_bx2 := C_d2/(1 + S_p2*R_e2) + C_k*(1 + K_u2) = 1.89847e-11
f_v2 := 1/(2*π*C_bx2*R_g2*r_bx2/(R_g2 + r_bx2)) = 1135616
ω_v2 := 2*π*f_v2
K_u2 = 4.26165
K_2(ω) := K_u2/sqrt(1 + (ω/ω_v2)^2)
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# УС 3
R_vix4 := R_k4 = 10023.4
K_u3 := |K_u4ex| = 8.5233
R_g3 := R_vix4 + r_b3 = 10109.1
S_p3 := I_k03/φ = 0.0413665
C_d3 := S_p3/(2*π*F) = 1.46304e-11
r_bx3 := r_β3 + (1 + β)*R_e3 = 120195
C_bx3 := C_d3/(1 + S_p3*R_e3) + C_k*(1 + K_u3) = 3.37464e-11
C_доп := 80*10^-12
f_v3(C) := 1/(2*π*(C_bx3 + C)*R_g3*r_bx3/(R_g3 + r_bx3))
ω_v3(C) := 2*π*f_v3(C)
f_v3(C_доп) = 150052
f_v3(0) = 505769
K_3(ω, C) := K_u3/sqrt(1 + (ω/ω_v3(C))^2)
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# УС 4
R_g4 := r_b4 = 85.7143
K_u4 := |K_u6ex| = 11.615
S_p4 := I_k04/φ = 0.0342418
C_d4 := S_p4/(2*π*F) = 1.21105e-11
r_bx4 := r_β4 + (1 + β)*R_e4 = 111672
C_bx4 := C_d4/(1 + S_p4*R_e4) + C_k*(1 + K_u4) = 4.45989e-11
f_v4 := 1/(2*π*C_bx4*R_g4*r_bx4/(R_g4 + r_bx4)) = 41665398
ω_v4 := 2*π*f_v4
K_4(ω) := K_u4/sqrt(1 + (ω/ω_v4)^2)
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# ЭП 5
R_g5 := R_g*R_b/(R_g + R_b) + r_b5 = 4989.65
K_u5 = 0.980017
S_p5 := I_k05/φ = 0.0315333
C_d5 := S_p5/(2*π*F) = 1.11526e-11
r_bx5 := r_β5 + (1 + β)*R_e5 = 229551
C_bx5 := C_d5/(1 + S_p5*R_e5) + C_k = 3.71721e-12
f_v5 := 1/(2*π*C_bx5*R_g5*r_bx5/(R_g5 + r_bx5)) = 8767405
ω_v5 := 2*π*f_v5
K_5(ω) := K_u5/sqrt(1 + (ω/ω_v5)^2)
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C_p1 := 1/(sqrt(0.41)*2*π*f_min*(R_vxΣ + R_g)) = 8.28528e-8
j := sqrt(-1)
R_vix1 := 0
C_p2 := 1/(sqrt(0.41)*2*π*f_min*R_n) = 9.94233e-6
f_v1 = 41644424
Kвх(ω) := j*ω*C_p1*R_vxΣ/(1 + j*ω*C_p1*(R_vxΣ + R_g))
f_v2 = 1135616
Kвых(ω) := j*ω*C_p2*R_n/(1 + j*ω*C_p2*(R_n + R_vix1))
f_v3(0) = 505769  # У 3 каскада самая узкая полоса пропускания
f_v4 = 41665398
K_ус(ω, C) := Kвх(ω)*Kвых(ω)*K_1(ω)*K_2(ω)*K_3(ω, C)*K_4(ω)*K_5(ω)
f_v5 = 8767405
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2*π*f_min = 628.319
