U_g := 1*10^-3  # Транзистор КТ368А
β_min := 50
β_max := 300
R_g := 6*10^3
β := sqrt(β_min*β_max) = 122.474
f_min := 4*10^3
f_max := 400*10^3
C_k := 1.7*10^-12
C_e := 3*10^-12
U_kb_max := 15
U_eb_max := 4
U_n := 0.8
I_k0 := 30*10^-3
P_k_max := 225*10^-3
R_n := 300
E_p := 9
F_T := 900*10^6
τ := 15*10^-12
φ_T := 25*10^-3
# 1. Расчёт сквозного коэффициента усиления
K_skv := -U_n/U_g = -800
K_vh := 0.8
K_u7 := 0.9
K_u5 := 0.9
K_u3 := 0.9
K_u1 := 0.9
K_u4 := nthroot(K_skv/(K_vh*K_u1*K_u3*K_u5*K_u7), 3) = -11.5083
α := 0.5
K_u2 := α*K_u4 = -5.75413
K_u6 := α^-1*K_u4 = -23.0165
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# Расчёт простого ЭП1
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R_e1 := R_n = 300  # Ом
U_e1 := U_n = 0.8
R_e1_ekv := R_e1*R_n/(R_e1 + R_n) = 150
I_e11 := U_n/R_e1_ekv = 0.00533333
I_e01 := 1.25*I_e11 = 0.00666667
# Расчитать постоянное напряжение на сопротивлении в цепи эмиттера
U_e01 := R_e1*I_e01 = 2
I_e_max := I_e01 + I_e11 = 0.012
U_e_max := U_e01 + U_e1 = 2.8
# Проверить условие нахождения БТ в АО
E_p - U_e_max = 6.2  # В > 1 В
I_e_max = 0.012  # А < 30 мА
# Условие не выполнено. Используем ЭП с генератором тока
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I_n := U_n/R_n = 0.00266667
I_e11 := I_n = 0.00266667
# Чтобы БТ не заходил в ОО и не вносил нелинейные скажения, примем
I_e01 := 1.25*I_e11 = 0.00333333
# Расчет токов эммитера и базы транзистора VTгт
β_gt := β = 122.474
I_e01 + I_e11 = 0.006
I_k0_gt := I_e01 = 0.00333333
# меньше чем Iк импульсное допустимое, поэтому мы можем использовать этот транзистор в этом каскаде
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I_b0_gt := I_k0_gt/β_gt = 2.72166e-5
I_e0_gt := (β_gt + 1)*I_b0_gt = 0.00336055
# Выбор Rэгт
# Для обеспечения достаточной стабильности постоянного тока коллектора и повышения
# выходного сопротивления транзистора по переменному сигналу в 10-15 раз, достаточно выбрать Rэгт=25-30Ом
R_e_gt := 30  # Ом
# Расчёт делителя
I_del := 10*I_b0_gt = 0.000272166
U_b0_gt := I_e0_gt*R_e_gt + 0.6 = 0.700816
R_del1 := (E_p - U_b0_gt)/I_del = 30493.1
R_del2 := U_b0_gt/(I_del - I_b0_gt) = 2861.07
# Выбор постоянного напряжения на эмметере БТ VT1
U_ke1_min == E_p - U_e01 - U_n
U_ke_gt_min == U_e01 - R_e_gt*I_e0_gt - U_n
U_ke1_min ≥ 1
# Если учесть что
U_ke_min_dop == 1
U_e01 := 2 + U_n + R_e_gt*I_e0_gt = 2.90082
U_ke1_min := E_p - U_e01 - U_n = 5.29918  # В > 1 В
U_ke_gt_min := U_e01 - R_e_gt*I_e0_gt - U_n = 2  # В > 1 В
# Расчёт первого каскада
I_b01 := I_e01/(1 + β) = 2.69961e-5
I_k01 := β*I_b01 = 0.00330634
r_b1 := τ/(0.5*C_k) = 17.6471
r_β1 := φ_T/I_b01 = 926.059
K_u1 := R_n*(1 + β)/(R_n*(1 + β) + r_β1 + r_b1) = 0.975157
U_b11 := (r_β1 + r_b1)*I_b01 + R_n*I_n = 0.825476
U_b01 := U_e01 + 0.6 = 3.50082
R_vh1 := R_n*(1 + β) + r_β1 + r_b1 = 37986.1
# Итоги ЭП1
U_b01 = 3.50082
R_vh1 = 37986.1
I_b01 = 2.69961e-5
r_b1 = 17.6471
U_b11 = 0.825476
I_e01 = 0.00333333
r_β1 = 926.059
K_u1 = 0.975157
I_k01 = 0.00330634
# Расчет УС2
# Порядок расчёта УС2
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I_k02 := 1*10^-3
U_k02 := U_b01 = 3.50082
R_k2 := (E_p - U_k02)/(I_k02 + I_b01) = 5354.63
R_k2_ekv := R_k2*R_vh1/(R_k2 + R_vh1) = 4693.08
R_k2/R_vh1 = 0.140963  # < 1 - проверка условия слабого влияния след. каскада
K_u2 = -5.75413
K_u2 == -β*R_k2_ekv/(r_b2 + r_β2 + (β + 1)*R_e2)
# Постоянная составляющая тока
I_b02 := I_k02/β = 8.16497e-6
I_e02 := (1 + 1/β)*I_k02 = 0.00100816
r_β2 := φ_T/I_b02 = 3061.86
r_b2 := τ/(0.5*C_k) = 17.6471
R_e2 := 1/(1 + β)*(β*R_k2_ekv/|K_u2| - (r_b2 + r_β2)) = 784.055
# Переменная составляющая напряжения в цепи коллектора
U_k12 := U_b11 = 0.825476
U_b12 := U_k12/|K_u2| = 0.143458
# Переменная составляющая тока
I_k12 := U_k12/R_k2 = 0.000154161
I_e12 := (1 + 1/β)*I_k12 = 0.00015542
I_b12 := I_k12/β = 1.25872e-6
# Постоянное напряжение
U_e02 := R_e2*I_e02 = 0.790457
U_b02 := U_e02 + 0.6 = 1.39046
# Входное и выходное сопротивления
R_vh2 := r_b2 + r_β2 + (β + 1)*R_e2 = 99890.3
R_vih2 := U_e02/I_e02 = 784.055
U_ke2_min := U_k02 - U_k12 - U_e02 - I_e12*R_e2 = 1.76303  # > 1В
# Итоги УС2
U_b02 = 1.39046
R_vh2 = 99890.3
R_k2 = 5354.63
I_b02 = 8.16497e-6
U_b12 = 0.143458
R_vih2 = 784.055
r_b2 = 17.6471
I_e02 = 0.00100816
K_u2 = -5.75413
R_e2 = 784.055
r_β2 = 3061.86
I_k02 = 0.001
# Расчет ЭП3
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n := 0  # Число диодов в цепи эмиттера
U_e03 := U_b02 + n*0.6 = 1.39046
R_v2 := 1000
# Постоянный ток
I_Rv2 := U_b02/R_v2 = 0.00139046
I_e03 := I_Rv2 + I_b02 = 0.00139862
I_b03 := I_e03/(1 + β) = 1.13272e-5
I_k03 := β*I_b03 = 0.00138729
# Расчёт диф сопротивлений диодов
R_dif := φ_T/I_e03 = 17.8747
R_dif_sum := n*R_dif = 0
R_e3 := R_dif_sum + R_v2*R_vh2/(R_v2 + R_vh2) = 990.088  # сопротивление цепи эмиттера
# Расчёт коэффициента передачи ЭП3
r_b3 := τ/(0.5*C_k) = 17.6471
r_β3 := φ_T*(1 + β)/I_e03 = 2207.07
K_u3 := (1 + β)*R_e3/((1 + β)*R_e3 + r_β3 + r_b3)*R_v2/(R_v2 + R_dif_sum) = 0.982127
# Переменная и постоянная составляющие напряжения на базе БТ
U_b13 := U_b12/|K_u3| = 0.146069
U_b03 := U_e03 + 0.6 = 1.99046
U_k13 := U_b12 = 0.143458
# Входное сопротивление ЭП
R_vh3 := r_b3 + r_β3 + (β + 1)*R_e3 = 124475
# Выходное сопротивление ЭП
R_vih3 := U_e03/I_e03 = 994.162
U_ke3_min := E_p - U_k13 - U_e03 - I_b12*R_e3 = 7.46484  # > 1В
# Итоги ЭП3
U_b03 = 1.99046
R_vh3 = 124475
I_b03 = 1.13272e-5
U_b13 = 0.146069
R_vih3 = 994.162
r_b3 = 17.6471
I_e03 = 0.00139862
K_u3 = 0.982127
R_v2 = 1000
r_β3 = 2207.07
I_k03 = 0.00138729
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# Расчет УС4
# Выбор Rк
R_k4 := R_vh3/30 = 4149.18
R_k4_ekv := R_k4*R_vh3/(R_k4 + R_vh3) = 4015.33
R_k4/R_vh3 = 0.0333333
U_k04 := U_b03 = 1.99046
I_k04 := (E_p - U_k04)/R_k4_ekv = 0.00174569
I_b04 := I_k04/β = 1.42535e-5
I_e04 := I_k04*(1 + 1/β) = 0.00175995
# Расчёт Rе4
r_β4 := φ_T*β/I_k04 = 1753.95
r_b4 := τ/(0.5*C_k) = 17.6471
R_e4 := 1/(β + 1)*(β*R_k4_ekv/|K_u4| - (r_b4 + r_β4)) = 331.735
K_u4 = -11.5083
R_vh4 := r_b4 + r_β4 + (β + 1)*R_e4 = 42732.4
U_e04 := R_e4*I_e04 = 0.583836
U_b04 := U_e04 + 0.6 = 1.18384
U_b14 := U_b13/|K_u4| = 0.0126925
U_k14 := U_b13 = 0.146069
I_k14 := U_k14/R_k4 = 3.52042e-5
I_b14 := I_k14/β = 2.87441e-7
I_e14 := (1 + 1/β)*I_k14 = 3.54917e-5
R_vih4 := U_e04/I_e04 = 331.735
U_ke4_min := U_k04 - U_b13 - (U_e04 + R_e4*I_e14) = 1.24878  # > 1В
# Итоги УС4
U_b04 = 1.18384
R_vh4 = 42732.4
R_k4 = 4149.18
I_b04 = 1.42535e-5
U_b14 = 0.0126925
R_vih4 = 331.735
r_b4 = 17.6471
I_e04 = 0.00175995
K_u4 = -11.5083
R_e4 = 331.735
r_β4 = 1753.95
I_k04 = 0.00174569
n_5 := 0  # Расчёт ЭП5
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U_e05 := U_b04 + n_5*0.6 = 1.18384
R_v4 := 1000
I_Rv4 := U_b04/R_v4 = 0.00118384
I_e05 := I_Rv4 + I_b04 = 0.00119809
I_b05 := I_e05/(1 + β) = 9.70313e-6
I_k05 := β*I_b05 = 0.00118839
R_dif5 := φ_T/I_e05 = 20.8666
R_dif_sum5 := n_5*R_dif5 = 0
R_e5 := R_dif_sum5 + R_v4*R_vh4/(R_v4 + R_vh4) = 977.134
r_b5 := τ/(0.5*C_k) = 17.6471
r_β5 := φ_T*(1 + β)/I_e05 = 2576.49
K_u5 := (1 + β)*R_e5/((1 + β)*R_e5 + r_β5 + r_b5)*R_v4/(R_v4 + R_dif_sum5) = 0.978951
U_b15 := U_b14/|K_u5| = 0.0129654
U_b05 := U_e05 + 0.6 = 1.78384
U_k15 := U_b14 = 0.0126925
R_vh5 := r_b5 + r_β5 + (β + 1)*R_e3 = 124845
R_vih5 := U_e05/I_e05 = 988.103
U_ke5_min := E_p - U_k15 - U_e05 - I_b14*R_e5 = 7.80319  # > 1В
# Итоги ЭП5
U_b05 = 1.78384
R_vh5 = 124845
I_b05 = 9.70313e-6
U_b15 = 0.0129654
R_vih5 = 988.103
r_b5 = 17.6471
I_e05 = 0.00119809
K_u5 = 0.978951
R_v4 = 1000
r_β5 = 2576.49
I_k05 = 0.00118839
# Расчет УС6
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R_k6 := R_vh5/20 = 6242.24
R_k6_ekv := R_k6*R_vh5/(R_k6 + R_vh5) = 5944.99
U_k06 := U_b05 = 1.78384
I_k06 := (E_p - U_k06)/R_k6_ekv = 0.00121382
I_b06 := I_k06/β = 9.91082e-6
I_e06 := I_k06*(1 + 1/β) = 0.00122373
r_β6 := φ_T*β/I_k06 = 2522.49
r_b6 := τ/(0.5*C_k) = 17.6471
R_e6 := 1/(β + 1)*(β*R_k6_ekv/|K_u6| - (r_b6 + r_β6)) = 235.628
K_u6 = -23.0165
R_vh6 := r_b6 + r_β6 + (β + 1)*R_e6 = 31634.2
K_u6 := -16.6
U_e06 := R_e6*I_b06*(1 + β) = 0.288346
U_b06 := U_e06 + 0.6 = 0.888346
U_k16 := U_b15 = 0.0129654
U_b16 := U_k16/|K_u6| = 0.000781048
I_k16 := U_k16/R_k6 = 2.07704e-6
I_b16 := I_k16/β = 1.6959e-8
I_e16 := (1 + 1/β)*I_k16 = 2.094e-6
R_vih6 := U_e06/I_e06 = 235.628
U_ke6_min := U_k06 - U_b15 - (U_e06 + R_e6*I_e16) = 1.48203  # > 1В
# Итоги УС6
U_b06 = 0.888346
R_vh6 = 31634.2
R_k6 = 6242.24
I_b06 = 9.91082e-6
U_b16 = 0.000781048
R_vih6 = 235.628
r_b6 = 17.6471
I_e06 = 0.00122373
K_u6 = -16.6
R_e6 = 235.628
r_β6 = 2522.49
I_k06 = 0.00121382
# Расчёт 7-го каскада
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# Расчет ЭП7
R_e7 := 700
I_Re7 := U_b06/R_e7 = 0.00126907
I_e07 := I_Re7 + I_b06 = 0.00127898
I_b07 := I_e07/(1 + β) = 1.03582e-5
I_k07 := β*I_b07 = 0.00126862
U_e07 := I_e07*R_e7 = 0.895284
U_b07 := U_e07 + 0.6 = 1.49528
r_β7 := φ_T*β/I_k07 = 2413.54
r_b7 := τ/(0.5*C_k) = 17.6471
R_vh7 := r_b7 + r_β7 + (β + 1)*R_e7*R_vh6/(R_e7 + R_vh6) = 86992.2
K_u7 := (β + 1)*R_e7*R_vh6/(R_e7 + R_vh6)/((β + 1)*R_e7*R_vh6/(R_e7 + R_vh6) + r_β7 + r_b7) = 0.972053
U_ke7_min := E_p - U_b16 - U_e07 - I_b16*R_e7 = 8.10392  # > 1В
# Итоги ЭП7
U_b07 = 1.49528
R_e7 = 700
I_b07 = 1.03582e-5
K_u7 = 0.972053
r_b7 = 17.6471
I_e07 = 0.00127898
R_vh7 = 86992.2
r_β7 = 2413.54
I_k07 = 0.00126862
R_vh_us := R_vh7 = 86992.2
K_vh_us := R_vh_us/(R_vh_us + R_g) = 0.935478
I_b0_us := I_b07 = 1.03582e-5
U_b0_us := U_b07 = 1.49528
# Проверка суммарного коэффициента усилителя
K_skv = -800
K_u1 = 0.975157
K_skv_sum := 0.8*K_u1*K_u2*K_u3*K_u4*K_u5*K_u6*K_u7 = -801.459
K_u2 = -5.75413
K_u3 = 0.982127
K_u4 = -11.5083
K_u5 = 0.978951
K_u6 = -16.6
K_u7 = 0.972053
I_k01 = 0.00330634
U_ke1_min = 5.29918
U_ke_gt_min = 2
I_k02 = 0.001
U_ke2_min = 1.76303
I_k03 = 0.00138729
U_ke3_min = 7.46484
I_k04 = 0.00174569
U_ke4_min = 1.24878
I_k05 = 0.00118839
U_ke5_min = 7.80319
I_k06 = 0.00121382
U_ke6_min = 1.48203
U_ke7_min = 8.10392
I_k07 = 0.00126862
I_b07 = 1.03582e-5
U_b07 = 1.49528
U_e01 = 2.90082
# ЧАСТЬ 2
# Рассчитаем  цепь обратой связи
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R_g = 6000
K_vh_us := 0.8
R_vh7 = 86992.2
R_vh_sum := 4*R_g = 24000
R_g = 6000
R_b := R_vh_sum*R_vh7/(R_vh7 - R_vh_sum) = 33144
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I_Ros1 := 4*I_b07 = 4.14329e-5
U_Ros2 := U_b07 + I_b07*R_b = 1.8386
R_os1 := (U_e01 - U_Ros2)/I_Ros1 = 25637.1
R_os2 := U_Ros2/(I_Ros1 - I_b07) = 59167
K_Uos := U_b07/U_e01 = 0.51547
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T_f := K_Uos*3*|K_skv|/(2*π*f_min) = 0.0492237
R_os_sum := 1/(1/R_os2 + 1/R_os1 + 1/(R_b + R_vh7)) = 15568.8
C_f := T_f*(1/R_os2 + 1/R_os1) = 2.75196e-6
# Часть 3. Расчёт частотных характеристик.
# Расчёт ЭП1
S_p1 := I_k01/φ_T = 0.132253
C_dif1 := S_p1/(2*π*F_T) = 2.33876e-11
C_vh1 := C_dif1/(1 + S_p1*R_n) + C_k = 2.27497e-12
r_vh1 := r_β1 + (1 + β)*R_n = 37968.4
R_d1 := R_vih2 + r_b1 = 801.702
R_vih2 := R_k2 = 5354.63
f_v1 := 1/(2*π*C_vh1*R_d1*r_vh1/(R_d1 + r_vh1)) = 89105752
K_u11(f) := K_u1/sqrt(1 + (f/f_v1)^2)
K_u1 = 0.975157
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# Расчёт УС2
S_p2 := I_k02/φ_T = 0.04
C_dif2 := S_p2/(2*π*F_T) = 7.07355e-12
K_u2_0 := β*R_k2/(r_β2 + (β + 1)*R_e2) = 6.56641
r_vh2 := r_β2 + (1 + β)*R_k2 = 664222
C_vh2 := C_dif2/(1 + S_p2*R_e2) + C_k*(1 + K_u2_0) = 1.30815e-11
R_g2 := r_b2 = 17.6471
f_v2 := 1/(2*π*C_vh2*R_g2*r_vh2/(R_g2 + r_vh2)) = 689449531
K_u22(f) := K_u2*1*1/sqrt(1 + f^2/f_v2^2)
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# Расчёт ЭП3
S_p3 := I_b03*β/φ_T = 0.0554918
C_dif3 := S_p3/(2*π*F_T) = 9.8131e-12
C_vh3 := C_dif3/(1 + S_p3*R_e3) + C_k = 1.87542e-12
r_vh3 := r_β3 + (1 + β)*R_e3 = 124458
R_vih4 := R_k4 = 4149.18
R_d3 := R_vih4 + r_b3 = 4166.83
f_v3 := 1/(2*π*C_vh3*R_d3*r_vh3/(R_d3 + r_vh3)) = 21048401
K_u3 = 0.982127
K_u33(f) := K_u3/sqrt(1 + (f/f_v3)^2)
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# Расчёт УС4
S_p4 := I_k04/φ_T = 0.0698277
C_dif4 := S_p4/(2*π*F_T) = 1.23483e-11
K_u4_0 := β*R_k4/(r_β4 + (β + 1)*R_e4) = 11.8968
r_vh4 := r_β4 + (1 + β)*R_k4 = 514072
C_vh4 := C_dif4/(1 + S_p4*R_e4) + C_k*(1 + K_u4_0) = 2.24356e-11
R_g4 := r_b4 = 17.6471
f_v4 := 1/(2*π*C_vh4*R_g4*r_vh4/(R_g4 + r_vh4)) = 401999829
K_u44(f) := K_u4*1*1/sqrt(1 + f^2/f_v4^2)
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# Расчёт ЭП5
S_p5 := I_b05*β/φ_T = 0.0475355
C_dif5 := S_p5/(2*π*F_T) = 8.40611e-12
C_vh5 := C_dif5/(1 + S_p5*R_e5) + C_k = 1.87716e-12
r_vh5 := r_β5 + (1 + β)*R_e5 = 123228
R_vih6 := R_k6_ekv = 5944.99
R_d5 := R_vih6 + r_b5 = 5962.64
f_v5 := 1/(2*π*C_vh5*R_d5*r_vh5/(R_d5 + r_vh5)) = 14907388
K_u55(f) := K_u5/sqrt(1 + (f/f_v5)^2)
K_u5 = 0.978951
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# Расчёт УС6
S_p6 := I_k06/φ_T = 0.0485529
C_dif6 := S_p6/(2*π*F_T) = 8.58604e-12
K_u6_0 := β*R_k6_ekv/(r_β6 + (β + 1)*R_e6) = 23.0294
r_vh6 := r_β6 + (1 + β)*R_k6_ekv = 736577
C_vh6 := C_dif6/(1 + S_p6*R_e6) + C_k*(1 + K_u6_0) = 4.15401e-11
R_g6 := r_b6 = 17.6471
K_u6 = -16.6
f_v6 := 1/(2*π*C_vh6*R_g6*r_vh6/(R_g6 + r_vh6)) = 217115286
K_u66(f) := K_u6*1*1/sqrt(1 + f^2/f_v6^2)
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# Расчёт ЭП7
S_p7 := I_b07*β/φ_T = 0.0507447
C_dif7 := S_p7/(2*π*F_T) = 8.97364e-12
C_vh7 := C_dif7/(1 + S_p7*R_e7) + C_k = 1.94571e-12
r_vh7 := r_β7 + (1 + β)*R_e7 = 88845.7
R_vih7 := R_g*R_vh_sum/(R_g + R_vh_sum) = 4800
R_d7 := R_vih7 = 4800
K_u7 = 0.972053
f_v7 := 1/(2*π*C_vh7*R_d7*r_vh7/(R_d7 + r_vh7)) = 17961901
K_u77(f) := K_u7/sqrt(1 + (f/f_v7)^2)
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# Расчёт разделительных ёмкостей
R_vh_us = 86992.2
ω_min := 2*π*f_min = 25132.7
R_g = 6000
R_n = 300
C_p1 := 1/(sqrt(0.41)*ω_min*(R_vh_sum + R_g)) = 2.07132e-9
j := sqrt(-1)
C_p2 := 1/(sqrt(0.41)*ω_min*R_n) = 2.07132e-7  # В спецификации Ср1=5,1нФ  Ср2=2,4мФ
# Запишем выражения для коэффициентов передачи входной и выходной цепей
K_vh(f) := j*2*π*f*C_p1*R_vh_sum/(1 + j*2*π*f*C_p1*(R_vh_sum + R_g))
K_vih(f) := j*2*π*f*C_p2*R_n/(1 + j*2*π*f*C_p2*R_n)
# Расчитаем АЧХ всего усилителя
K_u_sum(f) := K_u77(f)*K_u66(f)*K_u55(f)*K_u44(f)*K_u33(f)*K_u22(f)*K_u11(f)*|K_vh(f)|*|K_vih(f)|
K_u_sum(f_min) = -568.41
K_u_sum(f_max) = -800.784
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f0 := 1*10^5
|K_u77(f0)| = 0.972038
|K_u66(f0)| = 16.6
|K_u55(f0)| = 0.978929
|K_u44(f0)| = 11.5083
|K_u33(f0)| = 0.982116
|K_u22(f0)| = 5.75413
|K_u11(f0)| = 0.975156
|K_vh(f0)| = 0.799738
|K_vih(f0)| = 0.999672
|K_u77(f0)|*|K_u66(f0)|*|K_u55(f0)|*|K_u44(f0)|*|K_u33(f0)|*|K_u22(f0)|*|K_u11(f0)|*0.8 = 801.419
# Так как верхняя частота полосы усиления каскада меньше заданной, мы должны поставить навесную ёмкость на выход 6го каскада
# Расчёт УС6
S_p6 := I_k06/φ_T = 0.0485529
C_dif6 := S_p6/(2*π*F_T) = 8.58604e-12
K_u6_0 := β*R_k6_ekv/(r_β6 + (β + 1)*R_e6) = 23.0294
r_vh6 := r_β6 + (1 + β)*R_k6_ekv = 736577
C_vh6 := C_dif6/(1 + S_p6*R_e6) + C_k*(1 + K_u6_0) = 4.15401e-11
R_g6 := r_b6 = 17.6471
C_sum := 1/(2*π*f_max*R_g6*r_vh5/(R_g6 + r_vh5)) = 2.25502e-8
C_nav := C_sum - C_vh6 = 2.25086e-8
f_v6 := 1/(2*π*C_sum*R_g6*r_vh5/(R_g6 + r_vh5)) = 400000
K_u6 = -16.6
K_u66max(f) := K_u6*1*1/sqrt(1 + f^2/f_v6^2)
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# Расчитаем АЧХ всего усилителя
K_u_summax(f) := K_u77(f)*K_u66max(f)*K_u55(f)*K_u44(f)*K_u33(f)*K_u22(f)*K_u11(f)*|K_vh(f)|*|K_vih(f)|
K_u_sum(f_min) = -568.41
K_u_sum(f_max) = -800.784
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