U_g := 3.6*10^-3  # Транзистор КТ312B
β_min := 50
β_max := 280
R_g := 8*10^3
β := sqrt(β_min*β_max) = 118.322
f_min := 0.5*10^3
f_max := 400*10^3
C_k := 5*10^-12
C_e := 20*10^-12
U_kb_max := 20
U_eb_max := 4
U_n := 2.9
I_k0 := 30*10^-3
P_k_max := 150*10^-3
R_n := 180
φ_T := 25*10^-3
E_p := 8
F_T := 120*10^6
τ := 500*10^-12
# 1. Расчёт сквозного коэффициента усиления
K_skv := -U_n/U_g = -805.556
K_vh := 0.8
K_u7 := 0.9
K_u5 := 0.9
K_u3 := 0.9
K_u1 := 0.9
K_u4 := nthroot(K_skv/(K_vh*K_u1*K_u3*K_u5*K_u7), 3) = -11.5348
α := 0.5
K_u2 := α*K_u4 = -5.76742
K_u6 := α^-1*K_u4 = -23.0697
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# Расчёт простого ЭП1
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R_e1 := R_n = 180  # Ом
U_e1 := U_n = 2.9
R_e1_ekv := R_e1*R_n/(R_e1 + R_n) = 90
I_e11 := U_n/R_e1_ekv = 0.0322222
I_e01 := 1.25*I_e11 = 0.0402778
# Расчитать постоянное напряжение на сопротивлении в цепи эмиттера
U_e01 := R_e1*I_e01 = 7.25
I_e_max := I_e01 + I_e11 = 0.0725
U_e_max := U_e01 + U_e1 = 10.15
# Проверить условие нахождения БТ в АО
E_p - U_e_max = -2.15  # В > 1 В
I_e_max = 0.0725  # А < 30 мА
# Условие не выполнено. Используем ЭП с генератором тока
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I_n := U_n/R_n = 0.0161111
I_e11 := I_n = 0.0161111
# Чтобы БТ не заходил в ОО и не вносил нелинейные скажения, примем
I_e01 := 1.25*I_e11 = 0.0201389
# Расчет токов эммитера и базы транзистора VTгт
β_gt := β = 118.322
I_e01 + I_e11 = 0.03625
I_k0_gt := I_e01 = 0.0201389
# меньше чем Iк импульсное допустимое, поэтому мы можем использовать этот транзистор в этом каскаде
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I_b0_gt := I_k0_gt/β_gt = 0.000170205
I_e0_gt := (β_gt + 1)*I_b0_gt = 0.0203091
# Выбор Rэгт
# Для обеспечения достаточной стабильности постоянного тока коллектора и повышения
# выходного сопротивления транзистора по переменному сигналу в 10-15 раз, достаточно выбрать Rэгт=25-30Ом
R_e_gt := 30  # Ом
# Расчёт делителя
I_del := 10*I_b0_gt = 0.00170205
U_b0_gt := I_e0_gt*R_e_gt + 0.6 = 1.20927
R_del1 := (E_p - U_b0_gt)/I_del = 3989.74
R_del2 := U_b0_gt/(I_del - I_b0_gt) = 789.424
# Выбор постоянного напряжения на эмметере БТ VT1
U_ke1_min == E_p - U_e01 - U_n
U_ke_gt_min == U_e01 - R_e_gt*I_e0_gt - U_n
U_ke1_min ≥ 1
# Если учесть что
E_p = 8
U_ke_min_dop == 1
E_p := 11
U_e01 := 2 + U_n + R_e_gt*I_e0_gt = 5.50927
U_ke1_min := E_p - U_e01 - U_n = 2.59073  # В > 1 В
U_ke_gt_min := U_e01 - R_e_gt*I_e0_gt - U_n = 2  # В > 1 В
# Расчёт первого каскада
I_b01 := I_e01/(1 + β) = 0.000168778
I_k01 := β*I_b01 = 0.0199701
r_b1 := τ/(0.5*C_k) = 200
r_β1 := φ_T/I_b01 = 148.123
K_u1 := R_n*(1 + β)/(R_n*(1 + β) + r_β1 + r_b1) = 0.98405
U_b11 := (r_β1 + r_b1)*I_b01 + R_n*I_n = 2.95876
U_b01 := U_e01 + 0.6 = 6.10927
R_vh1 := R_n*(1 + β) + r_β1 + r_b1 = 21826
# Итоги ЭП1
U_b01 = 6.10927
R_vh1 = 21826
I_b01 = 0.000168778
r_b1 = 200
U_b11 = 2.95876
I_e01 = 0.0201389
r_β1 = 148.123
K_u1 = 0.98405
I_k01 = 0.0199701
# Расчет УС2
# Порядок расчёта УС2
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I_k02 := 10*I_b01 = 0.00168778
U_k02 := U_b01 = 6.10927
R_k2 := (E_p - U_k02)/(I_k02 + I_b01) = 2634.29
R_k2_ekv := R_k2*R_vh1/(R_k2 + R_vh1) = 2350.59
R_k2/R_vh1 = 0.120695  # < 1 - проверка условия слабого влияния след. каскада
K_u2 = -5.76742
K_u2 == -β*R_k2_ekv/(r_b2 + r_β2 + (β + 1)*R_e2)
# Постоянная составляющая тока
I_b02 := I_k02/β = 1.42644e-5
I_e02 := (1 + 1/β)*I_k02 = 0.00170205
r_β2 := φ_T/I_b02 = 1752.62
r_b2 := τ/(0.5*C_k) = 200
R_e2 := 1/(1 + β)*(β*R_k2_ekv/|K_u2| - (r_b2 + r_β2)) = 387.783
# Переменная составляющая напряжения в цепи коллектора
U_k12 := U_b11 = 2.95876
U_b12 := U_k12/|K_u2| = 0.513012
# Переменная составляющая тока
I_k12 := U_k12/R_k2 = 0.00112317
I_e12 := (1 + 1/β)*I_k12 = 0.00113266
I_b12 := I_k12/β = 9.4925e-6
# Постоянное напряжение
U_e02 := R_e2*I_e02 = 0.660025
U_b02 := U_e02 + 0.6 = 1.26003
# Входное и выходное сопротивления
R_vh2 := r_b2 + r_β2 + (β + 1)*R_e2 = 48223.5
R_vih2 := U_e02/I_e02 = 387.783
U_ke2_min := U_k02 - U_k12 - U_e02 - I_e12*R_e2 = 2.05127  # > 1В
# Итоги УС2
U_b02 = 1.26003
R_vh2 = 48223.5
R_k2 = 2634.29
I_b02 = 1.42644e-5
U_b12 = 0.513012
R_vih2 = 387.783
r_b2 = 200
I_e02 = 0.00170205
K_u2 = -5.76742
R_e2 = 387.783
r_β2 = 1752.62
I_k02 = 0.00168778
# Расчет ЭП3
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n := 2  # Число диодов в цепи эмиттера
U_e03 := U_b02 + n*0.6 = 2.46003
R_v2 := 1000
# Постоянный ток
I_Rv2 := U_b02/R_v2 = 0.00126003
I_e03 := I_Rv2 + I_b02 = 0.00127429
I_b03 := I_e03/(1 + β) = 1.06795e-5
I_k03 := β*I_b03 = 0.00126361
# Расчёт диф сопротивлений диодов
R_dif := φ_T/I_e03 = 19.6188
R_dif_sum := n*R_dif = 39.2376
R_e3 := R_dif_sum + R_v2*R_vh2/(R_v2 + R_vh2) = 1018.92  # сопротивление цепи эмиттера
# Расчёт коэффициента передачи ЭП3
r_b3 := τ/(0.5*C_k) = 200
r_β3 := φ_T*(1 + β)/I_e03 = 2340.94
K_u3 := (1 + β)*R_e3/((1 + β)*R_e3 + r_β3 + r_b3)*R_v2/(R_v2 + R_dif_sum) = 0.942545
# Переменная и постоянная составляющие напряжения на базе БТ
U_b13 := U_b12/|K_u3| = 0.544283
U_b03 := U_e03 + 0.6 = 3.06003
U_k13 := U_b12 = 0.513012
# Входное сопротивление ЭП
R_vh3 := r_b3 + r_β3 + (β + 1)*R_e3 = 124120
# Выходное сопротивление ЭП
R_vih3 := U_e03/I_e03 = 1930.51
U_ke3_min := E_p - U_k13 - U_e03 - I_b12*R_e3 = 8.01729  # > 1В
# Итоги ЭП3
U_b03 = 3.06003
R_vh3 = 124120
I_b03 = 1.06795e-5
U_b13 = 0.544283
R_vih3 = 1930.51
r_b3 = 200
I_e03 = 0.00127429
K_u3 = 0.942545
R_v2 = 1000
r_β3 = 2340.94
I_k03 = 0.00126361
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# Расчет УС4
# Выбор Rк
R_k4 := R_vh3/20 = 6206.02
R_k4_ekv := R_k4*R_vh3/(R_k4 + R_vh3) = 5910.49
R_k4/R_vh3 = 0.05
U_k04 := U_b03 = 3.06003
I_k04 := (E_p - U_k04)/R_k4_ekv = 0.00134337
I_b04 := I_k04/β = 1.13535e-5
I_e04 := I_k04*(1 + 1/β) = 0.00135472
# Расчёт Rе4
r_β4 := φ_T*β/I_k04 = 2201.96
r_b4 := τ/(0.5*C_k) = 200
R_e4 := 1/(β + 1)*(β*R_k4_ekv/|K_u4| - (r_b4 + r_β4)) = 487.979
K_u4 = -11.5348
R_vh4 := r_b4 + r_β4 + (β + 1)*R_e4 = 60628.4
U_e04 := R_e4*I_e04 = 0.661076
U_b04 := U_e04 + 0.6 = 1.26108
U_b14 := U_b13/|K_u4| = 0.047186
U_k14 := U_b13 = 0.544283
I_k14 := U_k14/R_k4 = 8.77025e-5
I_b14 := I_k14/β = 7.41222e-7
I_e14 := (1 + 1/β)*I_k14 = 8.84437e-5
R_vih4 := U_e04/I_e04 = 487.979
U_ke4_min := U_k04 - U_b13 - (U_e04 + R_e4*I_e14) = 1.81151  # > 1В
# Итоги УС4
U_b04 = 1.26108
R_vh4 = 60628.4
R_k4 = 6206.02
I_b04 = 1.13535e-5
U_b14 = 0.047186
R_vih4 = 487.979
r_b4 = 200
I_e04 = 0.00135472
K_u4 = -11.5348
R_e4 = 487.979
r_β4 = 2201.96
I_k04 = 0.00134337
# Расчёт ЭП5
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U_e05 := U_b04 + 0.6 = 1.86108
R_v4 := 1000
I_Rv4 := U_b04/R_v4 = 0.00126108
I_e05 := I_Rv4 + I_b04 = 0.00127243
I_b05 := I_e05/(1 + β) = 1.06639e-5
I_k05 := β*I_b05 = 0.00126177
R_dif5 := φ_T/I_e05 = 19.6475
n_5 := 1
R_dif_sum5 := n_5*R_dif5 = 19.6475
R_e5 := R_dif_sum5 + R_v4*R_vh4/(R_v4 + R_vh4) = 1003.42
r_b5 := τ/(0.5*C_k) = 200
r_β5 := φ_T*(1 + β)/I_e05 = 2344.37
K_u5 := (1 + β)*R_e5/((1 + β)*R_e5 + r_β5 + r_b5)*R_v4/(R_v4 + R_dif_sum5) = 0.960323
U_b15 := U_b14/|K_u5| = 0.0491355
U_b05 := U_e05 + 0.6 = 2.46108
U_k15 := U_b14 = 0.047186
R_vh5 := r_b5 + r_β5 + (β + 1)*R_e3 = 124124
R_vih5 := U_e05/I_e05 = 1462.62
U_ke5_min := E_p - U_k15 - U_e05 - I_b14*R_e5 = 9.09099  # > 1В
# Итоги ЭП5
U_b05 = 2.46108
R_vh5 = 124124
I_b05 = 1.06639e-5
U_b15 = 0.0491355
R_vih5 = 1462.62
r_b5 = 200
I_e05 = 0.00127243
K_u5 = 0.960323
R_v4 = 1000
r_β5 = 2344.37
I_k05 = 0.00126177
# Расчет УС6
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R_k6 := R_vh5/20 = 6206.19
R_k6_ekv := R_k6*R_vh5/(R_k6 + R_vh5) = 5910.66
U_k06 := U_b05 = 2.46108
I_k06 := (E_p - U_k06)/R_k6_ekv = 0.00144467
I_b06 := I_k06/β = 1.22097e-5
I_e06 := I_k06*(1 + 1/β) = 0.00145688
r_β6 := φ_T*β/I_k06 = 2047.56
r_b6 := τ/(0.5*C_k) = 200
R_e6 := 1/(β + 1)*(β*R_k6_ekv/|K_u6| - (r_b6 + r_β6)) = 235.225
K_u6 = -23.0697
R_vh6 := r_b6 + r_β6 + (β + 1)*R_e6 = 30315
K_u6 := -17.66
U_e06 := R_e6*I_b06*(1 + β) = 0.342694
U_b06 := U_e06 + 0.6 = 0.942694
U_k16 := U_b15 = 0.0491355
U_b16 := U_k16/|K_u6| = 0.00278231
I_k16 := U_k16/R_k6 = 7.91718e-6
I_b16 := I_k16/β = 6.69124e-8
I_e16 := (1 + 1/β)*I_k16 = 7.9841e-6
R_vih6 := U_e06/I_e06 = 235.225
U_ke6_min := U_k06 - U_b15 - (U_e06 + R_e6*I_e16) = 2.06737  # > 1В
# Итоги УС6
U_b06 = 0.942694
R_vh6 = 30315
R_k6 = 6206.19
I_b06 = 1.22097e-5
U_b16 = 0.00278231
R_vih6 = 235.225
r_b6 = 200
I_e06 = 0.00145688
K_u6 = -17.66
R_e6 = 235.225
r_β6 = 2047.56
I_k06 = 0.00144467
# Расчёт 7-го каскада
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# Расчет ЭП7
R_e7 := 700
I_Re7 := U_b06/R_e7 = 0.00134671
I_e07 := I_Re7 + I_b06 = 0.00135892
I_b07 := I_e07/(1 + β) = 1.13887e-5
I_k07 := β*I_b07 = 0.00134753
U_e07 := I_e07*R_e7 = 0.951241
U_b07 := U_e07 + 0.6 = 1.55124
r_β7 := φ_T*β/I_k07 = 2195.16
r_b7 := τ/(0.5*C_k) = 200
R_vh7 := r_b7 + r_β7 + (β + 1)*R_e7*R_vh6/(R_e7 + R_vh6) = 84035.1
K_u7 := (β + 1)*R_e7*R_vh6/(R_e7 + R_vh6)/((β + 1)*R_e7*R_vh6/(R_e7 + R_vh6) + r_β7 + r_b7) = 0.971498
U_ke7_min := E_p - U_b16 - U_e07 - I_b16*R_e7 = 10.0459  # > 1В
# Итоги ЭП7
U_b07 = 1.55124
R_e7 = 700
I_b07 = 1.13887e-5
K_u7 = 0.971498
r_b7 = 200
I_e07 = 0.00135892
R_vh7 = 84035.1
r_β7 = 2195.16
I_k07 = 0.00134753
R_vh_us := R_vh7 = 84035.1
K_vh_us := R_vh_us/(R_vh_us + R_g) = 0.913077
I_b0_us := I_b07 = 1.13887e-5
U_b0_us := U_b07 = 1.55124
# Проверка суммарного коэффициента усилителя
K_skv = -805.556
K_u1 = 0.98405
K_skv_sum := 0.8*K_u1*K_u2*K_u3*K_u4*K_u5*K_u6*K_u7 = -813.305
K_u2 = -5.76742
K_u3 = 0.942545
K_u4 = -11.5348
K_u5 = 0.960323
K_u6 = -17.66
K_u7 = 0.971498
I_k01 = 0.0199701
U_ke1_min = 2.59073
U_ke_gt_min = 2
I_k02 = 0.00168778
U_ke2_min = 2.05127
I_k03 = 0.00126361
U_ke3_min = 8.01729
I_k04 = 0.00134337
U_ke4_min = 1.81151
I_k05 = 0.00126177
U_ke5_min = 9.09099
I_k06 = 0.00144467
U_ke6_min = 2.06737
U_ke7_min = 10.0459
I_k07 = 0.00134753
I_b07 = 1.13887e-5
U_b07 = 1.55124
U_e01 = 5.50927
# ЧАСТЬ 2
# Рассчитаем  цепь обратой связи
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R_g = 8000
K_vh_us := 0.8
R_vh7 = 84035.1
R_vh_sum := 4*R_g = 32000
R_g = 8000
R_b := R_vh_sum*R_vh7/(R_vh7 - R_vh_sum) = 51679
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I_Ros1 := 4*I_b07 = 4.55547e-5
U_Ros2 := U_b07 + I_b07*R_b = 2.1398
R_os1 := (U_e01 - U_Ros2)/I_Ros1 = 73965.5
R_os2 := U_Ros2/(I_Ros1 - I_b07) = 62629.3
K_Uos := U_b07/U_e01 = 0.281569
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T_f := K_Uos*3*|K_skv|/(2*π*f_min) = 0.216597
R_os_sum := 1/(1/R_os2 + 1/R_os1 + 1/(R_b + R_vh7)) = 27133.2
C_f := T_f*(1/R_os2 + 1/R_os1) = 6.38674e-6
# Часть 3. Расчёт частотных характеристик.
# Расчёт ЭП1
S_p1 := I_k01/φ_T = 0.798804
C_dif1 := S_p1/(2*π*F_T) = 1.05945e-9
C_vh1 := C_dif1/(1 + S_p1*R_n) + C_k = 1.23174e-11
r_vh1 := r_β1 + (1 + β)*R_n = 21626
R_d1 := R_vih2 + r_b1 = 587.783
R_vih2 := R_k2 = 2634.29
f_v1 := 1/(2*π*C_vh1*R_d1*r_vh1/(R_d1 + r_vh1)) = 22580341
K_u11(f) := K_u1/sqrt(1 + (f/f_v1)^2)
K_u1 = 0.98405
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# Расчёт УС2
S_p2 := I_k02/φ_T = 0.0675113
C_dif2 := S_p2/(2*π*F_T) = 8.95396e-11
K_u2_0 := β*R_k2/(r_β2 + (β + 1)*R_e2) = 6.49044
r_vh2 := r_β2 + (1 + β)*R_k2 = 316081
C_vh2 := C_dif2/(1 + S_p2*R_e2) + C_k*(1 + K_u2_0) = 4.07466e-11
R_g2 := r_b2 = 200
f_v2 := 1/(2*π*C_vh2*R_g2*r_vh2/(R_g2 + r_vh2)) = 19542220
K_u22(f) := K_u2*1*1/sqrt(1 + f^2/f_v2^2)
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# Расчёт ЭП3
S_p3 := I_b03*β/φ_T = 0.0505444
C_dif3 := S_p3/(2*π*F_T) = 6.70366e-11
C_vh3 := C_dif3/(1 + S_p3*R_e3) + C_k = 6.27687e-12
r_vh3 := r_β3 + (1 + β)*R_e3 = 123920
R_vih4 := R_k4 = 6206.02
R_d3 := R_vih4 + r_b3 = 6406.02
f_v3 := 1/(2*π*C_vh3*R_d3*r_vh3/(R_d3 + r_vh3)) = 4162734
K_u3 = 0.942545
K_u33(f) := K_u3/sqrt(1 + (f/f_v3)^2)
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# Расчёт УС4
S_p4 := I_k04/φ_T = 0.0537348
C_dif4 := S_p4/(2*π*F_T) = 7.1268e-11
K_u4_0 := β*R_k4/(r_β4 + (β + 1)*R_e4) = 12.1517
r_vh4 := r_β4 + (1 + β)*R_k4 = 742714
C_vh4 := C_dif4/(1 + S_p4*R_e4) + C_k*(1 + K_u4_0) = 6.83765e-11
R_g4 := r_b4 = 200
f_v4 := 1/(2*π*C_vh4*R_g4*r_vh4/(R_g4 + r_vh4)) = 11641273
K_u44(f) := K_u4*1*1/sqrt(1 + f^2/f_v4^2)
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# Расчёт ЭП5
S_p5 := I_b05*β/φ_T = 0.0504706
C_dif5 := S_p5/(2*π*F_T) = 6.69388e-11
C_vh5 := C_dif5/(1 + S_p5*R_e5) + C_k = 6.29618e-12
r_vh5 := r_β5 + (1 + β)*R_e5 = 122074
R_vih6 := R_k6_ekv = 5910.66
R_d5 := R_vih6 + r_b5 = 6110.66
f_v5 := 1/(2*π*C_vh5*R_d5*r_vh5/(R_d5 + r_vh5)) = 4343785
K_u55(f) := K_u5/sqrt(1 + (f/f_v5)^2)
K_u5 = 0.960323
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# Расчёт УС6
S_p6 := I_k06/φ_T = 0.0577866
C_dif6 := S_p6/(2*π*F_T) = 7.66419e-11
K_u6_0 := β*R_k6_ekv/(r_β6 + (β + 1)*R_e6) = 23.2229
r_vh6 := r_β6 + (1 + β)*R_k6_ekv = 707316
C_vh6 := C_dif6/(1 + S_p6*R_e6) + C_k*(1 + K_u6_0) = 1.26367e-10
R_g6 := r_b6 = 200
K_u6 = -17.66
f_v6 := 1/(2*π*C_vh6*R_g6*r_vh6/(R_g6 + r_vh6)) = 6299134
K_u66(f) := K_u6*1*1/sqrt(1 + f^2/f_v6^2)
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# Расчёт ЭП7
S_p7 := I_b07*β/φ_T = 0.0539011
C_dif7 := S_p7/(2*π*F_T) = 7.14885e-11
C_vh7 := C_dif7/(1 + S_p7*R_e7) + C_k = 6.84578e-12
r_vh7 := r_β7 + (1 + β)*R_e7 = 85720.3
R_vih7 := R_g*R_vh_sum/(R_g + R_vh_sum) = 6400
R_d7 := R_vih7 = 6400
K_u7 = 0.971498
f_v7 := 1/(2*π*C_vh7*R_d7*r_vh7/(R_d7 + r_vh7)) = 3903811
K_u77(f) := K_u7/sqrt(1 + (f/f_v7)^2)
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# Расчёт разделительных ёмкостей
R_vh_us = 84035.1
ω_min := 2*π*f_min = 3141.59
R_g = 8000
R_n = 180
C_p1 := 1/(sqrt(0.41)*ω_min*(R_vh_sum + R_g)) = 1.24279e-8
j := sqrt(-1)
C_p2 := 1/(sqrt(0.41)*ω_min*R_n) = 2.76176e-6  # В спецификации Ср1=5,1нФ  Ср2=2,4мФ
# Запишем выражения для коэффициентов передачи входной и выходной цепей
K_vh(f) := j*2*π*f*C_p1*R_vh_sum/(1 + j*2*π*f*C_p1*(R_vh_sum + R_g))
K_vih(f) := j*2*π*f*C_p2*R_n/(1 + j*2*π*f*C_p2*R_n)
# Расчитаем АЧХ всего усилителя
K_u_sum(f) := K_u77(f)*K_u66(f)*K_u55(f)*K_u44(f)*K_u33(f)*K_u22(f)*K_u11(f)*|K_vh(f)|*|K_vih(f)|
K_u_sum(f_min) = -576.812
K_u_sum(f_max) = -799.588
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f0 := 1*10^5
|K_u77(f0)| = 0.97118
|K_u66(f0)| = 17.6578
|K_u55(f0)| = 0.960069
|K_u44(f0)| = 11.5344
|K_u33(f0)| = 0.942273
|K_u22(f0)| = 5.76735
|K_u11(f0)| = 0.98404
|K_vh(f0)| = 0.799996
|K_vih(f0)| = 0.999995
|K_u77(f0)|*|K_u66(f0)|*|K_u55(f0)|*|K_u44(f0)|*|K_u33(f0)|*|K_u22(f0)|*|K_u11(f0)|*0.8 = 812.437
# Так как верхняя частота полосы усиления каскада меньше заданной, мы должны поставить навесную ёмкость на выход 6го каскада
# Расчёт УС6
S_p6 := I_k06/φ_T = 0.0577866
C_dif6 := S_p6/(2*π*F_T) = 7.66419e-11
K_u6_0 := β*R_k6_ekv/(r_β6 + (β + 1)*R_e6) = 23.2229
r_vh6 := r_β6 + (1 + β)*R_k6_ekv = 707316
C_vh6 := C_dif6/(1 + S_p6*R_e6) + C_k*(1 + K_u6_0) = 1.26367e-10
R_g6 := r_b6 = 200
C_sum := 1/(2*π*f_max*R_g6*r_vh6/(R_g6 + r_vh6)) = 1.99e-9
C_nav := C_sum - C_vh6 = 1.86363e-9
f_v6 := 1/(2*π*C_sum*R_g6*r_vh6/(R_g6 + r_vh6)) = 400000
K_u6 = -17.66
K_u66(f) := K_u6*1*1/sqrt(1 + f^2/f_v6^2)
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# Расчитаем АЧХ всего усилителя
K_u_sum(f) := K_u77(f)*K_u66(f)*K_u55(f)*K_u44(f)*K_u33(f)*K_u22(f)*K_u11(f)*|K_vh(f)|*|K_vih(f)|
K_u_sum(f_min) = -576.811
K_u_sum(f_max) = -566.533
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