U_g := 3*10^-3  # Транзистор КТ325А
β_min := 30
β_max := 90
R_g := 4*10^3
β := sqrt(β_min*β_max) = 51.9615
f_min := 1*10^3
f_max := 560*10^3
C_k := 2*10^-12
C_e := 2*10^-12
U_kb_max := 15
U_eb_max := 4
U_n := 2.4
I_k0 := 30*10^-3
P_k_max := 150*10^-3
R_n := 100
E_p := 10
F_T := 1000*10^6
τ := 125*10^-12
φ_T := 25*10^-3
# 1. Расчёт сквозного коэффициента усиления
K_skv := -U_n/U_g = -800
K_vh := 0.8
K_u7 := 0.9
K_u5 := 0.9
K_u3 := 0.9
K_u1 := 0.9
K_u4 := nthroot(K_skv/(K_vh*K_u1*K_u3*K_u5*K_u7), 3) = -11.5083
α := 0.5
K_u2 := α*K_u4 = -5.75413
K_u6 := α^-1*K_u4 = -23.0165
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# Расчёт простого ЭП1
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R_e1 := R_n = 100  # Ом
U_e1 := U_n = 2.4
R_e1_ekv := R_e1*R_n/(R_e1 + R_n) = 50
I_e11 := U_n/R_e1_ekv = 0.048
I_e01 := 1.25*I_e11 = 0.06
# Расчитать постоянное напряжение на сопротивлении в цепи эмиттера
U_e01 := R_e1*I_e01 = 6
I_e_max := I_e01 + I_e11 = 0.108
U_e_max := U_e01 + U_e1 = 8.4
# Проверить условие нахождения БТ в АО
E_p - U_e_max = 1.6  # В > 1 В
I_e_max = 0.108  # А < 30 мА
# Условие не выполнено. Используем ЭП с генератором тока
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I_n := U_n/R_n = 0.024
I_e11 := I_n = 0.024
# Чтобы БТ не заходил в ОО и не вносил нелинейные скажения, примем
I_e01 := 1.25*I_e11 = 0.03
# Расчет токов эммитера и базы транзистора VTгт
β_gt := β = 51.9615
I_e01 + I_e11 = 0.054
I_k0_gt := I_e01 = 0.03
# меньше чем Iк импульсное допустимое, поэтому мы можем использовать этот транзистор в этом каскаде
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I_b0_gt := I_k0_gt/β_gt = 0.00057735
I_e0_gt := (β_gt + 1)*I_b0_gt = 0.0305774
# Выбор Rэгт
# Для обеспечения достаточной стабильности постоянного тока коллектора и повышения
# выходного сопротивления транзистора по переменному сигналу в 10-15 раз, достаточно выбрать Rэгт=25-30Ом
R_e_gt := 30  # Ом
# Расчёт делителя
I_del := 10*I_b0_gt = 0.0057735
U_b0_gt := I_e0_gt*R_e_gt + 0.6 = 1.51732
R_del1 := (E_p - U_b0_gt)/I_del = 1469.24
R_del2 := U_b0_gt/(I_del - I_b0_gt) = 292.008
# Выбор постоянного напряжения на эмметере БТ VT1
U_ke1_min == E_p - U_e01 - U_n
U_ke_gt_min == U_e01 - R_e_gt*I_e0_gt - U_n
U_ke1_min ≥ 1
# Если учесть что
U_ke_min_dop == 1
U_e01 := 2 + U_n + R_e_gt*I_e0_gt = 5.31732
U_ke1_min := E_p - U_e01 - U_n = 2.28268  # В > 1 В
U_ke_gt_min := U_e01 - R_e_gt*I_e0_gt - U_n = 2  # В > 1 В
# Расчёт первого каскада
I_b01 := I_e01/(1 + β) = 0.000566449
I_k01 := β*I_b01 = 0.0294336
r_b1 := τ/(0.5*C_k) = 125
r_β1 := φ_T/I_b01 = 44.1346
K_u1 := R_n*(1 + β)/(R_n*(1 + β) + r_β1 + r_b1) = 0.969053
U_b11 := (r_β1 + r_b1)*I_b01 + R_n*I_n = 2.49581
U_b01 := U_e01 + 0.6 = 5.91732
R_vh1 := R_n*(1 + β) + r_β1 + r_b1 = 5465.29
# Итоги ЭП1
U_b01 = 5.91732
R_vh1 = 5465.29
I_b01 = 0.000566449
r_b1 = 125
U_b11 = 2.49581
I_e01 = 0.03
r_β1 = 44.1346
K_u1 = 0.969053
I_k01 = 0.0294336
# Расчет УС2
# Порядок расчёта УС2
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I_k02 := 10*I_b01 = 0.00566449
U_k02 := U_b01 = 5.91732
R_k2 := (E_p - U_k02)/(I_k02 + I_b01) = 655.227
R_k2_ekv := R_k2*R_vh1/(R_k2 + R_vh1) = 585.082
R_k2/R_vh1 = 0.119889  # < 1 - проверка условия слабого влияния след. каскада
K_u2 = -5.75413
K_u2 == -β*R_k2_ekv/(r_b2 + r_β2 + (β + 1)*R_e2)
# Постоянная составляющая тока
I_b02 := I_k02/β = 0.000109013
I_e02 := (1 + 1/β)*I_k02 = 0.0057735
r_β2 := φ_T/I_b02 = 229.33
r_b2 := τ/(0.5*C_k) = 125
R_e2 := 1/(1 + β)*(β*R_k2_ekv/|K_u2| - (r_b2 + r_β2)) = 93.0701
# Переменная составляющая напряжения в цепи коллектора
U_k12 := U_b11 = 2.49581
U_b12 := U_k12/|K_u2| = 0.433741
# Переменная составляющая тока
I_k12 := U_k12/R_k2 = 0.00380907
I_e12 := (1 + 1/β)*I_k12 = 0.00388238
I_b12 := I_k12/β = 7.33056e-5
# Постоянное напряжение
U_e02 := R_e2*I_e02 = 0.53734
U_b02 := U_e02 + 0.6 = 1.13734
# Входное и выходное сопротивления
R_vh2 := r_b2 + r_β2 + (β + 1)*R_e2 = 5283.46
R_vih2 := U_e02/I_e02 = 93.0701
U_ke2_min := U_k02 - U_k12 - U_e02 - I_e12*R_e2 = 2.52284  # > 1В
# Итоги УС2
U_b02 = 1.13734
R_vh2 = 5283.46
R_k2 = 655.227
I_b02 = 0.000109013
U_b12 = 0.433741
R_vih2 = 93.0701
r_b2 = 125
I_e02 = 0.0057735
K_u2 = -5.75413
R_e2 = 93.0701
r_β2 = 229.33
I_k02 = 0.00566449
# Расчет ЭП3
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n := 1  # Число диодов в цепи эмиттера
U_e03 := U_b02 + n*0.6 = 1.73734
R_v2 := R_vh2/10 = 528.346
# Постоянный ток
I_Rv2 := U_b02/R_v2 = 0.00215264
I_e03 := I_Rv2 + I_b02 = 0.00226165
I_b03 := I_e03/(1 + β) = 4.27037e-5
I_k03 := β*I_b03 = 0.00221895
# Расчёт диф сопротивлений диодов
R_dif := φ_T/I_e03 = 11.0539
R_dif_sum := n*R_dif = 11.0539
R_e3 := R_dif_sum + R_v2*R_vh2/(R_v2 + R_vh2) = 491.369  # сопротивление цепи эмиттера
# Расчёт коэффициента передачи ЭП3
r_b3 := τ/(0.5*C_k) = 125
r_β3 := φ_T*(1 + β)/I_e03 = 585.429
K_u3 := (1 + β)*R_e3/((1 + β)*R_e3 + r_β3 + r_b3)*R_v2/(R_v2 + R_dif_sum) = 0.953478
# Переменная и постоянная составляющие напряжения на базе БТ
U_b13 := U_b12/|K_u3| = 0.454905
U_b03 := U_e03 + 0.6 = 2.33734
U_k13 := U_b12 = 0.433741
# Входное сопротивление ЭП
R_vh3 := r_b3 + r_β3 + (β + 1)*R_e3 = 26734.1
# Выходное сопротивление ЭП
R_vih3 := U_e03/I_e03 = 768.172
U_ke3_min := E_p - U_k13 - U_e03 - I_b12*R_e3 = 7.7929  # > 1В
# Итоги ЭП3
U_b03 = 2.33734
R_vh3 = 26734.1
I_b03 = 4.27037e-5
U_b13 = 0.454905
R_vih3 = 768.172
r_b3 = 125
I_e03 = 0.00226165
K_u3 = 0.953478
R_v2 = 528.346
r_β3 = 585.429
I_k03 = 0.00221895
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# Расчет УС4
# Выбор Rк
R_k4 := R_vh3/10 = 2673.41
R_k4_ekv := R_k4*R_vh3/(R_k4 + R_vh3) = 2430.37
R_k4/R_vh3 = 0.1
U_k04 := U_b03 = 2.33734
I_k04 := (E_p - U_k04)/R_k4_ekv = 0.00315288
I_b04 := I_k04/β = 6.06772e-5
I_e04 := I_k04*(1 + 1/β) = 0.00321355
# Расчёт Rе4
r_β4 := φ_T*β/I_k04 = 412.017
r_b4 := τ/(0.5*C_k) = 125
R_e4 := 1/(β + 1)*(β*R_k4_ekv/|K_u4| - (r_b4 + r_β4)) = 197.057
K_u4 = -11.5083
R_vh4 := r_b4 + r_β4 + (β + 1)*R_e4 = 10973.5
U_e04 := R_e4*I_e04 = 0.633255
U_b04 := U_e04 + 0.6 = 1.23325
U_b14 := U_b13/|K_u4| = 0.0395285
U_k14 := U_b13 = 0.454905
I_k14 := U_k14/R_k4 = 0.000170159
I_b14 := I_k14/β = 3.27471e-6
I_e14 := (1 + 1/β)*I_k14 = 0.000173434
R_vih4 := U_e04/I_e04 = 197.057
U_ke4_min := U_k04 - U_b13 - (U_e04 + R_e4*I_e14) = 1.215  # > 1В
# Итоги УС4
U_b04 = 1.23325
R_vh4 = 10973.5
R_k4 = 2673.41
I_b04 = 6.06772e-5
U_b14 = 0.0395285
R_vih4 = 197.057
r_b4 = 125
I_e04 = 0.00321355
K_u4 = -11.5083
R_e4 = 197.057
r_β4 = 412.017
I_k04 = 0.00315288
n_5 := 0  # Расчёт ЭП5
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U_e05 := U_b04 + n_5*0.6 = 1.23325
R_v4 := 1000
I_Rv4 := U_b04/R_v4 = 0.00123325
I_e05 := I_Rv4 + I_b04 = 0.00129393
I_b05 := I_e05/(1 + β) = 2.44315e-5
I_k05 := β*I_b05 = 0.0012695
R_dif5 := φ_T/I_e05 = 19.321
R_dif_sum5 := n_5*R_dif5 = 0
R_e5 := R_dif_sum5 + R_v4*R_vh4/(R_v4 + R_vh4) = 916.482
r_b5 := τ/(0.5*C_k) = 125
r_β5 := φ_T*(1 + β)/I_e05 = 1023.27
K_u5 := (1 + β)*R_e5/((1 + β)*R_e5 + r_β5 + r_b5)*R_v4/(R_v4 + R_dif_sum5) = 0.97689
U_b15 := U_b14/|K_u5| = 0.0404636
U_b05 := U_e05 + 0.6 = 1.83325
U_k15 := U_b14 = 0.0395285
R_vh5 := r_b5 + r_β5 + (β + 1)*R_e3 = 27171.9
R_vih5 := U_e05/I_e05 = 953.106
U_ke5_min := E_p - U_k15 - U_e05 - I_b14*R_e5 = 8.72422  # > 1В
# Итоги ЭП5
U_b05 = 1.83325
R_vh5 = 27171.9
I_b05 = 2.44315e-5
U_b15 = 0.0404636
R_vih5 = 953.106
r_b5 = 125
I_e05 = 0.00129393
K_u5 = 0.97689
R_v4 = 1000
r_β5 = 1023.27
I_k05 = 0.0012695
# Расчет УС6
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R_k6 := R_vh5/3 = 9057.3
R_k6_ekv := R_k6*R_vh5/(R_k6 + R_vh5) = 6792.98
U_k06 := U_b05 = 1.83325
I_k06 := (E_p - U_k06)/R_k6_ekv = 0.00120223
I_b06 := I_k06/β = 2.3137e-5
I_e06 := I_k06*(1 + 1/β) = 0.00122537
r_β6 := φ_T*β/I_k06 = 1080.52
r_b6 := τ/(0.5*C_k) = 125
R_e6 := 1/(β + 1)*(β*R_k6_ekv/|K_u6| - (r_b6 + r_β6)) = 266.8
K_u6 = -23.0165
R_vh6 := r_b6 + r_β6 + (β + 1)*R_e6 = 15335.6
K_u6 := -17.3
U_e06 := R_e6*I_b06*(1 + β) = 0.326929
U_b06 := U_e06 + 0.6 = 0.926929
U_k16 := U_b15 = 0.0404636
U_b16 := U_k16/|K_u6| = 0.00233894
I_k16 := U_k16/R_k6 = 4.46751e-6
I_b16 := I_k16/β = 8.59773e-8
I_e16 := (1 + 1/β)*I_k16 = 4.55349e-6
R_vih6 := U_e06/I_e06 = 266.8
U_ke6_min := U_k06 - U_b15 - (U_e06 + R_e6*I_e16) = 1.46465  # > 1В
# Итоги УС6
U_b06 = 0.926929
R_vh6 = 15335.6
R_k6 = 9057.3
I_b06 = 2.3137e-5
U_b16 = 0.00233894
R_vih6 = 266.8
r_b6 = 125
I_e06 = 0.00122537
K_u6 = -17.3
R_e6 = 266.8
r_β6 = 1080.52
I_k06 = 0.00120223
# Расчёт 7-го каскада
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# Расчет ЭП7
R_e7 := 900
I_Re7 := U_b06/R_e7 = 0.00102992
I_e07 := I_Re7 + I_b06 = 0.00105306
I_b07 := I_e07/(1 + β) = 1.98834e-5
I_k07 := β*I_b07 = 0.00103317
U_e07 := I_e07*R_e7 = 0.947752
U_b07 := U_e07 + 0.6 = 1.54775
r_β7 := φ_T*β/I_k07 = 1257.33
r_b7 := τ/(0.5*C_k) = 125
R_vh7 := r_b7 + r_β7 + (β + 1)*R_e7*R_vh6/(R_e7 + R_vh6) = 46405.4
K_u7 := (β + 1)*R_e7*R_vh6/(R_e7 + R_vh6)/((β + 1)*R_e7*R_vh6/(R_e7 + R_vh6) + r_β7 + r_b7) = 0.970212
U_ke7_min := E_p - U_b16 - U_e07 - I_b16*R_e7 = 9.04983  # > 1В
# Итоги ЭП7
U_b07 = 1.54775
R_e7 = 900
I_b07 = 1.98834e-5
K_u7 = 0.970212
r_b7 = 125
I_e07 = 0.00105306
R_vh7 = 46405.4
r_β7 = 1257.33
I_k07 = 0.00103317
R_vh_us := R_vh7 = 46405.4
K_vh_us := R_vh_us/(R_vh_us + R_g) = 0.920643
I_b0_us := I_b07 = 1.98834e-5
U_b0_us := U_b07 = 1.54775
# Проверка суммарного коэффициента усилителя
K_skv = -800
K_u1 = 0.969053
K_skv_sum := 0.8*K_u1*K_u2*K_u3*K_u4*K_u5*K_u6*K_u7 = -802.595
K_u2 = -5.75413
K_u3 = 0.953478
K_u4 = -11.5083
K_u5 = 0.97689
K_u6 = -17.3
K_u7 = 0.970212
I_k01 = 0.0294336
U_ke1_min = 2.28268
U_ke_gt_min = 2
I_k02 = 0.00566449
U_ke2_min = 2.52284
I_k03 = 0.00221895
U_ke3_min = 7.7929
I_k04 = 0.00315288
U_ke4_min = 1.215
I_k05 = 0.0012695
U_ke5_min = 8.72422
I_k06 = 0.00120223
U_ke6_min = 1.46465
U_ke7_min = 9.04983
I_k07 = 0.00103317
I_b07 = 1.98834e-5
U_b07 = 1.54775
U_e01 = 5.31732
# ЧАСТЬ 2
# Рассчитаем  цепь обратой связи
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R_g = 4000
K_vh_us := 0.8
R_vh7 = 46405.4
R_vh_sum := 4*R_g = 16000
R_g = 4000
R_b := R_vh_sum*R_vh7/(R_vh7 - R_vh_sum) = 24419.5
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I_Ros1 := 4*I_b07 = 7.95338e-5
U_Ros2 := U_b07 + I_b07*R_b = 2.0333
R_os1 := (U_e01 - U_Ros2)/I_Ros1 = 41290.9
R_os2 := U_Ros2/(I_Ros1 - I_b07) = 34086.9
K_Uos := U_b07/U_e01 = 0.291077
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T_f := K_Uos*3*|K_skv|/(2*π*f_min) = 0.111183
R_os_sum := 1/(1/R_os2 + 1/R_os1 + 1/(R_b + R_vh7)) = 14776.6
C_f := T_f*(1/R_os2 + 1/R_os1) = 5.95444e-6
# Часть 3. Расчёт частотных характеристик.
# Расчёт ЭП1
S_p1 := I_k01/φ_T = 1.17734
C_dif1 := S_p1/(2*π*F_T) = 1.8738e-10
C_vh1 := C_dif1/(1 + S_p1*R_n) + C_k = 3.57815e-12
r_vh1 := r_β1 + (1 + β)*R_n = 5340.29
R_d1 := R_vih2 + r_b1 = 218.07
R_vih2 := R_k2 = 655.227
f_v1 := 1/(2*π*C_vh1*R_d1*r_vh1/(R_d1 + r_vh1)) = 212298980
K_u11(f) := K_u1/sqrt(1 + (f/f_v1)^2)
K_u1 = 0.969053
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# Расчёт УС2
S_p2 := I_k02/φ_T = 0.22658
C_dif2 := S_p2/(2*π*F_T) = 3.60613e-11
K_u2_0 := β*R_k2/(r_β2 + (β + 1)*R_e2) = 6.60014
r_vh2 := r_β2 + (1 + β)*R_k2 = 34931.2
C_vh2 := C_dif2/(1 + S_p2*R_e2) + C_k*(1 + K_u2_0) = 1.68329e-11
R_g2 := r_b2 = 125
f_v2 := 1/(2*π*C_vh2*R_g2*r_vh2/(R_g2 + r_vh2)) = 75910537
K_u22(f) := K_u2*1*1/sqrt(1 + f^2/f_v2^2)
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# Расчёт ЭП3
S_p3 := I_b03*β/φ_T = 0.088758
C_dif3 := S_p3/(2*π*F_T) = 1.41263e-11
C_vh3 := C_dif3/(1 + S_p3*R_e3) + C_k = 2.31664e-12
r_vh3 := r_β3 + (1 + β)*R_e3 = 26609.1
R_vih4 := R_k4 = 2673.41
R_d3 := R_vih4 + r_b3 = 2798.41
f_v3 := 1/(2*π*C_vh3*R_d3*r_vh3/(R_d3 + r_vh3)) = 27131800
K_u3 = 0.953478
K_u33(f) := K_u3/sqrt(1 + (f/f_v3)^2)
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# Расчёт УС4
S_p4 := I_k04/φ_T = 0.126115
C_dif4 := S_p4/(2*π*F_T) = 2.00718e-11
K_u4_0 := β*R_k4/(r_β4 + (β + 1)*R_e4) = 12.805
r_vh4 := r_β4 + (1 + β)*R_k4 = 142000
C_vh4 := C_dif4/(1 + S_p4*R_e4) + C_k*(1 + K_u4_0) = 2.83863e-11
R_g4 := r_b4 = 125
f_v4 := 1/(2*π*C_vh4*R_g4*r_vh4/(R_g4 + r_vh4)) = 44893449
K_u44(f) := K_u4*1*1/sqrt(1 + f^2/f_v4^2)
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# Расчёт ЭП5
S_p5 := I_b05*β/φ_T = 0.05078
C_dif5 := S_p5/(2*π*F_T) = 8.08189e-12
C_vh5 := C_dif5/(1 + S_p5*R_e5) + C_k = 2.17001e-12
r_vh5 := r_β5 + (1 + β)*R_e5 = 49561.6
R_vih6 := R_k6_ekv = 6792.98
R_d5 := R_vih6 + r_b5 = 6917.98
f_v5 := 1/(2*π*C_vh5*R_d5*r_vh5/(R_d5 + r_vh5)) = 12081652
K_u55(f) := K_u5/sqrt(1 + (f/f_v5)^2)
K_u5 = 0.97689
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# Расчёт УС6
S_p6 := I_k06/φ_T = 0.0480893
C_dif6 := S_p6/(2*π*F_T) = 7.65366e-12
K_u6_0 := β*R_k6_ekv/(r_β6 + (β + 1)*R_e6) = 23.2057
r_vh6 := r_β6 + (1 + β)*R_k6_ekv = 360847
C_vh6 := C_dif6/(1 + S_p6*R_e6) + C_k*(1 + K_u6_0) = 4.89648e-11
R_g6 := r_b6 = 125
K_u6 = -17.3
f_v6 := 1/(2*π*C_vh6*R_g6*r_vh6/(R_g6 + r_vh6)) = 26012183
K_u66(f) := K_u6*1*1/sqrt(1 + f^2/f_v6^2)
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# Расчёт ЭП7
S_p7 := I_b07*β/φ_T = 0.041327
C_dif7 := S_p7/(2*π*F_T) = 6.57739e-12
C_vh7 := C_dif7/(1 + S_p7*R_e7) + C_k = 2.17221e-12
r_vh7 := r_β7 + (1 + β)*R_e7 = 48922.7
R_vih7 := R_g*R_vh_sum/(R_g + R_vh_sum) = 3200
R_d7 := R_vih7 = 3200
K_u7 = 0.970212
f_v7 := 1/(2*π*C_vh7*R_d7*r_vh7/(R_d7 + r_vh7)) = 24394115
K_u77(f) := K_u7/sqrt(1 + (f/f_v7)^2)
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# Расчёт разделительных ёмкостей
R_vh_us = 46405.4
ω_min := 2*π*f_min = 6283.19
R_g = 4000
R_n = 100
C_p1 := 1/(sqrt(0.41)*ω_min*(R_vh_sum + R_g)) = 1.24279e-8
j := sqrt(-1)
C_p2 := 1/(sqrt(0.41)*ω_min*R_n) = 2.48558e-6  # В спецификации Ср1=5,1нФ  Ср2=2,4мФ
# Запишем выражения для коэффициентов передачи входной и выходной цепей
K_vh(f) := j*2*π*f*C_p1*R_vh_sum/(1 + j*2*π*f*C_p1*(R_vh_sum + R_g))
K_vih(f) := j*2*π*f*C_p2*R_n/(1 + j*2*π*f*C_p2*R_n)
# Расчитаем АЧХ всего усилителя
K_u_sum(f) := K_u77(f)*K_u66(f)*K_u55(f)*K_u44(f)*K_u33(f)*K_u22(f)*K_u11(f)*|K_vh(f)|*|K_vih(f)|
K_u_sum(f_min) = -569.216
K_u_sum(f_max) = -801.079
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f0 := 1*10^5
|K_u77(f0)| = 0.970204
|K_u66(f0)| = 17.2999
|K_u55(f0)| = 0.976856
|K_u44(f0)| = 11.5082
|K_u33(f0)| = 0.953471
|K_u22(f0)| = 5.75413
|K_u11(f0)| = 0.969053
|K_vh(f0)| = 0.799984
|K_vih(f0)| = 0.99998
|K_u77(f0)|*|K_u66(f0)|*|K_u55(f0)|*|K_u44(f0)|*|K_u33(f0)|*|K_u22(f0)|*|K_u11(f0)|*0.8 = 802.546
# Так как верхняя частота полосы усиления каскада меньше заданной, мы должны поставить навесную ёмкость на выход 6го каскада
# Расчёт УС6
S_p6 := I_k06/φ_T = 0.0480893
C_dif6 := S_p6/(2*π*F_T) = 7.65366e-12
K_u6_0 := β*R_k6_ekv/(r_β6 + (β + 1)*R_e6) = 23.2057
r_vh6 := r_β6 + (1 + β)*R_k6_ekv = 360847
C_vh6 := C_dif6/(1 + S_p6*R_e6) + C_k*(1 + K_u6_0) = 4.89648e-11
R_g6 := r_b6 = 125
C_sum := 1/(2*π*f_max*R_g6*r_vh5/(R_g6 + r_vh5)) = 2.27938e-9
C_nav := C_sum - C_vh6 = 2.23041e-9
f_v6 := 1/(2*π*C_sum*R_g6*r_vh5/(R_g6 + r_vh5)) = 560000
K_u6 = -17.3
K_u66max(f) := K_u6*1*1/sqrt(1 + f^2/f_v6^2)
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# Расчитаем АЧХ всего усилителя
K_u_summax(f) := K_u77(f)*K_u66max(f)*K_u55(f)*K_u44(f)*K_u33(f)*K_u22(f)*K_u11(f)*|K_vh(f)|*|K_vih(f)|
K_u_sum(f_min) = -569.216
K_u_sum(f_max) = -801.079
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