U_g := 3*10^-3  # Транзистор КТ325А
β_min := 30
β_max := 90
R_g := 15*10^3
β := sqrt(β_min*β_max) = 51.9615
f_min := 1*10^3
f_max := 450*10^3
C_k := 2*10^-12
C_e := 2*10^-12
U_kb_max := 15
U_eb_max := 4
U_n := 1.7
I_k0 := 30*10^-3
P_k_max := 150*10^-3
R_n := 200
E_p := 12
F_T := 1000*10^6
τ := 125*10^-12
φ_T := 25*10^-3
# 1. Расчёт сквозного коэффициента усиления
K_skv := -U_n/U_g = -566.667
K_vh := 0.8
K_u7 := 0.9
K_u5 := 0.9
K_u3 := 0.9
K_u1 := 0.9
K_u4 := nthroot(K_skv/(K_vh*K_u1*K_u3*K_u5*K_u7), 3) = -10.2586
α := 0.5
K_u2 := α*K_u4 = -5.12931
K_u6 := α^-1*K_u4 = -20.5173
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# Расчёт простого ЭП1
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R_e1 := R_n = 200  # Ом
U_e1 := U_n = 1.7
R_e1_ekv := R_e1*R_n/(R_e1 + R_n) = 100
I_e11 := U_n/R_e1_ekv = 0.017
I_e01 := 1.25*I_e11 = 0.02125
# Расчитать постоянное напряжение на сопротивлении в цепи эмиттера
U_e01 := R_e1*I_e01 = 4.25
I_e_max := I_e01 + I_e11 = 0.03825
U_e_max := U_e01 + U_e1 = 5.95
# Проверить условие нахождения БТ в АО
E_p - U_e_max = 6.05  # В > 1 В
I_e_max = 0.03825  # А < 30 мА
# Условие не выполнено. Используем ЭП с генератором тока
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I_n := U_n/R_n = 0.0085
I_e11 := I_n = 0.0085
# Чтобы БТ не заходил в ОО и не вносил нелинейные скажения, примем
I_e01 := 1.25*I_e11 = 0.010625
# Расчет токов эммитера и базы транзистора VTгт
β_gt := β = 51.9615
I_e01 + I_e11 = 0.019125
I_k0_gt := I_e01 = 0.010625
# меньше чем Iк импульсное допустимое, поэтому мы можем использовать этот транзистор в этом каскаде
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I_b0_gt := I_k0_gt/β_gt = 0.000204478
I_e0_gt := (β_gt + 1)*I_b0_gt = 0.0108295
# Выбор Rэгт
# Для обеспечения достаточной стабильности постоянного тока коллектора и повышения
# выходного сопротивления транзистора по переменному сигналу в 10-15 раз, достаточно выбрать Rэгт=25-30Ом
R_e_gt := 25  # Ом
# Расчёт делителя
I_del := 10*I_b0_gt = 0.00204478
U_b0_gt := I_e0_gt*R_e_gt + 0.6 = 0.870737
R_del1 := (E_p - U_b0_gt)/I_del = 5442.76
R_del2 := U_b0_gt/(I_del - I_b0_gt) = 473.148
# Выбор постоянного напряжения на эмметере БТ VT1
U_ke1_min == E_p - U_e01 - U_n
U_ke_gt_min == U_e01 - R_e_gt*I_e0_gt - U_n
U_ke1_min ≥ 1
# Если учесть что
U_ke_min_dop == 1
U_e01 := 2 + U_n + R_e_gt*I_e0_gt = 3.97074
U_ke1_min := E_p - U_e01 - U_n = 6.32926  # В > 1 В
U_ke_gt_min := U_e01 - R_e_gt*I_e0_gt - U_n = 2  # В > 1 В
# Расчёт первого каскада
I_b01 := I_e01/(1 + β) = 0.000200617
I_k01 := β*I_b01 = 0.0104244
r_b1 := τ/(0.5*C_k) = 125  # Ом
r_β1 := φ_T/I_b01 = 124.615
K_u1 := R_n*(1 + β)/(R_n*(1 + β) + r_β1 + r_b1) = 0.976977
I_b11 := I_e11/(1 + β) = 0.000160494
U_b11 := (r_β1 + r_b1)*I_b11 + R_n*I_n = 1.74006
U_b01 := U_e01 + 0.6 = 4.57074
R_vh1 := R_n*(1 + β) + r_β1 + r_b1 = 10841.9
# Итоги ЭП1
U_b01 = 4.57074
R_vh1 = 10841.9
I_b01 = 0.000200617
r_b1 = 125
U_b11 = 1.74006
I_e01 = 0.010625
r_β1 = 124.615
K_u1 = 0.976977
I_k01 = 0.0104244
# Расчет УС2
# Порядок расчёта УС2
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I_k02 := 10*I_b01 = 0.00200617
U_k02 := U_b01 = 4.57074
R_k2 := (E_p - U_k02)/(I_k02 + I_b01) = 3366.55
R_k2_ekv := R_k2*R_vh1/(R_k2 + R_vh1) = 2568.88
R_k2/R_vh1 = 0.310512  # < 1 - проверка условия слабого влияния след. каскада
K_u2 = -5.12931
K_u2 == -β*R_k2_ekv/(r_b2 + r_β2 + (β + 1)*R_e2)
# Постоянная составляющая тока
I_b02 := I_k02/β = 3.86088e-5
I_e02 := (1 + 1/β)*I_k02 = 0.00204478
r_β2 := φ_T/I_b02 = 647.52
r_b2 := τ/(0.5*C_k) = 125
R_e2 := 1/(1 + β)*(β*R_k2_ekv/|K_u2| - (r_b2 + r_β2)) = 476.78
# Переменная составляющая напряжения в цепи коллектора
U_k12 := U_b11 = 1.74006
U_b12 := U_k12/|K_u2| = 0.339239
# Переменная составляющая тока
I_k12 := U_k12/R_k2 = 0.000516869
I_e12 := (1 + 1/β)*I_k12 = 0.000526816
I_b12 := I_k12/β = 9.94714e-6
# Постоянное напряжение
U_e02 := R_e2*I_e02 = 0.974912
U_b02 := U_e02 + 0.6 = 1.57491
# Входное и выходное сопротивления
R_vh2 := r_b2 + r_β2 + (β + 1)*R_e2 = 26023.5
R_vih2 := U_e02/I_e02 = 476.78
U_ke2_min := U_k02 - U_k12 - U_e02 - I_e12*R_e2 = 1.60459  # > 1В
# Итоги УС2
U_b02 = 1.57491
R_vh2 = 26023.5
R_k2 = 3366.55
I_b02 = 3.86088e-5
U_b12 = 0.339239
R_vih2 = 476.78
r_b2 = 125
I_e02 = 0.00204478
K_u2 = -5.12931
R_e2 = 476.78
r_β2 = 647.52
I_k02 = 0.00200617
# Расчет ЭП3
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n := 1  # Число диодов в цепи эмиттера
U_e03 := U_b02 + n*0.6 = 2.17491
R_v2 := 1000
# Постоянный ток
I_Rv2 := U_b02/R_v2 = 0.00157491
I_e03 := I_Rv2 + I_b02 = 0.00161352
I_b03 := I_e03/(1 + β) = 3.04659e-5
I_k03 := β*I_b03 = 0.00158305
# Расчёт диф сопротивлений диодов
R_dif := φ_T/I_e03 = 15.4941
R_dif_sum := n*R_dif = 15.4941
R_e3 := R_dif_sum + R_v2*R_vh2/(R_v2 + R_vh2) = 978.489  # сопротивление цепи эмиттера
# Расчёт коэффициента передачи ЭП3
r_b3 := τ/(0.5*C_k) = 125
r_β3 := φ_T*(1 + β)/I_e03 = 820.589
K_u3 := (1 + β)*R_e3/((1 + β)*R_e3 + r_β3 + r_b3)*R_v2/(R_v2 + R_dif_sum) = 0.967096
# Переменная и постоянная составляющие напряжения на базе БТ
U_b13 := U_b12/|K_u3| = 0.350781
U_b03 := U_e03 + 0.6 = 2.77491
U_k13 := U_b12 = 0.339239
# Входное сопротивление ЭП
R_vh3 := r_b3 + r_β3 + (β + 1)*R_e3 = 52767.9
# Выходное сопротивление ЭП
R_vih3 := U_e03/I_e03 = 1347.93
U_ke3_min := E_p - U_k13 - U_e03 - I_b12*R_e3 = 9.47612  # > 1В
# Итоги ЭП3
U_b03 = 2.77491
R_vh3 = 52767.9
I_b03 = 3.04659e-5
U_b13 = 0.350781
R_vih3 = 1347.93
r_b3 = 125
I_e03 = 0.00161352
K_u3 = 0.967096
R_v2 = 1000
r_β3 = 820.589
I_k03 = 0.00158305
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# Расчет УС4
# Выбор Rк
R_k4 := R_vh3/10 = 5276.79
R_k4_ekv := R_k4*R_vh3/(R_k4 + R_vh3) = 4797.08
R_k4/R_vh3 = 0.1
U_k04 := U_b03 = 2.77491
I_k04 := (E_p - U_k04)/R_k4_ekv = 0.00192306
I_b04 := I_k04/β = 3.70094e-5
I_e04 := I_k04*(1 + 1/β) = 0.00196007
# Расчёт Rе4
r_β4 := φ_T*β/I_k04 = 675.505
r_b4 := τ/(0.5*C_k) = 125
R_e4 := 1/(β + 1)*(β*R_k4_ekv/|K_u4| - (r_b4 + r_β4)) = 443.67
K_u4 = -10.2586
R_vh4 := r_b4 + r_β4 + (β + 1)*R_e4 = 24297.9
U_e04 := R_e4*I_e04 = 0.869626
U_b04 := U_e04 + 0.6 = 1.46963
U_b14 := U_b13/|K_u4| = 0.0341937
U_k14 := U_b13 = 0.350781
I_k14 := U_k14/R_k4 = 6.64762e-5
I_b14 := I_k14/β = 1.27934e-6
I_e14 := (1 + 1/β)*I_k14 = 6.77555e-5
R_vih4 := U_e04/I_e04 = 443.67
U_ke4_min := U_k04 - U_b13 - (U_e04 + R_e4*I_e14) = 1.52444  # > 1В
# Итоги УС4
U_b04 = 1.46963
R_vh4 = 24297.9
R_k4 = 5276.79
I_b04 = 3.70094e-5
U_b14 = 0.0341937
R_vih4 = 443.67
r_b4 = 125
I_e04 = 0.00196007
K_u4 = -10.2586
R_e4 = 443.67
r_β4 = 675.505
I_k04 = 0.00192306
n_5 := 0  # Расчёт ЭП5
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U_e05 := U_b04 + n_5*0.6 = 1.46963
R_v4 := 1000
I_Rv4 := U_b04/R_v4 = 0.00146963
I_e05 := I_Rv4 + I_b04 = 0.00150663
I_b05 := I_e05/(1 + β) = 2.84477e-5
I_k05 := β*I_b05 = 0.00147819
R_dif5 := φ_T/I_e05 = 16.5933
R_dif_sum5 := n_5*R_dif5 = 0
R_e5 := R_dif_sum5 + R_v4*R_vh4/(R_v4 + R_vh4) = 960.471
r_b5 := τ/(0.5*C_k) = 125
r_β5 := φ_T*(1 + β)/I_e05 = 878.805
K_u5 := (1 + β)*R_e5/((1 + β)*R_e5 + r_β5 + r_b5)*R_v4/(R_v4 + R_dif_sum5) = 0.980648
U_b15 := U_b14/|K_u5| = 0.0348685
U_b05 := U_e05 + 0.6 = 2.06963
U_k15 := U_b14 = 0.0341937
R_vh5 := r_b5 + r_β5 + (β + 1)*R_e3 = 52826.1
R_vih5 := U_e05/I_e05 = 975.436
U_ke5_min := E_p - U_k15 - U_e05 - I_b14*R_e5 = 10.495  # > 1В
# Итоги ЭП5
U_b05 = 2.06963
R_vh5 = 52826.1
I_b05 = 2.84477e-5
U_b15 = 0.0348685
R_vih5 = 975.436
r_b5 = 125
I_e05 = 0.00150663
K_u5 = 0.980648
R_v4 = 1000
r_β5 = 878.805
I_k05 = 0.00147819
# Расчет УС6
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R_k6 := R_vh5/10 = 5282.61
R_k6_ekv := R_k6*R_vh5/(R_k6 + R_vh5) = 4802.37
U_k06 := U_b05 = 2.06963
I_k06 := (E_p - U_k06)/R_k6_ekv = 0.00206781
I_b06 := I_k06/β = 3.9795e-5
I_e06 := I_k06*(1 + 1/β) = 0.0021076
r_β6 := φ_T*β/I_k06 = 628.22
r_b6 := τ/(0.5*C_k) = 125
R_e6 := 1/(β + 1)*(β*R_k6_ekv/|K_u6| - (r_b6 + r_β6)) = 215.423
K_u6 = -20.5173
R_vh6 := r_b6 + r_β6 + (β + 1)*R_e6 = 12162.4
K_u6 := -15.0
U_e06 := R_e6*I_b06*(1 + β) = 0.454027
U_b06 := U_e06 + 0.6 = 1.05403
U_k16 := U_b15 = 0.0348685
U_b16 := U_k16/|K_u6| = 0.00232457
I_k16 := U_k16/R_k6 = 6.60062e-6
I_b16 := I_k16/β = 1.27029e-7
I_e16 := (1 + 1/β)*I_k16 = 6.72765e-6
R_vih6 := U_e06/I_e06 = 215.423
U_ke6_min := U_k06 - U_b15 - (U_e06 + R_e6*I_e16) = 1.57928  # > 1В
# Итоги УС6
U_b06 = 1.05403
R_vh6 = 12162.4
R_k6 = 5282.61
I_b06 = 3.9795e-5
U_b16 = 0.00232457
R_vih6 = 215.423
r_b6 = 125
I_e06 = 0.0021076
K_u6 = -15
R_e6 = 215.423
r_β6 = 628.22
I_k06 = 0.00206781
# Расчёт 7-го каскада
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# Расчет ЭП7
R_e7 := 2000
I_Re7 := U_b06/R_e7 = 0.000527013
I_e07 := I_Re7 + I_b06 = 0.000566808
I_b07 := I_e07/(1 + β) = 1.07023e-5
I_k07 := β*I_b07 = 0.000556106
U_e07 := I_e07*R_e7 = 1.13362
U_b07 := U_e07 + 0.6 = 1.73362
r_β7 := φ_T*β/I_k07 = 2335.95
r_b7 := τ/(0.5*C_k) = 125
R_vh7 := r_b7 + r_β7 + (β + 1)*R_e7*R_vh6/(R_e7 + R_vh6) = 93425.6
K_u7 := (β + 1)*R_e7*R_vh6/(R_e7 + R_vh6)/((β + 1)*R_e7*R_vh6/(R_e7 + R_vh6) + r_β7 + r_b7) = 0.973659
U_ke7_min := E_p - U_b16 - U_e07 - I_b16*R_e7 = 10.8638  # > 1В
# Итоги ЭП7
U_b07 = 1.73362
R_e7 = 2000
I_b07 = 1.07023e-5
K_u7 = 0.973659
r_b7 = 125
I_e07 = 0.000566808
R_vh7 = 93425.6
r_β7 = 2335.95
I_k07 = 0.000556106
R_vh_us := R_vh7 = 93425.6
K_vh_us := R_vh_us/(R_vh_us + R_g) = 0.861656
I_b0_us := I_b07 = 1.07023e-5
U_b0_us := U_b07 = 1.73362
# Проверка суммарного коэффициента усилителя
K_skv = -566.667
K_u1 = 0.976977
K_skv_sum := 0.8*K_u1*K_u2*K_u3*K_u4*K_u5*K_u6*K_u7 = -569.644
K_u2 = -5.12931
K_u3 = 0.967096
K_u4 = -10.2586
K_u5 = 0.980648
K_u6 = -15
K_u7 = 0.973659
I_k01 = 0.0104244
U_ke1_min = 6.32926
U_ke_gt_min = 2
I_k02 = 0.00200617
U_ke2_min = 1.60459
I_k03 = 0.00158305
U_ke3_min = 9.47612
I_k04 = 0.00192306
U_ke4_min = 1.52444
I_k05 = 0.00147819
U_ke5_min = 10.495
I_k06 = 0.00206781
U_ke6_min = 1.57928
U_ke7_min = 10.8638
I_k07 = 0.000556106
I_b07 = 1.07023e-5
U_b07 = 1.73362
U_e01 = 3.97074
# ЧАСТЬ 2
# Рассчитаем  цепь обратой связи
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R_g = 15000
K_vh_us := 0.8
R_vh7 = 93425.6
R_vh_sum := 4*R_g = 60000
R_g = 15000
R_b := R_vh_sum*R_vh7/(R_vh7 - R_vh_sum) = 167702
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I_Ros1 := 4*I_b07 = 4.28091e-5
U_Ros2 := U_b07 + I_b07*R_b = 3.52841
R_os1 := (U_e01 - U_Ros2)/I_Ros1 = 10332.6
R_os2 := U_Ros2/(I_Ros1 - I_b07) = 109896
K_Uos := U_b07/U_e01 = 0.436598
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T_f := K_Uos*3*|K_skv|/(2*π*f_min) = 0.118128
R_os_sum := 1/(1/R_os2 + 1/R_os1 + 1/(R_b + R_vh7)) = 9114.97
C_f := T_f*(1/R_os2 + 1/R_os1) = 1.25074e-5
# Часть 3. Расчёт частотных характеристик.
# Расчёт ЭП1
S_p1 := I_k01/φ_T = 0.416975
C_dif1 := S_p1/(2*π*F_T) = 6.63637e-11
C_vh1 := C_dif1/(1 + S_p1*R_n) + C_k = 2.78635e-12
r_vh1 := r_β1 + (1 + β)*R_n = 10716.9
R_d1 := R_vih2 + r_b1 = 601.78
R_vih2 := R_k2 = 3366.55
f_v1 := 1/(2*π*C_vh1*R_d1*r_vh1/(R_d1 + r_vh1)) = 100247546
K_u11(f) := K_u1/sqrt(1 + (f/f_v1)^2)
K_u1 = 0.976977
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# Расчёт УС2
S_p2 := I_k02/φ_T = 0.0802469
C_dif2 := S_p2/(2*π*F_T) = 1.27717e-11
K_u2_0 := β*R_k2/(r_β2 + (β + 1)*R_e2) = 6.75447
r_vh2 := r_β2 + (1 + β)*R_k2 = 178945
C_vh2 := C_dif2/(1 + S_p2*R_e2) + C_k*(1 + K_u2_0) = 1.58343e-11
R_g2 := r_b2 = 125
f_v2 := 1/(2*π*C_vh2*R_g2*r_vh2/(R_g2 + r_vh2)) = 80466642
K_u22(f) := K_u2*1*1/sqrt(1 + f^2/f_v2^2)
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# Расчёт ЭП3
S_p3 := I_b03*β/φ_T = 0.0633222
C_dif3 := S_p3/(2*π*F_T) = 1.0078e-11
C_vh3 := C_dif3/(1 + S_p3*R_e3) + C_k = 2.16007e-12
r_vh3 := r_β3 + (1 + β)*R_e3 = 52642.9
R_vih4 := R_k4 = 5276.79
R_d3 := R_vih4 + r_b3 = 5401.79
f_v3 := 1/(2*π*C_vh3*R_d3*r_vh3/(R_d3 + r_vh3)) = 15039640
K_u3 = 0.967096
K_u33(f) := K_u3/sqrt(1 + (f/f_v3)^2)
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# Расчёт УС4
S_p4 := I_k04/φ_T = 0.0769225
C_dif4 := S_p4/(2*π*F_T) = 1.22426e-11
K_u4_0 := β*R_k4/(r_β4 + (β + 1)*R_e4) = 11.3428
r_vh4 := r_β4 + (1 + β)*R_k4 = 280142
C_vh4 := C_dif4/(1 + S_p4*R_e4) + C_k*(1 + K_u4_0) = 2.50342e-11
R_g4 := r_b4 = 125
f_v4 := 1/(2*π*C_vh4*R_g4*r_vh4/(R_g4 + r_vh4)) = 50882708
K_u44(f) := K_u4*1*1/sqrt(1 + f^2/f_v4^2)
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# Расчёт ЭП5
S_p5 := I_b05*β/φ_T = 0.0591275
C_dif5 := S_p5/(2*π*F_T) = 9.41043e-12
C_vh5 := C_dif5/(1 + S_p5*R_e5) + C_k = 2.16284e-12
r_vh5 := r_β5 + (1 + β)*R_e5 = 51746.8
R_vih6 := R_k6_ekv = 4802.37
R_d5 := R_vih6 + r_b5 = 4927.37
f_v5 := 1/(2*π*C_vh5*R_d5*r_vh5/(R_d5 + r_vh5)) = 16356205
K_u55(f) := K_u5/sqrt(1 + (f/f_v5)^2)
K_u5 = 0.980648
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# Расчёт УС6
S_p6 := I_k06/φ_T = 0.0827123
C_dif6 := S_p6/(2*π*F_T) = 1.31641e-11
K_u6_0 := β*R_k6_ekv/(r_β6 + (β + 1)*R_e6) = 20.7303
r_vh6 := r_β6 + (1 + β)*R_k6_ekv = 254969
C_vh6 := C_dif6/(1 + S_p6*R_e6) + C_k*(1 + K_u6_0) = 4.41602e-11
R_g6 := r_b6 = 125
K_u6 = -15
f_v6 := 1/(2*π*C_vh6*R_g6*r_vh6/(R_g6 + r_vh6)) = 28846447
K_u66(f) := K_u6*1*1/sqrt(1 + f^2/f_v6^2)
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# Расчёт ЭП7
S_p7 := I_b07*β/φ_T = 0.0222442
C_dif7 := S_p7/(2*π*F_T) = 3.54028e-12
C_vh7 := C_dif7/(1 + S_p7*R_e7) + C_k = 2.07783e-12
r_vh7 := r_β7 + (1 + β)*R_e7 = 108259
R_vih7 := R_g*R_vh_sum/(R_g + R_vh_sum) = 12000
R_d7 := R_vih7 = 12000
K_u7 = 0.973659
f_v7 := 1/(2*π*C_vh7*R_d7*r_vh7/(R_d7 + r_vh7)) = 7090598
K_u77(f) := K_u7/sqrt(1 + (f/f_v7)^2)
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# Расчёт разделительных ёмкостей
R_vh_us = 93425.6
ω_min := 2*π*f_min = 6283.19
R_g = 15000
R_n = 200
C_p1 := 1/(sqrt(0.41)*ω_min*(R_vh_sum + R_g)) = 3.31411e-9
j := sqrt(-1)
C_p2 := 1/(sqrt(0.41)*ω_min*R_n) = 1.24279e-6  # В спецификации Ср1=5,1нФ  Ср2=2,4мФ
# Запишем выражения для коэффициентов передачи входной и выходной цепей
K_vh(f) := j*2*π*f*C_p1*R_vh_sum/(1 + j*2*π*f*C_p1*(R_vh_sum + R_g))
K_vih(f) := j*2*π*f*C_p2*R_n/(1 + j*2*π*f*C_p2*R_n)
# Расчитаем АЧХ всего усилителя
K_u_sum(f) := K_u77(f)*K_u66(f)*K_u55(f)*K_u44(f)*K_u33(f)*K_u22(f)*K_u11(f)*|K_vh(f)|*|K_vih(f)|
K_u_sum(f_min) = -404.003
K_u_sum(f_max) = -567.924
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f0 := 1*10^5
|K_u77(f0)| = 0.973562
|K_u66(f0)| = 14.9999
|K_u55(f0)| = 0.98063
|K_u44(f0)| = 10.2586
|K_u33(f0)| = 0.967075
|K_u22(f0)| = 5.12931
|K_u11(f0)| = 0.976976
|K_vh(f0)| = 0.799984
|K_vih(f0)| = 0.99998
|K_u77(f0)|*|K_u66(f0)|*|K_u55(f0)|*|K_u44(f0)|*|K_u33(f0)|*|K_u22(f0)|*|K_u11(f0)|*0.8 = 569.559
# Так как верхняя частота полосы усиления каскада меньше заданной, мы должны поставить навесную ёмкость на выход 6го каскада
# Расчёт УС6
S_p6 := I_k06/φ_T = 0.0827123
C_dif6 := S_p6/(2*π*F_T) = 1.31641e-11
K_u6_0 := β*R_k6_ekv/(r_β6 + (β + 1)*R_e6) = 20.7303
r_vh6 := r_β6 + (1 + β)*R_k6_ekv = 254969
C_vh6 := C_dif6/(1 + S_p6*R_e6) + C_k*(1 + K_u6_0) = 4.41602e-11
R_g6 := r_b6 = 125
C_sum := 1/(2*π*f_max*R_g6*r_vh6/(R_g6 + r_vh6)) = 2.83081e-9
C_nav := C_sum - C_vh6 = 2.78665e-9
f_v6 := 1/(2*π*C_sum*R_g6*r_vh6/(R_g6 + r_vh6)) = 450000
K_u6 = -15
K_u66(f) := K_u6*1*1/sqrt(1 + f^2/f_v6^2)
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# Расчитаем АЧХ всего усилителя
K_u_sum(f) := K_u77(f)*K_u66(f)*K_u55(f)*K_u44(f)*K_u33(f)*K_u22(f)*K_u11(f)*|K_vh(f)|*|K_vih(f)|
K_u_sum(f_min) = -404.002
K_u_sum(f_max) = -401.632
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