U_g := 2*10^-3  # Транзистор КТ325А
β_min := 30
β_max := 90
R_g := 4*10^3
β := sqrt(β_min*β_max) = 51.9615
f_min := 1*10^3
f_max := 560*10^3
C_k := 2*10^-12
C_e := 2*10^-12
U_kb_max := 15
U_eb_max := 4
U_n := 1.6
I_k0 := 30*10^-3
P_k_max := 150*10^-3
R_n := 100
E_p := 10
F_T := 1000*10^6
τ := 125*10^-12
# 1. Расчёт сквозного коэффициента усиления
K_vh := 0.8
K_skv := U_n/U_g = 800
K_u7 := 0.9
K_u5 := 0.9
K_u3 := 0.9
K_u1 := 0.9
α := 0.5
K_U_skv := -K_skv = -800
K_u4 := nthroot(K_U_skv/(K_vh*K_u1*K_u3*K_u5*K_u7), 3) = -11.5083
K_u2 := α*K_u4 = -5.75413
K_u6 := α^-1*K_u4 = -23.0165
# Расчёт простого ЭП1
R_e1 := R_n = 100
R_e1_ekv := R_e1*R_n/(R_e1 + R_n) = 50
I_e1 := U_n/R_e1_ekv = 0.032
I_e01 := 1.25*I_e1 = 0.04
# Расчитать постоянное напряжение на сопротивлении в цепи эмиттера
U_e01 := R_e1*I_e1 = 3.2
I_e_max := I_e01 + I_e1 = 0.072
U_e1 := U_n
U_e_max := U_e01 + U_e1 = 4.8
# Проверить условие нахождения БТ в АО
E_p - U_e_max = 5.2
I_e_max = 0.072
# Условие не выполнено. Используем ЭП с генератором тока
I_n := U_n/R_n = 0.016
I_e1 := I_n = 0.016
# Чтобы БТ не заходил в ОО и не вносил нелинейные скажения, примем
I_e01 := 1.25*I_e1 = 0.02
# Расчет токов эммитера и базы транзистора VTгт
β_gt := β = 51.9615
I_e01 + I_e1 = 0.036  # меньше чем Iк импульсное допустимое, поэтому мы можем использовать этот транзистор в этом каскаде
I_k0_gt := I_e01 = 0.02
I_b0_gt := I_k0_gt/β_gt = 0.0003849
I_e0_gt := (β_gt + 1)*I_b0_gt = 0.0203849
# Выбор Rэгт
# Для обеспечения достаточной стабильности постоянного тока коллектора и повышения
# выходного сопротивления транзистора по переменному сигналу в 10-15 раз, достаточно
# выбрать Rэгт=25-30Ом
# Расчёт делителя
I_del := 10*I_b0_gt = 0.003849
R_e_gt := 30
U_b0_gt := I_e0_gt*R_e_gt + 0.6 = 1.21155
R_del1 := (E_p - U_b0_gt)/I_del = 2283.31
R_del2 := U_b0_gt/(I_del - I_b0_gt) = 349.743
# Выбор постоянного напряжения на эмметере БТ VT1
U_ke1_min == E_p - U_e01 - U_n
U_ke1_min ≥ 1
U_ke_gt_min == U_e01 - R_e_gt*I_e0_gt - U_n
U_ke1_min ≥ 1
# Если учесть что
U_ke_min_dop == 1
U_e01 := 2 + U_n + R_e_gt*I_e0_gt = 4.21155
U_ke1_min := E_p - U_e01 - U_n = 4.18845
U_ke_gt_min := U_e01 - R_e_gt*I_e0_gt - U_n = 2
# Расчёт Ku1  Rвх
I_b01 := I_e01/(1 + β) = 0.000377633
φ_T := 25*10^-3
r_β1 := φ_T/I_b01 = 66.2019
r_b1 := τ/(0.5*C_k) = 125
K_u1 := R_n*(1 + β)/(R_n*(1 + β) + r_β1 + r_b1) = 0.965156
U_b1 := (r_β1 + r_b1)*I_b01 + R_n*I_n = 1.6722
R_vh1 := R_n*(1 + β) + r_β1 + r_b1 = 5487.35
U_b01 := U_e01 + 0.6 = 4.81155
Итоги
R_e1 = 100
I_b01 = 0.000377633
I_e01 = 0.02
R_vh1 = 5487.35
K_u1 = 0.965156
U_b01 = 4.81155
U_b1 = 1.6722
r_β1 = 66.2019
# Расчёт каскада с резистивной обратной связью в цепи эмиттера
U_ke2_min > 1
# Порядок расчёта УС2
I_k02 := 10*I_b01 = 0.00377633
U_k02 := U_b01 = 4.81155
R_k2 := (E_p - U_k02)/(I_k02 + I_b01) = 1249.04
R_k2_ekv := R_k2*R_vh1/(R_k2 + R_vh1) = 1017.45
R_k2/R_vh1 = 0.227621
K_u2 = -5.75413
K_u2 = -5.75413
K_u2 == -β*R_k2_ekv/(r_b2 + r_β2 + (β + 1)*R_e2)
I_b02 := I_k02/β = 7.26754e-5
r_β2 := φ_T/I_b02 = 343.995
r_b2 := 125
R_e2 := (-β*R_k2_ekv - K_u2*(r_b2 + r_β2))/((β + 1)*K_u2) = 164.626
(β + 1)*R_e2 = 8718.84
r_b2 + r_β2 = 468.995
R_k2_ekv/R_e2 = 6.18035
# Переменная составляющая напряжения в цепи коллектора
U_k12 := U_b1 + 0.6 = 2.2722
# Переменная составляющая тока в цепи коллектора
I_k12 := U_k12/R_k2 = 0.00181916
I_k02 = 0.00377633
I_k12*1.25 = 0.00227395  # что бы не было искажений
# Постоянная составляющая тока в цепи эмиттера
I_e02 := (1 + 1/β)*I_k02 = 0.003849
# Переменная составляющая тока в цепи эмиттера
I_e12 := (1 + 1/β)*I_k12 = 0.00185417
# Постоянное напряжение на эметтере
U_e02 := R_e2*I_e02 = 0.633645
U_ke2_min := U_k02 - U_k12 - U_e02 - I_e12*R_e2 = 1.60045
U_be2 := 0.6
U_b02 := U_e02 + U_be2 = 1.23365
R_vh2 := r_b2 + r_β2 + (β + 1)*R_e2 = 9187.84
R_vih2 := U_e02/I_e02 = 164.626
U_b12 := U_k12/|K_u2| = 0.394882
K_u2 := -β*R_k2_ekv/(r_b2 + r_β2 + (β + 1)*R_e2) = -5.75413
# Итоги УС2
U_b12 = 0.394882
R_vh2 = 9187.84
I_b02 = 7.26754e-5
R_e2 = 164.626
R_vih2 = 164.626
U_b02 = 1.23365
I_k02 = 0.00377633
# Расчёт промежуточного ЭП3
U_e03 := U_b02 + 2*0.6 = 2.43365
R_v2 := R_vh2/10 = 918.784
I_Rv2 := U_b02/R_v2 = 0.00134269
I_e03 := I_Rv2 + I_b02 = 0.00141537
# Расчёт диф сопротивлений диодов
R_dif := φ_T/I_e03 = 17.6632
R_dif_sum := 2*R_dif = 35.3265
R_e3 := R_dif_sum + R_v2*R_vh2/(R_v2 + R_vh2) = 870.584  # сопротивление цепи эмиттера
# Расчёт коэффициента передачи ЭП3
r_β3 := φ_T*(1 + β)/I_e03 = 935.471
r_b3 := τ/(0.5*C_k) = 125
K_u3 := (1 + β)*(R_e3 - R_dif_sum)/((1 + β)*R_e3 + r_β3 + r_b3) = 0.937852
# Переменная и постоянная составляющие напряжения на базе БТ
U_b13 := U_b12/K_u3 = 0.42105
U_b03 := U_e03 + 0.6 = 3.03365
# Постоянный ток на баже БТ
I_b03 := I_e03/(1 + β) = 2.67245e-5
# Входное сопротивление ЭП
R_vh3 := r_b3 + r_β3 + (β + 1)*R_e3 = 47167.9
# Выходное сопротивление ЭП
R_vih3 := U_e03/I_e03 = 1719.44
U_b03 = 3.03365
K_u3 = 0.937852
Итоги
R_v2 = 918.784
I_e03 = 0.00141537
R_vh3 = 47167.9
U_b13 = 0.42105
R_vih3 = 1719.44
I_b03 = 2.67245e-5
# Расчёт 4-го каскада
# Выбор Rк
R_k4 := R_vh3/7 = 6738.28
R_k4sh := R_k4*R_vh3/(R_k4 + R_vh3) = 5895.99
# Расчет Iк04
U_k04 := U_b03 = 3.03365
I_k04 := (E_p - U_k04)/R_k4sh = 0.00118154
I_b04 := I_k04/β = 2.27388e-5
I_e04 := I_k04*(1 + 1/β) = 0.00120428
# Расчёт Rе4
r_β4 := φ_T*β/I_k04 = 1099.44
r_b4 := τ/(0.5*C_k) = 125
R_e4 := 1/(β + 1)*(β*R_k4sh/|K_u4| - (r_b4 + r_β4)) = 479.534
R_vh4 := r_b4 + r_β4 + (β + 1)*R_e4 = 26621.3
U_e04 := R_e4*I_b04*(1 + β) = 0.577492
U_b04 := U_e04 + 0.6 = 1.17749
U_b14 := U_k04/|K_u4| = 0.263606
U_ke4_min := U_k04 - U_b13 - (U_e04 + R_e4*I_e04) = 1.45761
# Расчёт ЭП5
U_e05 := U_b04 + 0.6 = 1.77749
R_v4 := 1000
I_Rv4 := U_b04/R_v4 = 0.00117749
I_e05 := I_Rv4 + I_b04 = 0.00120023
R_dif := φ_T/I_e05 = 20.8293
n := 1
R_dif_sum := n*R_dif = 20.8293
R_e5 := R_dif_sum + R_v4*R_vh4/(R_v4 + R_vh4) = 984.625
r_β5 := φ_T*(1 + β)/I_e05 = 1103.15
r_b5 := τ/(0.5*C_k) = 125
K_u5 := (1 + β)*(R_e5 - R_dif_sum)/((1 + β)*R_e5 + r_β5 + r_b5) = 0.956322
U_b15 := U_b14/K_u5 = 0.275645
U_b05 := U_e05 + 0.6 = 2.37749
I_b05 := I_e05/(1 + β) = 2.26623e-5
R_vh5 := r_b5 + r_β5 + (β + 1)*R_e3 = 47335.6
R_vih5 := U_e05/I_e05 = 1480.96
# Расчёт 6-го каскада
R_kb := R_vh5/7 = 6762.23
R_kb_sh := R_kb*R_vh5/(R_kb + R_vh5) = 5916.95
U_k06 := U_b05 = 2.37749
I_k06 := (E_p - U_k06)/R_kb_sh = 0.00128825
I_b06 := I_k06/β = 2.47924e-5
I_e06 := I_k06*(1 + 1/β) = 0.00131304
K_u6 = -23.0165
K_u6 := -18
r_β6 := φ_T*β/I_k06 = 1008.38
r_b6 := τ/(0.5*C_k) = 125
R_e6 := 1/(β + 1)*(β*R_kb_sh/|K_u6| - (r_b6 + r_β6)) = 301.113
R_kb_sh/R_e6 = 19.6503
R_vh6 := r_b6 + r_β6 + (β + 1)*R_e6 = 17080.8
K := R_vh6/(R_vh6 + R_g) = 0.810254
U_e06 := R_e6*I_b06*(1 + β) = 0.395374
U_b06 := U_e06 + 0.6 = 0.995374
U_b16 := U_k06/|K_u6| = 0.132083
U_k6_min := U_k06 - U_b15 - (U_e06 + R_e6)*I_e06 = 1.70595
# Расчёт 7-го каскада
R_e7 := 900
I_Re7 := U_b06/R_e7 = 0.00110597
# Расчёт токов
I_e07 := I_Re7 + I_b06 = 0.00113076
I_b07 := I_e07/(1 + β) = 2.13507e-5
I_k07 := β*I_b07 = 0.00110941
# Расчёт напряжений
U_e07 := I_e07*R_e7 = 1.01769
U_b07 := U_e07 + 0.6 = 1.61769
r_β7 := φ_T*β/I_k07 = 1170.92
r_b7 := τ/(0.5*C_k) = 125
R_vh7 := r_b7 + r_β7 + (β + 1)*R_e7*R_vh6/(R_e7 + R_vh6) = 46575.5
K_u7 := (β + 1)*R_e7*R_vh6/(R_e7 + R_vh6)/((β + 1)*R_e7*R_vh6/(R_e7 + R_vh6) + r_β7 + r_b7) = 0.972176
R_vh_us := R_vh7 = 46575.5
I_b0_us := I_b07 = 2.13507e-5
I_e07 = 0.00113076
U_b0_us := U_b07 = 1.61769
I_k07 := β*I_b07 = 0.00110941
K_u7 = 0.972176
K_u4 = -11.5083
K_u3 = 0.937852
K_u6 = -18
K_u2 = -5.75413
K_vh_us := R_vh_us/(R_vh_us + R_g) = 0.92091
K_u5 = 0.956322
# Проверка суммарного коэффициента усилителя
K_u1 = 0.965156
K_skv_sum := 0.8*K_u1*K_u2*K_u3*K_u4*K_u5*K_u6*K_u7 = -802.478
# Рассчитаем  цепь обратой связи
U_e01 = 4.21155
R_g = 4000
U_b07 = 1.61769
K_vh_us := 0.8
I_b07 = 2.13507e-5
R_vh7 = 46575.5
K_skv = 800
K_u1 = 0.965156
K_u2 = -5.75413
R_vh_sum := 4*R_g = 16000
K_u3 = 0.937852
K_u4 = -11.5083
K_u5 = 0.956322
R_b := R_vh_sum*R_vh7/(R_vh7 - R_vh_sum) = 24372.7
K_u6 = -18
K_u7 = 0.972176
I_Ros1 := 4*I_b07 = 8.54026e-5
U_Ros2 := U_b07 + I_b07*R_b = 2.13806
R_g = 4000
R_os1 := (U_e01 - U_Ros2)/I_Ros1 = 24279
R_os2 := U_Ros2/(I_Ros1 - I_b07) = 33380.1
K_Uos := U_b07/U_e01 = 0.384107
T_f := K_Uos*3*K_skv/(2*π*f_min) = 0.146718
R_os_sum := 1/(1/R_os2 + 1/R_os1 + 1/(R_b + R_vh7)) = 11731.5
C_f := T_f*(1/R_os2 + 1/R_os1) = 1.04384e-5
# Часть 3. Расчёт частотных характеристик.
I_k0 = 0.03
# Расчёт ЭП1
S_p1 := I_k0/φ_T = 1.2
C_dif1 := S_p1/(2*π*F_T) = 1.90986e-10
r_vh1 := r_β1 + (1 + β)*R_n = 5362.35
C_vh1 := C_dif1/(1 + S_p1*R_n) + C_k = 3.5784e-12
R_d1 := R_vih2 + r_b1 = 289.626
R_vih2 := R_k2 = 1249.04
f_v1 := 1/(2*π*C_vh1*R_d1*r_vh1/(R_d1 + r_vh1)) = 161859952
K_u11(f) := K_u1/sqrt(1 + (f/f_v1)^2)
K_u1 = 0.965156
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# Расчёт УС2
I_k02 = 0.00377633
S_p2 := I_k02/φ_T = 0.151053
C_dif2 := S_p2/(2*π*F_T) = 2.40408e-11
K_u2_0 := β*R_k2/(r_β2 + (β + 1)*R_e2) = 7.16133
r_vh2 := r_β2 + (1 + β)*R_k2 = 66495
C_vh2 := C_dif2/(1 + S_p2*R_e2) + C_k*(1 + K_u2_0) = 1.7252e-11
R_g2 := r_b2 = 125
f_v2 := 1/(2*π*C_vh2*R_g2*r_vh2/(R_g2 + r_vh2)) = 73940970
K_u22(f) := K_u2*1*1/sqrt(1 + f^2/f_v2^2)
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# Расчёт ЭП3
S_p3 := I_b03*β/φ_T = 0.0555458
C_dif3 := S_p3/(2*π*F_T) = 8.84039e-12
C_vh3 := C_dif3/(1 + S_p3*R_e3) + C_k = 2.17911e-12
r_vh3 := r_β3 + (1 + β)*R_e3 = 47042.9
R_vih4 := R_k4 = 6738.28
R_d3 := R_vih4 + r_b3 = 6863.28
f_v3 := 1/(2*π*C_vh3*R_d3*r_vh3/(R_d3 + r_vh3)) = 12194215
K_u3 = 0.937852
K_u33(f) := K_u3/sqrt(1 + (f/f_v3)^2)
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# Расчёт УС4
S_p4 := I_k04/φ_T = 0.0472616
C_dif4 := S_p4/(2*π*F_T) = 7.52192e-12
K_u4_0 := β*R_k4/(r_β4 + (β + 1)*R_e4) = 13.2144
r_vh4 := r_β4 + (1 + β)*R_k4 = 357969
C_vh4 := C_dif4/(1 + S_p4*R_e4) + C_k*(1 + K_u4_0) = 2.87466e-11
R_g4 := r_b4 = 125
f_v4 := 1/(2*π*C_vh4*R_g4*r_vh4/(R_g4 + r_vh4)) = 44307329
K_u44(f) := K_u4*1*1/sqrt(1 + f^2/f_v4^2)
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# Расчёт ЭП5
S_p5 := I_b05*β/φ_T = 0.0471028
C_dif5 := S_p5/(2*π*F_T) = 7.49664e-12
C_vh5 := C_dif5/(1 + S_p5*R_e5) + C_k = 2.15823e-12
r_vh5 := r_β5 + (1 + β)*R_e5 = 53250.4
R_vih6 := R_kb_sh = 5916.95
R_d5 := R_vih6 + r_b5 = 6041.95
f_v5 := 1/(2*π*C_vh5*R_d5*r_vh5/(R_d5 + r_vh5)) = 13590055
K_u5 = 0.956322
K_u55(f) := K_u5/sqrt(1 + (f/f_v5)^2)
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# Расчёт УС6
S_p6 := I_k06/φ_T = 0.05153
C_dif6 := S_p6/(2*π*F_T) = 8.20125e-12
K_u6_0 := β*R_kb_sh/(r_β6 + (β + 1)*R_e6) = 18.1327
r_vh6 := r_β6 + (1 + β)*R_kb_sh = 314379
C_vh6 := C_dif6/(1 + S_p6*R_e6) + C_k*(1 + K_u6_0) = 3.8762e-11
R_g6 := r_b6 = 125
K_u6 = -18
f_v6 := 1/(2*π*C_vh6*R_g6*r_vh6/(R_g6 + r_vh6)) = 32860725
K_u66(f) := K_u6*1*1/sqrt(1 + f^2/f_v6^2)
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# Расчёт ЭП7
S_p7 := I_b07*β/φ_T = 0.0443765
C_dif7 := S_p7/(2*π*F_T) = 7.06274e-12
C_vh7 := C_dif7/(1 + S_p7*R_e7) + C_k = 2.17252e-12
r_vh7 := r_β7 + (1 + β)*R_e7 = 48836.3
R_vih7 := R_g*R_vh_sum/(R_g + R_vh_sum) = 3200
R_d7 := R_vih7 = 3200
K_u7 = 0.972176
f_v7 := 1/(2*π*C_vh7*R_d7*r_vh7/(R_d7 + r_vh7)) = 24393279
K_u77(f) := K_u7/sqrt(1 + (f/f_v7)^2)
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# Расчёт разделительных ёмкостей
R_vh_us = 46575.5
ω_min := 2*π*f_min = 6283.19
R_g = 4000
R_n = 100
C_p1 := 1/(sqrt(0.41)*ω_min*(R_vh_sum + R_g)) = 1.24279e-8
j := sqrt(-1)
C_p2 := 1/(sqrt(0.41)*ω_min*R_n) = 2.48558e-6  # В спецификации Ср1=5,1нФ  Ср2=2,4мФ
# Запишем выражения для коэффициентов передачи входной и выходной цепей
K_vh(f) := j*2*π*f*C_p1*R_vh_sum/(1 + j*2*π*f*C_p1*(R_vh_sum + R_g))
K_vih(f) := j*2*π*f*C_p2*R_n/(1 + j*2*π*f*C_p2*R_n)
# Расчитаем АЧХ всего усилителя
K_u_sum(f) := K_u77(f)*K_u66(f)*K_u55(f)*K_u44(f)*K_u33(f)*K_u22(f)*K_u11(f)*|K_vh(f)|*|K_vih(f)|
K_u_sum(f_min) = -569.133
K_u_sum(f_max) = -800.534
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f0 := 100*10^3
|K_u77(f0)| = 0.972168
|K_vh(f0)| = 0.799984
|K_u66(f0)| = 17.9999
|K_vih(f0)| = 0.99998
|K_u55(f0)| = 0.956297
|K_u44(f0)| = 11.5082
|K_u33(f0)| = 0.93782
|K_u22(f0)| = 5.75413
|K_u11(f0)| = 0.965156
0.97*18*0.95*13*0.93*7*0.97*0.8 = 1089.32
# Так как верхняя частота полосы усиления каскада меньше заданной, мы должны поставить
# навесную ёмкость на выход 6го каскада
# Расчёт УС6
S_p6 := I_k06/φ_T = 0.05153
C_dif6 := S_p6/(2*π*F_T) = 8.20125e-12
K_u6_0 := β*R_kb_sh/(r_β6 + (β + 1)*R_e6) = 18.1327
r_vh6 := r_β6 + (1 + β)*R_kb_sh = 314379
C_vh6 := C_dif6/(1 + S_p6*R_e6) + C_k*(1 + K_u6_0) = 3.8762e-11
R_g6 := r_b6 = 125
C_sum := 1/(2*π*f_max*R_g6*r_vh6/(R_g6 + r_vh6)) = 2.27455e-9
C_nav := C_sum - C_vh6 = 2.23578e-9
# Снав в спецификации будет равняться 2.2нФ
f_v6 := 1/(2*π*C_sum*R_g6*r_vh6/(R_g6 + r_vh6)) = 560000
K_u6 = -18
K_u66(f) := K_u6*1*1/sqrt(1 + f^2/f_v6^2)
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# Шестой каскад будет сужен, за счёт этого мы получаем другой график АЧХ
# Расчитаем АЧХ всего усилителя
K_u_sum(f) := K_u77(f)*K_u66(f)*K_u55(f)*K_u44(f)*K_u33(f)*K_u22(f)*K_u11(f)*|K_vh(f)|*|K_vih(f)|
K_u_sum(f_min) = -569.133
K_u_sum(f_max) = -566.145
f0 := 30*10^3
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