U_g := 2*10^-3  # Транзистор КТ316Б
β_min := 40
β_max := 120
R_g := 6*10^3
β := sqrt(β_min*β_max) = 69.282
f_min := 5*10^3
f_max := 200*10^3
C_k := 3*10^-12
C_e := 2.5*10^-12
U_n := 1.5
I_km := 50*10^-3
P_k_max := 150*10^-3
R_n := 120
F_T := 800*10^6
τ := 15*10^-12
E_p := 8
φ_T := 25*10^-3
# 1. Расчёт сквозного коэффициента усиления
K_skv := -U_n/U_g = -750
K_vh := 0.8
K_u7 := 0.9
K_u5 := 0.9
K_u3 := 0.9
K_u1 := 0.9
K_u4 := nthroot(K_skv/(K_vh*K_u1*K_u3*K_u5*K_u7), 3) = -11.2633
α := 0.5
K_u2 := α*K_u4 = -5.63167
K_u6 := α^-1*K_u4 = -22.5267
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# Расчёт простого ЭП1
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R_e1 := R_n = 120  # Ом
U_e1 := U_n = 1.5
R_e1_ekv := R_e1*R_n/(R_e1 + R_n) = 60
I_e11 := U_n/R_e1_ekv = 0.025
I_e01 := 1.25*I_e11 = 0.03125
# Расчитать постоянное напряжение на сопротивлении в цепи эмиттера
U_e01 := R_e1*I_e01 = 3.75
I_e_max := I_e01 + I_e11 = 0.05625
U_e_max := U_e01 + U_e1 = 5.25
# Проверить условие нахождения БТ в АО
E_p - U_e_max = 2.75  # В > 1 В
I_e_max = 0.05625  # А < 30 мА
# Условие не выполнено. Используем ЭП с генератором тока
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I_n := U_n/R_n = 0.0125
I_e11 := I_n = 0.0125
# Чтобы БТ не заходил в ОО и не вносил нелинейные скажения, примем
I_e01 := 1.25*I_e11 = 0.015625
# Расчет токов эммитера и базы транзистора VTгт
β_gt := β = 69.282
I_e01 + I_e11 = 0.028125
I_k0_gt := I_e01 = 0.015625
# меньше чем Iк импульсное допустимое, поэтому мы можем использовать этот транзистор в этом каскаде
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I_b0_gt := I_k0_gt/β_gt = 0.000225527
I_e0_gt := (β_gt + 1)*I_b0_gt = 0.0158505
# Выбор Rэгт
# Для обеспечения достаточной стабильности постоянного тока коллектора и повышения
# выходного сопротивления транзистора по переменному сигналу в 10-15 раз, достаточно выбрать Rэгт=25-30Ом
R_e_gt := 30  # Ом
# Расчёт делителя
I_del := 10*I_b0_gt = 0.00225527
U_b0_gt := I_e0_gt*R_e_gt + 0.6 = 1.07552
R_del1 := (E_p - U_b0_gt)/I_del = 3070.35
R_del2 := U_b0_gt/(I_del - I_b0_gt) = 529.877
# Выбор постоянного напряжения на эмметере БТ VT1
U_ke1_min == E_p - U_e01 - U_n
U_ke_gt_min == U_e01 - R_e_gt*I_e0_gt - U_n
U_ke1_min ≥ 1
# Если учесть что
U_ke_min_dop == 1
U_e01 := 2 + U_n + R_e_gt*I_e0_gt = 3.97552
U_ke1_min := E_p - U_e01 - U_n = 2.52448  # В > 1 В
U_ke_gt_min := U_e01 - R_e_gt*I_e0_gt - U_n = 2  # В > 1 В
# Расчёт первого каскада
I_b01 := I_e01/(1 + β) = 0.000222319
I_k01 := β*I_b01 = 0.0154027
r_b1 := τ/(0.5*C_k) = 10  # Ом
r_β1 := φ_T/I_b01 = 112.451
K_u1 := R_n*(1 + β)/(R_n*(1 + β) + r_β1 + r_b1) = 0.985689
U_b11 := (r_β1 + r_b1)*I_b01 + R_n*I_n = 1.52722
U_b01 := U_e01 + 0.6 = 4.57552
R_vh1 := R_n*(1 + β) + r_β1 + r_b1 = 8556.3
# Итоги ЭП1
U_b01 = 4.57552
R_vh1 = 8556.3
I_b01 = 0.000222319
r_b1 = 10
U_b11 = 1.52722
I_e01 = 0.015625
r_β1 = 112.451
K_u1 = 0.985689
I_k01 = 0.0154027
# Расчет УС2
# Порядок расчёта УС2
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I_k02 := 10*I_b01 = 0.00222319
U_k02 := U_b01 = 4.57552
R_k2 := (E_p - U_k02)/(I_k02 + I_b01) = 1400.32
R_k2_ekv := R_k2*R_vh1/(R_k2 + R_vh1) = 1203.37
R_k2/R_vh1 = 0.163659  # < 1 - проверка условия слабого влияния след. каскада
K_u2 = -5.63167
K_u2 == -β*R_k2_ekv/(r_b2 + r_β2 + (β + 1)*R_e2)
# Постоянная составляющая тока
I_b02 := I_k02/β = 3.20889e-5
I_e02 := (1 + 1/β)*I_k02 = 0.00225527
r_β2 := φ_T/I_b02 = 779.085
r_b2 := τ/(0.5*C_k) = 10
R_e2 := 1/(1 + β)*(β*R_k2_ekv/|K_u2| - (r_b2 + r_β2)) = 199.412
# Переменная составляющая напряжения в цепи коллектора
U_k12 := U_b11 = 1.52722
U_b12 := U_k12/|K_u2| = 0.271185
# Переменная составляющая тока
I_k12 := U_k12/R_k2 = 0.00109063
I_e12 := (1 + 1/β)*I_k12 = 0.00110637
I_b12 := I_k12/β = 1.57418e-5
# Постоянное напряжение
U_e02 := R_e2*I_e02 = 0.449729
U_b02 := U_e02 + 0.6 = 1.04973
# Входное и выходное сопротивления
R_vh2 := r_b2 + r_β2 + (β + 1)*R_e2 = 14804.2
R_vih2 := U_e02/I_e02 = 199.412
U_ke2_min := U_k02 - U_k12 - U_e02 - I_e12*R_e2 = 2.37794  # > 1В
# Итоги УС2
U_b02 = 1.04973
R_vh2 = 14804.2
R_k2 = 1400.32
I_b02 = 3.20889e-5
U_b12 = 0.271185
R_vih2 = 199.412
r_b2 = 10
I_e02 = 0.00225527
K_u2 = -5.63167
R_e2 = 199.412
r_β2 = 779.085
I_k02 = 0.00222319
# Расчет ЭП3
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n := 2  # Число диодов в цепи эмиттера
U_e03 := U_b02 + n*0.6 = 2.24973
R_v2 := 1000
# Постоянный ток
I_Rv2 := U_b02/R_v2 = 0.00104973
I_e03 := I_Rv2 + I_b02 = 0.00108182
I_b03 := I_e03/(1 + β) = 1.53925e-5
I_k03 := β*I_b03 = 0.00106643
# Расчёт диф сопротивлений диодов
R_dif := φ_T/I_e03 = 23.1092
R_dif_sum := n*R_dif = 46.2185
R_e3 := R_dif_sum + R_v2*R_vh2/(R_v2 + R_vh2) = 982.944  # сопротивление цепи эмиттера
# Расчёт коэффициента передачи ЭП3
r_b3 := τ/(0.5*C_k) = 10
r_β3 := φ_T*(1 + β)/I_e03 = 1624.16
K_u3 := (1 + β)*R_e3/((1 + β)*R_e3 + r_β3 + r_b3)*R_v2/(R_v2 + R_dif_sum) = 0.933736
# Переменная и постоянная составляющие напряжения на базе БТ
U_b13 := U_b12/|K_u3| = 0.29043
U_b03 := U_e03 + 0.6 = 2.84973
U_k13 := U_b12 = 0.271185
# Входное сопротивление ЭП
R_vh3 := r_b3 + r_β3 + (β + 1)*R_e3 = 70717.5
# Выходное сопротивление ЭП
R_vih3 := U_e03/I_e03 = 2079.58
U_ke3_min := E_p - U_k13 - U_e03 - I_b12*R_e3 = 5.46361  # > 1В
# Итоги ЭП3
U_b03 = 2.84973
R_vh3 = 70717.5
I_b03 = 1.53925e-5
U_b13 = 0.29043
R_vih3 = 2079.58
r_b3 = 10
I_e03 = 0.00108182
K_u3 = 0.933736
R_v2 = 1000
r_β3 = 1624.16
I_k03 = 0.00106643
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# Расчет УС4
# Выбор Rк
R_k4 := R_vh3/20 = 3535.87
R_k4_ekv := R_k4*R_vh3/(R_k4 + R_vh3) = 3367.5
R_k4/R_vh3 = 0.05
U_k04 := U_b03 = 2.84973
I_k04 := (E_p - U_k04)/R_k4_ekv = 0.00152941
I_b04 := I_k04/β = 2.20751e-5
I_e04 := I_k04*(1 + 1/β) = 0.00155148
# Расчёт Rе4
r_β4 := φ_T*β/I_k04 = 1132.5
r_b4 := τ/(0.5*C_k) = 10
R_e4 := 1/(β + 1)*(β*R_k4_ekv/|K_u4| - (r_b4 + r_β4)) = 278.469
K_u4 = -11.2633
R_vh4 := r_b4 + r_β4 + (β + 1)*R_e4 = 20713.9
U_e04 := R_e4*I_e04 = 0.432039
U_b04 := U_e04 + 0.6 = 1.03204
U_b14 := U_b13/|K_u4| = 0.0257854
U_k14 := U_b13 = 0.29043
I_k14 := U_k14/R_k4 = 8.21381e-5
I_b14 := I_k14/β = 1.18556e-6
I_e14 := (1 + 1/β)*I_k14 = 8.33237e-5
R_vih4 := U_e04/I_e04 = 278.469
U_ke4_min := U_k04 - U_b13 - (U_e04 + R_e4*I_e14) = 2.10406  # > 1В
# Итоги УС4
U_b04 = 1.03204
R_vh4 = 20713.9
R_k4 = 3535.87
I_b04 = 2.20751e-5
U_b14 = 0.0257854
R_vih4 = 278.469
r_b4 = 10
I_e04 = 0.00155148
K_u4 = -11.2633
R_e4 = 278.469
r_β4 = 1132.5
I_k04 = 0.00152941
# Расчёт ЭП5
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U_e05 := U_b04 + 0.6 = 1.63204
R_v4 := 1000
I_Rv4 := U_b04/R_v4 = 0.00103204
I_e05 := I_Rv4 + I_b04 = 0.00105411
I_b05 := I_e05/(1 + β) = 1.49983e-5
I_k05 := β*I_b05 = 0.00103912
R_dif5 := φ_T/I_e05 = 23.7166
n_5 := 1
R_dif_sum5 := n_5*R_dif5 = 23.7166
R_e5 := R_dif_sum5 + R_v4*R_vh4/(R_v4 + R_vh4) = 977.663
r_b5 := τ/(0.5*C_k) = 10
r_β5 := φ_T*(1 + β)/I_e05 = 1666.85
K_u5 := (1 + β)*R_e5/((1 + β)*R_e5 + r_β5 + r_b5)*R_v4/(R_v4 + R_dif_sum5) = 0.953562
U_b15 := U_b14/|K_u5| = 0.0270412
U_b05 := U_e05 + 0.6 = 2.23204
U_k15 := U_b14 = 0.0257854
R_vh5 := r_b5 + r_β5 + (β + 1)*R_e3 = 70760.2
R_vih5 := U_e05/I_e05 = 1548.26
U_ke5_min := E_p - U_k15 - U_e05 - I_b14*R_e5 = 6.34102  # > 1В
# Итоги ЭП5
U_b05 = 2.23204
R_vh5 = 70760.2
I_b05 = 1.49983e-5
U_b15 = 0.0270412
R_vih5 = 1548.26
r_b5 = 10
I_e05 = 0.00105411
K_u5 = 0.953562
R_v4 = 1000
r_β5 = 1666.85
I_k05 = 0.00103912
# Расчет УС6
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R_k6 := R_vh5/20 = 3538.01
R_k6_ekv := R_k6*R_vh5/(R_k6 + R_vh5) = 3369.53
U_k06 := U_b05 = 2.23204
I_k06 := (E_p - U_k06)/R_k6_ekv = 0.0017118
I_b06 := I_k06/β = 2.47077e-5
I_e06 := I_k06*(1 + 1/β) = 0.00173651
r_β6 := φ_T*β/I_k06 = 1011.83
r_b6 := τ/(0.5*C_k) = 10
R_e6 := 1/(β + 1)*(β*R_k6_ekv/|K_u6| - (r_b6 + r_β6)) = 132.912
K_u6 = -22.5267
R_vh6 := r_b6 + r_β6 + (β + 1)*R_e6 = 10363.2
K_u6 := -17.4
U_e06 := R_e6*I_b06*(1 + β) = 0.230803
U_b06 := U_e06 + 0.6 = 0.830803
U_k16 := U_b15 = 0.0270412
U_b16 := U_k16/|K_u6| = 0.00155409
I_k16 := U_k16/R_k6 = 7.64305e-6
I_b16 := I_k16/β = 1.10318e-7
I_e16 := (1 + 1/β)*I_k16 = 7.75337e-6
R_vih6 := U_e06/I_e06 = 132.912
U_ke6_min := U_k06 - U_b15 - (U_e06 + R_e6*I_e16) = 1.97316  # > 1В
# Итоги УС6
U_b06 = 0.830803
R_vh6 = 10363.2
R_k6 = 3538.01
I_b06 = 2.47077e-5
U_b16 = 0.00155409
R_vih6 = 132.912
r_b6 = 10
I_e06 = 0.00173651
K_u6 = -17.4
R_e6 = 132.912
r_β6 = 1011.83
I_k06 = 0.0017118
# Расчёт 7-го каскада
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# Расчет ЭП7
R_e7 := 700
I_Re7 := U_b06/R_e7 = 0.00118686
I_e07 := I_Re7 + I_b06 = 0.00121157
I_b07 := I_e07/(1 + β) = 1.72387e-5
I_k07 := β*I_b07 = 0.00119433
U_e07 := I_e07*R_e7 = 0.848099
U_b07 := U_e07 + 0.6 = 1.4481
r_β7 := φ_T*β/I_k07 = 1450.23
r_b7 := τ/(0.5*C_k) = 10
R_vh7 := r_b7 + r_β7 + (β + 1)*R_e7*R_vh6/(R_e7 + R_vh6) = 47544.8
K_u7 := (β + 1)*R_e7*R_vh6/(R_e7 + R_vh6)/((β + 1)*R_e7*R_vh6/(R_e7 + R_vh6) + r_β7 + r_b7) = 0.969287
U_ke7_min := E_p - U_b16 - U_e07 - I_b16*R_e7 = 7.15027  # > 1В
# Итоги ЭП7
U_b07 = 1.4481
R_e7 = 700
I_b07 = 1.72387e-5
K_u7 = 0.969287
r_b7 = 10
I_e07 = 0.00121157
R_vh7 = 47544.8
r_β7 = 1450.23
I_k07 = 0.00119433
R_vh_us := R_vh7 = 47544.8
K_vh_us := R_vh_us/(R_vh_us + R_g) = 0.887944
I_b0_us := I_b07 = 1.72387e-5
U_b0_us := U_b07 = 1.4481
# Проверка суммарного коэффициента усилителя
K_skv = -750
K_u1 = 0.985689
K_skv_sum := 0.8*K_u1*K_u2*K_u3*K_u4*K_u5*K_u6*K_u7 = -751.119
K_u2 = -5.63167
K_u3 = 0.933736
K_u4 = -11.2633
K_u5 = 0.953562
K_u6 = -17.4
K_u7 = 0.969287
I_k01 = 0.0154027
U_ke1_min = 2.52448
U_ke_gt_min = 2
I_k02 = 0.00222319
U_ke2_min = 2.37794
I_k03 = 0.00106643
U_ke3_min = 5.46361
I_k04 = 0.00152941
U_ke4_min = 2.10406
I_k05 = 0.00103912
U_ke5_min = 6.34102
I_k06 = 0.0017118
U_ke6_min = 1.97316
U_ke7_min = 7.15027
I_k07 = 0.00119433
I_b07 = 1.72387e-5
U_b07 = 1.4481
U_e01 = 3.97552
# ЧАСТЬ 2
# Рассчитаем  цепь обратой связи
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R_g = 6000
K_vh_us := 0.8
R_vh7 = 47544.8
R_vh_sum := 4*R_g = 24000
R_g = 6000
R_b := R_vh_sum*R_vh7/(R_vh7 - R_vh_sum) = 48464
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I_Ros1 := 4*I_b07 = 6.89547e-5
U_Ros2 := U_b07 + I_b07*R_b = 2.28355
R_os1 := (U_e01 - U_Ros2)/I_Ros1 = 24537.3
R_os2 := U_Ros2/(I_Ros1 - I_b07) = 44155.6
K_Uos := U_b07/U_e01 = 0.364254
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T_f := K_Uos*3*|K_skv|/(2*π*f_min) = 0.0260878
R_os_sum := 1/(1/R_os2 + 1/R_os1 + 1/(R_b + R_vh7)) = 13547
C_f := T_f*(1/R_os2 + 1/R_os1) = 1.654e-6
# Часть 3. Расчёт частотных характеристик.
# Расчёт ЭП1
S_p1 := I_k01/φ_T = 0.616107
C_dif1 := S_p1/(2*π*F_T) = 1.22571e-10
C_vh1 := C_dif1/(1 + S_p1*R_n) + C_k = 4.63574e-12
r_vh1 := r_β1 + (1 + β)*R_n = 8546.3
R_d1 := R_vih2 + r_b1 = 209.412
R_vih2 := R_k2 = 1400.32
f_v1 := 1/(2*π*C_vh1*R_d1*r_vh1/(R_d1 + r_vh1)) = 167962542
K_u11(f) := K_u1/sqrt(1 + (f/f_v1)^2)
K_u1 = 0.985689
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# Расчёт УС2
S_p2 := I_k02/φ_T = 0.0889274
C_dif2 := S_p2/(2*π*F_T) = 1.76915e-11
K_u2_0 := β*R_k2/(r_β2 + (β + 1)*R_e2) = 6.55777
r_vh2 := r_β2 + (1 + β)*R_k2 = 99196.3
C_vh2 := C_dif2/(1 + S_p2*R_e2) + C_k*(1 + K_u2_0) = 2.36177e-11
R_g2 := r_b2 = 10
f_v2 := 1/(2*π*C_vh2*R_g2*r_vh2/(R_g2 + r_vh2)) = 673947418
K_u22(f) := K_u2*1*1/sqrt(1 + f^2/f_v2^2)
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# Расчёт ЭП3
S_p3 := I_b03*β/φ_T = 0.042657
C_dif3 := S_p3/(2*π*F_T) = 8.48635e-12
C_vh3 := C_dif3/(1 + S_p3*R_e3) + C_k = 3.19768e-12
r_vh3 := r_β3 + (1 + β)*R_e3 = 70707.5
R_vih4 := R_k4 = 3535.87
R_d3 := R_vih4 + r_b3 = 3545.87
f_v3 := 1/(2*π*C_vh3*R_d3*r_vh3/(R_d3 + r_vh3)) = 14740508
K_u3 = 0.933736
K_u33(f) := K_u3/sqrt(1 + (f/f_v3)^2)
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# Расчёт УС4
S_p4 := I_k04/φ_T = 0.0611762
C_dif4 := S_p4/(2*π*F_T) = 1.21706e-11
K_u4_0 := β*R_k4/(r_β4 + (β + 1)*R_e4) = 11.8322
r_vh4 := r_β4 + (1 + β)*R_k4 = 249641
C_vh4 := C_dif4/(1 + S_p4*R_e4) + C_k*(1 + K_u4_0) = 3.91715e-11
R_g4 := r_b4 = 10
f_v4 := 1/(2*π*C_vh4*R_g4*r_vh4/(R_g4 + r_vh4)) = 406319632
K_u44(f) := K_u4*1*1/sqrt(1 + f^2/f_v4^2)
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# Расчёт ЭП5
S_p5 := I_b05*β/φ_T = 0.0415646
C_dif5 := S_p5/(2*π*F_T) = 8.26902e-12
C_vh5 := C_dif5/(1 + S_p5*R_e5) + C_k = 3.1986e-12
r_vh5 := r_β5 + (1 + β)*R_e5 = 70379
R_vih6 := R_k6_ekv = 3369.53
R_d5 := R_vih6 + r_b5 = 3379.53
f_v5 := 1/(2*π*C_vh5*R_d5*r_vh5/(R_d5 + r_vh5)) = 15430239
K_u55(f) := K_u5/sqrt(1 + (f/f_v5)^2)
K_u5 = 0.953562
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# Расчёт УС6
S_p6 := I_k06/φ_T = 0.068472
C_dif6 := S_p6/(2*π*F_T) = 1.36221e-11
K_u6_0 := β*R_k6_ekv/(r_β6 + (β + 1)*R_e6) = 22.5484
r_vh6 := r_β6 + (1 + β)*R_k6_ekv = 237829
C_vh6 := C_dif6/(1 + S_p6*R_e6) + C_k*(1 + K_u6_0) = 7.19939e-11
R_g6 := r_b6 = 10
K_u6 = -17.4
f_v6 := 1/(2*π*C_vh6*R_g6*r_vh6/(R_g6 + r_vh6)) = 221076516
K_u66(f) := K_u6*1*1/sqrt(1 + f^2/f_v6^2)
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# Расчёт ЭП7
S_p7 := I_b07*β/φ_T = 0.0477732
C_dif7 := S_p7/(2*π*F_T) = 9.50418e-12
C_vh7 := C_dif7/(1 + S_p7*R_e7) + C_k = 3.27595e-12
r_vh7 := r_β7 + (1 + β)*R_e7 = 50647.6
R_vih7 := R_g*R_vh_sum/(R_g + R_vh_sum) = 4800
R_d7 := R_vih7 = 4800
K_u7 = 0.969287
f_v7 := 1/(2*π*C_vh7*R_d7*r_vh7/(R_d7 + r_vh7)) = 11080645
K_u77(f) := K_u7/sqrt(1 + (f/f_v7)^2)
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# Расчёт разделительных ёмкостей
R_vh_us = 47544.8
ω_min := 2*π*f_min = 31415.9
R_g = 6000
R_n = 120
C_p1 := 1/(sqrt(0.41)*ω_min*(R_vh_sum + R_g)) = 1.65706e-9
j := sqrt(-1)
C_p2 := 1/(sqrt(0.41)*ω_min*R_n) = 4.14264e-7  # В спецификации Ср1=5,1нФ  Ср2=2,4мФ
# Запишем выражения для коэффициентов передачи входной и выходной цепей
K_vh(f) := j*2*π*f*C_p1*R_vh_sum/(1 + j*2*π*f*C_p1*(R_vh_sum + R_g))
K_vih(f) := j*2*π*f*C_p2*R_n/(1 + j*2*π*f*C_p2*R_n)
# Расчитаем АЧХ всего усилителя
K_u_sum(f) := K_u77(f)*K_u66(f)*K_u55(f)*K_u44(f)*K_u33(f)*K_u22(f)*K_u11(f)*|K_vh(f)|*|K_vih(f)|
K_u_sum(f_min) = -532.708
K_u_sum(f_max) = -750.671
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f0 := 1*10^5
|K_u77(f0)| = 0.969248
|K_u66(f0)| = 17.4
|K_u55(f0)| = 0.953542
|K_u44(f0)| = 11.2633
|K_u33(f0)| = 0.933714
|K_u22(f0)| = 5.63167
|K_u11(f0)| = 0.985689
|K_vh(f0)| = 0.79959
|K_vih(f0)| = 0.999488
|K_u77(f0)|*|K_u66(f0)|*|K_u55(f0)|*|K_u44(f0)|*|K_u33(f0)|*|K_u22(f0)|*|K_u11(f0)|*0.8 = 751.055
# Так как верхняя частота полосы усиления каскада меньше заданной, мы должны поставить навесную ёмкость на выход 6го каскада
# Расчёт УС6
S_p6 := I_k06/φ_T = 0.068472
C_dif6 := S_p6/(2*π*F_T) = 1.36221e-11
K_u6_0 := β*R_k6_ekv/(r_β6 + (β + 1)*R_e6) = 22.5484
r_vh6 := r_β6 + (1 + β)*R_k6_ekv = 237829
C_vh6 := C_dif6/(1 + S_p6*R_e6) + C_k*(1 + K_u6_0) = 7.19939e-11
R_g6 := r_b6 = 10
C_sum := 1/(2*π*f_max*R_g6*r_vh6/(R_g6 + r_vh6)) = 7.95808e-8
C_nav := C_sum - C_vh6 = 7.95088e-8
f_v6 := 1/(2*π*C_sum*R_g6*r_vh6/(R_g6 + r_vh6)) = 200000
K_u6 = -17.4
K_u66(f) := K_u6*1*1/sqrt(1 + f^2/f_v6^2)
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# Расчитаем АЧХ всего усилителя
K_u_sum(f) := K_u77(f)*K_u66(f)*K_u55(f)*K_u44(f)*K_u33(f)*K_u22(f)*K_u11(f)*|K_vh(f)|*|K_vih(f)|
K_u_sum(f_min) = -532.542
K_u_sum(f_max) = -530.805
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