U_g := 4*10^-3  # Транзистор КТ368Б
β_min := 50
β_max := 300
R_g := 10*10^3
β := sqrt(β_min*β_max) = 122.474
f_min := 1.8*10^3
f_max := 800*10^3
C_k := 1.7*10^-12
C_e := 3*10^-12
U_kb_max := 15
U_eb_max := 4
U_n := 2.0
R_n := 100
I_km := 30*10^-3
P_k_max := 225*10^-3
E_p := 12
F_T := 900*10^6
τ := 15*10^-12
φ_T := 25*10^-3
# 1. Расчёт сквозного коэффициента усиления
K_skv := -U_n/U_g = -500
K_vh := 0.8
K_u7 := 0.9
K_u5 := 0.9
K_u3 := 0.9
K_u1 := 0.9
K_u4 := nthroot(K_skv/(K_vh*K_u1*K_u3*K_u5*K_u7), 3) = -9.83943
α := 0.5
K_u2 := α*K_u4 = -4.91972
K_u6 := α^-1*K_u4 = -19.6789
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# Расчёт простого ЭП1
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R_e1 := R_n = 100  # Ом
U_e1 := U_n = 2
R_e1_ekv := R_e1*R_n/(R_e1 + R_n) = 50
I_e1 := U_n/R_e1_ekv = 0.04
I_e01 := 1.25*I_e1 = 0.05
# Расчитать постоянное напряжение на сопротивлении в цепи эмиттера
U_e01 := R_e1*I_e1 = 4
I_e_max := I_e01 + I_e1 = 0.09
U_e_max := U_e01 + U_e1 = 6
# Проверить условие нахождения БТ в АО
E_p - U_e_max = 6  # В > 1 В
I_e_max = 0.09  # А < 30 мА
# Условие не выполнено. Используем ЭП с генератором тока
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I_n := U_n/R_n = 0.02
I_e11 := I_n = 0.02
# Чтобы БТ не заходил в ОО и не вносил нелинейные скажения, примем
I_e01 := 1.25*I_e11 = 0.025
# Расчет токов эммитера и базы транзистора VTгт
β_gt := β = 122.474
I_e01 + I_e11 = 0.045
I_k0_gt := I_e01 = 0.025
# меньше чем Iк импульсное допустимое, поэтому мы можем использовать этот транзистор в этом каскаде
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I_b0_gt := I_k0_gt/β_gt = 0.000204124
I_e0_gt := (β_gt + 1)*I_b0_gt = 0.0252041
# Выбор Rэгт
# Для обеспечения достаточной стабильности постоянного тока коллектора и повышения
# выходного сопротивления транзистора по переменному сигналу в 10-15 раз, достаточно выбрать Rэгт=25-30Ом
R_e_gt := 30  # Ом
# Расчёт делителя
I_del := 10*I_b0_gt = 0.00204124
U_b0_gt := I_e0_gt*R_e_gt + 0.6 = 1.35612
R_del1 := (E_p - U_b0_gt)/I_del = 5214.41
R_del2 := U_b0_gt/(I_del - I_b0_gt) = 738.18
# Выбор постоянного напряжения на эмметере БТ VT1
U_ke1_min == E_p - U_e01 - U_n
U_ke_gt_min == U_e01 - R_e_gt*I_e0_gt - U_n
U_ke1_min ≥ 1
# Если учесть что
U_ke_min_dop == 1
U_e01 := 2 + U_n + R_e_gt*I_e0_gt = 4.75612
U_ke1_min := E_p - U_e01 - U_n = 5.24388  # В > 1 В
U_ke_gt_min := U_e01 - R_e_gt*I_e0_gt - U_n = 2  # В > 1 В
# Расчёт первого каскада
I_b01 := I_e01/(1 + β) = 0.000202471
I_k01 := β*I_b01 = 0.0247975
r_b1 := τ/(0.5*C_k) = 17.6471
r_β1 := φ_T/I_b01 = 123.474
K_u1 := R_n*(1 + β)/(R_n*(1 + β) + r_β1 + r_b1) = 0.9887
I_b11 := I_e11/(1 + β) = 0.000161977
U_b11 := (r_β1 + r_b1)*I_b11 + R_n*I_n = 2.02286
U_b01 := U_e01 + 0.6 = 5.35612
R_vh1 := R_n*(1 + β) + r_β1 + r_b1 = 12488.6
# Итоги ЭП1
U_b01 = 5.35612
R_vh1 = 12488.6
I_b01 = 0.000202471
r_b1 = 17.6471
U_b11 = 2.02286
I_e01 = 0.025
r_β1 = 123.474
K_u1 = 0.9887
I_k01 = 0.0247975
# Расчет УС2
# Порядок расчёта УС2
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I_k02 := 20*I_b01 = 0.00404942
U_k02 := U_b01 = 5.35612
R_k2 := (E_p - U_k02)/(I_k02 + I_b01) = 1562.57
R_k2_ekv := R_k2*R_vh1/(R_k2 + R_vh1) = 1388.8
R_k2/R_vh1 = 0.12512  # < 1 - проверка условия слабого влияния след. каскада
K_u2 = -4.91972
K_u2 == -β*R_k2_ekv/(r_b2 + r_β2 + (β + 1)*R_e2)
# Постоянная составляющая тока
I_b02 := I_k02/β = 3.30634e-5
I_e02 := (1 + 1/β)*I_k02 = 0.00408248
r_β2 := φ_T/I_b02 = 756.124
r_b2 := τ/(0.5*C_k) = 17.6471
R_e2 := 1/(1 + β)*(β*R_k2_ekv/|K_u2| - (r_b2 + r_β2)) = 273.74
# Переменная составляющая напряжения в цепи коллектора
U_k12 := U_b11 = 2.02286
U_b12 := U_k12/|K_u2| = 0.411174
# Переменная составляющая тока
I_k12 := U_k12/R_k2 = 0.00129457
I_e12 := (1 + 1/β)*I_k12 = 0.00130514
I_b12 := I_k12/β = 1.05701e-5
# Постоянное напряжение
U_e02 := R_e2*I_e02 = 1.11754
U_b02 := U_e02 + 0.6 = 1.71754
# Входное и выходное сопротивления
R_vh2 := r_b2 + r_β2 + (β + 1)*R_e2 = 34573.7
R_vih2 := U_e02/I_e02 = 273.74
U_ke2_min := U_k02 - U_k12 - U_e02 - I_e12*R_e2 = 1.85845  # > 1В
# Итоги УС2
U_b02 = 1.71754
R_vh2 = 34573.7
R_k2 = 1562.57
I_b02 = 3.30634e-5
U_b12 = 0.411174
R_vih2 = 273.74
r_b2 = 17.6471
I_e02 = 0.00408248
K_u2 = -4.91972
R_e2 = 273.74
r_β2 = 756.124
I_k02 = 0.00404942
# Расчет ЭП3
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n := 1  # Число диодов в цепи эмиттера
U_e03 := U_b02 + n*0.6 = 2.31754
R_v2 := 1000
# Постоянный ток
I_Rv2 := U_b02/R_v2 = 0.00171754
I_e03 := I_Rv2 + I_b02 = 0.0017506
I_b03 := I_e03/(1 + β) = 1.41779e-5
I_k03 := β*I_b03 = 0.00173643
# Расчёт диф сопротивлений диодов
R_dif := φ_T/I_e03 = 14.2808
R_dif_sum := n*R_dif = 14.2808
R_e3 := R_dif_sum + R_v2*R_vh2/(R_v2 + R_vh2) = 986.17  # сопротивление цепи эмиттера
# Расчёт коэффициента передачи ЭП3
r_b3 := τ/(0.5*C_k) = 17.6471
r_β3 := φ_T*(1 + β)/I_e03 = 1763.31
K_u3 := (1 + β)*(R_e3 - R_dif_sum)/((1 + β)*R_e3 + r_β3 + r_b3) = 0.971313
# Переменная и постоянная составляющие напряжения на базе БТ
U_b13 := U_b12/|K_u3| = 0.423318
U_b03 := U_e03 + 0.6 = 2.91754
U_k13 := U_b12 = 0.411174
# Входное сопротивление ЭП
R_vh3 := r_b3 + r_β3 + (β + 1)*R_e3 = 123548
# Выходное сопротивление ЭП
R_vih3 := U_e03/I_e03 = 1323.85
U_ke3_min := E_p - U_k13 - U_e03 - I_b12*R_e3 = 9.26086  # > 1В
# Итоги ЭП3
U_b03 = 2.91754
R_vh3 = 123548
I_b03 = 1.41779e-5
U_b13 = 0.423318
R_vih3 = 1323.85
r_b3 = 17.6471
I_e03 = 0.0017506
K_u3 = 0.971313
R_v2 = 1000
r_β3 = 1763.31
I_k03 = 0.00173643
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# Расчет УС4
# Выбор Rк
R_k4 := R_vh3/20 = 6177.39
R_k4_ekv := R_k4*R_vh3/(R_k4 + R_vh3) = 5883.23
R_k4/R_vh3 = 0.05
U_k04 := U_b03 = 2.91754
I_k04 := (E_p - U_k04)/R_k4_ekv = 0.00154379
I_b04 := I_k04/β = 1.2605e-5
I_e04 := I_k04*(1 + 1/β) = 0.00155639
# Расчёт Rе4
r_β4 := φ_T*β/I_k04 = 1983.34
r_b4 := τ/(0.5*C_k) = 17.6471
R_e4 := 1/(β + 1)*(β*R_k4_ekv/|K_u4| - (r_b4 + r_β4)) = 576.876
R_vh4 := r_b4 + r_β4 + (β + 1)*R_e4 = 73230.4
U_e04 := R_e4*I_e04 = 0.897845
U_b04 := U_e04 + 0.6 = 1.49785
U_b14 := U_b13/|K_u4| = 0.0430226
U_k14 := U_b13 = 0.423318
I_k14 := U_k14/R_k4 = 6.8527e-5
I_b14 := I_k14/β = 5.5952e-7
I_e14 := (1 + 1/β)*I_k14 = 6.90865e-5
R_vih4 := U_e04/I_e04 = 576.876
U_ke4_min := U_k04 - U_b13 - (U_e04 + R_e4*I_e14) = 1.55652  # > 1В
# Итоги УС4
U_b04 = 1.49785
R_vh4 = 73230.4
R_k4 = 6177.39
I_b04 = 1.2605e-5
U_b14 = 0.0430226
R_vih4 = 576.876
r_b4 = 17.6471
I_e04 = 0.00155639
K_u4 = -9.83943
R_e4 = 576.876
r_β4 = 1983.34
I_k04 = 0.00154379
n_5 := 0  # Расчёт ЭП5
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U_e05 := U_b04 + n_5*0.6 = 1.49785
R_v4 := 1000
I_Rv4 := U_b04/R_v4 = 0.00149785
I_e05 := I_Rv4 + I_b04 = 0.00151045
I_b05 := I_e05/(1 + β) = 1.22329e-5
I_k05 := β*I_b05 = 0.00149822
R_dif5 := φ_T/I_e05 = 16.5514
R_dif_sum5 := n_5*R_dif5 = 0
R_e5 := R_dif_sum5 + R_v4*R_vh4/(R_v4 + R_vh4) = 986.528
r_b5 := τ/(0.5*C_k) = 17.6471
r_β5 := φ_T*(1 + β)/I_e05 = 2043.67
K_u5 := (1 + β)*(R_e5 - R_dif_sum5)/((1 + β)*R_e5 + r_β5 + r_b5) = 0.983359
U_b15 := U_b14/|K_u5| = 0.0437506
U_b05 := U_e05 + 0.6 = 2.09785
U_k15 := U_b14 = 0.0430226
R_vh5 := r_b5 + r_β5 + (β + 1)*R_e3 = 123828
R_vih5 := U_e05/I_e05 = 991.655
U_ke5_min := E_p - U_k15 - U_e05 - I_b14*R_e5 = 10.4586  # > 1В
# Итоги ЭП5
U_b05 = 2.09785
R_vh5 = 123828
I_b05 = 1.22329e-5
U_b15 = 0.0437506
R_vih5 = 991.655
r_b5 = 17.6471
I_e05 = 0.00151045
K_u5 = 0.983359
R_v4 = 1000
r_β5 = 2043.67
I_k05 = 0.00149822
# Расчет УС6
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R_k6 := R_vh5/20 = 6191.41
R_k6_ekv := R_k6*R_vh5/(R_k6 + R_vh5) = 5896.58
U_k06 := U_b05 = 2.09785
I_k06 := (E_p - U_k06)/R_k6_ekv = 0.0016793
I_b06 := I_k06/β = 1.37115e-5
I_e06 := I_k06*(1 + 1/β) = 0.00169302
r_β6 := φ_T*β/I_k06 = 1823.29
r_b6 := τ/(0.5*C_k) = 17.6471
R_e6 := 1/(β + 1)*(β*R_k6_ekv/|K_u6| - (r_b6 + r_β6)) = 282.304
K_u6 = -19.6789
R_vh6 := r_b6 + r_β6 + (β + 1)*R_e6 = 36698.3
K_u6 := -14.
U_e06 := R_e6*I_b06*(1 + β) = 0.477945
U_b06 := U_e06 + 0.6 = 1.07795
U_k16 := U_b15 = 0.0437506
U_b16 := U_k16/|K_u6| = 0.00312504
I_k16 := U_k16/R_k6 = 7.06634e-6
I_b16 := I_k16/β = 5.76965e-8
I_e16 := (1 + 1/β)*I_k16 = 7.12404e-6
R_vih6 := U_e06/I_e06 = 282.304
U_ke6_min := U_k06 - U_b15 - (U_e06 + R_e6*I_e16) = 1.57414  # > 1В
# Итоги УС6
U_b06 = 1.07795
R_vh6 = 36698.3
R_k6 = 6191.41
I_b06 = 1.37115e-5
U_b16 = 0.00312504
R_vih6 = 282.304
r_b6 = 17.6471
I_e06 = 0.00169302
K_u6 = -14
R_e6 = 282.304
r_β6 = 1823.29
I_k06 = 0.0016793
# Расчёт 7-го каскада
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# Расчет ЭП7
R_e7 := 1000
I_Re7 := U_b06/R_e7 = 0.00107795
I_e07 := I_Re7 + I_b06 = 0.00109166
I_b07 := I_e07/(1 + β) = 8.84115e-6
I_k07 := β*I_b07 = 0.00108282
U_e07 := I_e07*R_e7 = 1.09166
U_b07 := U_e07 + 0.6 = 1.69166
r_β7 := φ_T*β/I_k07 = 2827.69
r_b7 := τ/(0.5*C_k) = 17.6471
R_vh7 := r_b7 + r_β7 + (β + 1)*R_e7*R_vh6/(R_e7 + R_vh6) = 123044
K_u7 := (β + 1)*R_e7*R_vh6/(R_e7 + R_vh6)/((β + 1)*R_e7*R_vh6/(R_e7 + R_vh6) + r_β7 + r_b7) = 0.976876
U_ke7_min := E_p - U_b16 - U_e07 - I_b16*R_e7 = 10.9052  # > 1В
# Итоги ЭП7
U_b07 = 1.69166
R_e7 = 1000
I_b07 = 8.84115e-6
K_u7 = 0.976876
r_b7 = 17.6471
I_e07 = 0.00109166
R_vh7 = 123044
r_β7 = 2827.69
I_k07 = 0.00108282
R_vh_us := R_vh7 = 123044
K_vh_us := R_vh_us/(R_vh_us + R_g) = 0.924837
I_b0_us := I_b07 = 8.84115e-6
U_b0_us := U_b07 = 1.69166
# Проверка суммарного коэффициента усилителя
K_skv = -500
K_u1 = 0.9887
K_skv_sum := 0.8*K_u1*K_u2*K_u3*K_u4*K_u5*K_u6*K_u7 = -500.153
K_u2 = -4.91972
K_u3 = 0.971313
K_u4 = -9.83943
K_u5 = 0.983359
K_u6 = -14
K_u7 = 0.976876
I_k01 = 0.0247975
U_ke1_min = 5.24388
U_ke_gt_min = 2
I_k02 = 0.00404942
U_ke2_min = 1.85845
I_k03 = 0.00173643
U_ke3_min = 9.26086
I_k04 = 0.00154379
U_ke4_min = 1.55652
I_k05 = 0.00149822
U_ke5_min = 10.4586
I_k06 = 0.0016793
U_ke6_min = 1.57414
U_ke7_min = 10.9052
I_k07 = 0.00108282
U_e01 = 4.75612
# ЧАСТЬ 2
# Рассчитаем  цепь обратой связи
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R_g = 10000
K_vh_us := 0.8
R_vh7 = 123044
R_vh_sum := 4*R_g = 40000
R_g = 10000
R_b := R_vh_sum*R_vh7/(R_vh7 - R_vh_sum) = 59266.8
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I_Ros1 := 4*I_b07 = 3.53646e-5
U_Ros2 := U_b07 + I_b07*R_b = 2.21564
R_os1 := (U_e01 - U_Ros2)/I_Ros1 = 71836.8
R_os2 := U_Ros2/(I_Ros1 - I_b07) = 83535.2
K_Uos := U_b07/U_e01 = 0.35568
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T_f := K_Uos*3*|K_skv|/(2*π*f_min) = 0.0471735
R_os_sum := 1/(1/R_os2 + 1/R_os1 + 1/(R_b + R_vh7)) = 31870.9
C_f := T_f*(1/R_os2 + 1/R_os1) = 1.22139e-6
# Часть 3. Расчёт частотных характеристик.
# Расчёт ЭП1
S_p1 := I_k01/φ_T = 0.991901
C_dif1 := S_p1/(2*π*F_T) = 1.75407e-10
C_vh1 := C_dif1/(1 + S_p1*R_n) + C_k = 3.45074e-12
r_vh1 := r_β1 + (1 + β)*R_n = 12470.9
R_d1 := R_vih2 + r_b1 = 291.387
R_vih2 := R_k2 = 1562.57
f_v1 := 1/(2*π*C_vh1*R_d1*r_vh1/(R_d1 + r_vh1)) = 161982444
K_u11(f) := K_u1/sqrt(1 + (f/f_v1)^2)
K_u1 = 0.9887
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# Расчёт УС2
S_p2 := I_k02/φ_T = 0.161977
C_dif2 := S_p2/(2*π*F_T) = 2.86438e-11
K_u2_0 := β*R_k2/(r_β2 + (β + 1)*R_e2) = 5.5381
r_vh2 := r_β2 + (1 + β)*R_k2 = 193694
C_vh2 := C_dif2/(1 + S_p2*R_e2) + C_k*(1 + K_u2_0) = 1.17465e-11
R_g2 := r_b2 = 17.6471
f_v2 := 1/(2*π*C_vh2*R_g2*r_vh2/(R_g2 + r_vh2)) = 767852701
K_u22(f) := K_u2*1*1/sqrt(1 + f^2/f_v2^2)
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# Расчёт ЭП3
S_p3 := I_b03*β/φ_T = 0.069457
C_dif3 := S_p3/(2*π*F_T) = 1.22827e-11
C_vh3 := C_dif3/(1 + S_p3*R_e3) + C_k = 1.87674e-12
r_vh3 := r_β3 + (1 + β)*R_e3 = 123530
R_vih4 := R_k4 = 6177.39
R_d3 := R_vih4 + r_b3 = 6195.04
f_v3 := 1/(2*π*C_vh3*R_d3*r_vh3/(R_d3 + r_vh3)) = 14375526
K_u3 = 0.971313
K_u33(f) := K_u3/sqrt(1 + (f/f_v3)^2)
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# Расчёт УС4
S_p4 := I_k04/φ_T = 0.0617515
C_dif4 := S_p4/(2*π*F_T) = 1.09201e-11
K_u4_0 := β*R_k4/(r_β4 + (β + 1)*R_e4) = 10.3339
r_vh4 := r_β4 + (1 + β)*R_k4 = 764733
C_vh4 := C_dif4/(1 + S_p4*R_e4) + C_k*(1 + K_u4_0) = 1.95658e-11
R_g4 := r_b4 = 17.6471
f_v4 := 1/(2*π*C_vh4*R_g4*r_vh4/(R_g4 + r_vh4)) = 460956931
K_u44(f) := K_u4*1*1/sqrt(1 + f^2/f_v4^2)
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# Расчёт ЭП5
S_p5 := I_b05*β/φ_T = 0.0599287
C_dif5 := S_p5/(2*π*F_T) = 1.05977e-11
C_vh5 := C_dif5/(1 + S_p5*R_e5) + C_k = 1.87627e-12
r_vh5 := r_β5 + (1 + β)*R_e5 = 123855
R_vih6 := R_k6_ekv = 5896.58
R_d5 := R_vih6 + r_b5 = 5914.23
f_v5 := 1/(2*π*C_vh5*R_d5*r_vh5/(R_d5 + r_vh5)) = 15027424
K_u55(f) := K_u5/sqrt(1 + (f/f_v5)^2)
K_u5 = 0.983359
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# Расчёт УС6
S_p6 := I_k06/φ_T = 0.0671722
C_dif6 := S_p6/(2*π*F_T) = 1.18787e-11
K_u6_0 := β*R_k6_ekv/(r_β6 + (β + 1)*R_e6) = 19.6883
r_vh6 := r_β6 + (1 + β)*R_k6_ekv = 729900
C_vh6 := C_dif6/(1 + S_p6*R_e6) + C_k*(1 + K_u6_0) = 3.57652e-11
R_g6 := r_b6 = 17.6471
K_u6 = -14
f_v6 := 1/(2*π*C_vh6*R_g6*r_vh6/(R_g6 + r_vh6)) = 252172489
K_u66(f) := K_u6*1*1/sqrt(1 + f^2/f_v6^2)
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# Расчёт ЭП7
S_p7 := I_b07*β/φ_T = 0.0433126
C_dif7 := S_p7/(2*π*F_T) = 7.65935e-12
C_vh7 := C_dif7/(1 + S_p7*R_e7) + C_k = 1.87285e-12
r_vh7 := r_β7 + (1 + β)*R_e7 = 126302
R_vih7 := R_g*R_vh_sum/(R_g + R_vh_sum) = 8000
R_d7 := R_vih7 = 8000
K_u7 = 0.976876
f_v7 := 1/(2*π*C_vh7*R_d7*r_vh7/(R_d7 + r_vh7)) = 11295353
K_u77(f) := K_u7/sqrt(1 + (f/f_v7)^2)
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# Расчёт разделительных ёмкостей
R_vh_us = 123044
ω_min := 2*π*f_min = 11309.7
R_g = 10000
R_n = 100
C_p1 := 1/(sqrt(0.41)*ω_min*(R_vh_sum + R_g)) = 2.76176e-9
j := sqrt(-1)
C_p2 := 1/(sqrt(0.41)*ω_min*R_n) = 1.38088e-6  # В спецификации Ср1=5,1нФ  Ср2=2,4мФ
# Запишем выражения для коэффициентов передачи входной и выходной цепей
K_vh(f) := j*2*π*f*C_p1*R_vh_sum/(1 + j*2*π*f*C_p1*(R_vh_sum + R_g))
K_vih(f) := j*2*π*f*C_p2*R_n/(1 + j*2*π*f*C_p2*R_n)
# Расчитаем АЧХ всего усилителя
K_u_sum(f) := K_u77(f)*K_u66(f)*K_u55(f)*K_u44(f)*K_u33(f)*K_u22(f)*K_u11(f)*|K_vh(f)|*|K_vih(f)|
K_u_sum(f_min) = -354.719
K_u_sum(f_max) = -497.418
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f0 := 1*10^5
|K_u77(f0)| = 0.976837
|K_u66(f0)| = 14
|K_u55(f0)| = 0.983338
|K_u44(f0)| = 9.83943
|K_u33(f0)| = 0.971289
|K_u22(f0)| = 4.91972
|K_u11(f0)| = 0.9887
|K_vh(f0)| = 0.799947
|K_vih(f0)| = 0.999934
|K_u77(f0)|*|K_u66(f0)|*|K_u55(f0)|*|K_u44(f0)|*|K_u33(f0)|*|K_u22(f0)|*|K_u11(f0)|*0.8 = 500.11
# Так как верхняя частота полосы усиления каскада меньше заданной, мы должны поставить навесную ёмкость на выход 6го каскада
# Расчёт УС6
S_p6 := I_k06/φ_T = 0.0671722
C_dif6 := S_p6/(2*π*F_T) = 1.18787e-11
K_u6_0 := β*R_k6_ekv/(r_β6 + (β + 1)*R_e6) = 19.6883
r_vh6 := r_β6 + (1 + β)*R_k6_ekv = 729900
C_vh6 := C_dif6/(1 + S_p6*R_e6) + C_k*(1 + K_u6_0) = 3.57652e-11
R_g6 := r_b6 = 17.6471
C_sum := 1/(2*π*f_max*R_g6*r_vh6/(R_g6 + r_vh6)) = 1.12737e-8
C_nav := C_sum - C_vh6 = 1.1238e-8
f_v6 := 1/(2*π*C_sum*R_g6*r_vh6/(R_g6 + r_vh6)) = 800000
K_u6 = -14
K_u66(f) := K_u6*1*1/sqrt(1 + f^2/f_v6^2)
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# Расчитаем АЧХ всего усилителя
K_u_sum(f) := K_u77(f)*K_u66(f)*K_u55(f)*K_u44(f)*K_u33(f)*K_u22(f)*K_u11(f)*|K_vh(f)|*|K_vih(f)|
K_u_sum(f_min) = -354.718
K_u_sum(f_max) = -351.729
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