X := transpose([0, 1, 2, 3, 4, 5, 6, 7, 8, 9, 10, 11, 12, 13, 14, 15])
F(X) := sin(π*X/8)
F(X) = [0; 0.382683; 0.707107; 0.92388; 1; 0.92388; 0.707107; 0.382683; 0; -0.382683; -0.707107; -0.92388; -1; -0.92388; -0.707107; -0.382683]
q := max(X)/max(F(X)) = 15
q*F(X) = [0; 5.74025; 10.6066; 13.8582; 15; 13.8582; 10.6066; 5.74025; 0; -5.74025; -10.6066; -13.8582; -15; -13.8582; -10.6066; -5.74025]
Y_кв := round(q*F(X), 0) = [0; 6; 11; 14; 15; 14; 11; 6; 0; -6; -11; -14; -15; -14; -11; -6]
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σ := sum((q*F(X) - round(q*F(X), 0))^2, X = 0 .. 15)/sum((q*F(X))^2, X = 0 .. 15) = 0.000538535
10*log(σ) = -32.6879  # дБ
