l := 0.5
l := 3
l := 5
φ := [
    0 deg;
    10*deg;
    20*deg;
    30*deg;
    40*deg;
    50*deg;
    60*deg;
    70*deg;
    80*deg;
    90*deg;
    100*deg;
    110*deg;
    120*deg;
    130*deg;
    140*deg;
    150*deg;
    160*deg;
    170*deg;
    180*deg;
    190*deg;
    200*deg;
    210*deg;
    220*deg;
    230*deg;
    240*deg;
    250*deg;
    260*deg;
    270*deg;
    280*deg;
    290*deg;
    300*deg;
    310*deg;
    320*deg;
    330*deg;
    340*deg;
    350*deg;
    360*deg
]
P1 := [
    95; 97; 90; 71; 51; 31; 17; 6.9; 2.5; 0.5
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]
P2 := [
    51; 61; 33; 12; 34; 68; 75; 58; 29; 6
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]
P3 := [
    84; 84; 81; 71; 57; 43; 27; 15; 6; 1
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]
k := 0.1
f(θ) := |(cos(2*π*k*cos(θ)) - cos(2*π*k))/sin(θ)|
V1 := sqrt(P1)
V2 := sqrt(P2)
V3 := sqrt(P3)
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P4 := [
    99; 98; 82; 53; 25; 9; 4; 1; 0.5; 0
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]
P5 := [
    34; 17; 24; 69; 99; 89; 58; 18; 4; 2
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]
h := 2.5
h := 5
V4 := sqrt(P4)
V5 := sqrt(P5)
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P6 := [
    100; 99; 98; 97; 50; 35; 9; 4; 6; 4
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]
P7 := [
    98; 97; 71; 35; 15; 17; 41; 79; 96; 98
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]
# горизонтальная поляризация
V6 := sqrt(P6)
V7 := sqrt(P7)
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