# 3.2.1 Расчитать направление максимального излучения и ширину главного луча по половинной мощности для трёх вариантов волноводно-щелевой антенны №2. Расстояния между щелями d и число щелей N.
a_1 := 19
λ_0 := 32
a_2 := 23
d := 19.5
a_3 := 28.3
N := 9
λ_кр := 2*a_3 = 56.6  # мм
λ_в := λ_0/sqrt(1 - (λ_0/λ_кр)^2) = 38.7956  # мм
ξ := λ_0/λ_в*(1 - λ_в/(2*d)) = 0.00432389
L := N*d = 175.5  # мм
Θ_gl := acos(ξ) = 1.56647  # рад
Θ_gl/deg = 89.7523  # градусов
ΔΦ := 2*π*d/λ_в - π = 0.0165554
ΔΘ_05 := (51*λ_0/(L*sin(Θ_gl)))*(1 + 0.636*ΔΦ^2) = 9.30085  # градусов
# 3.2.2 Рассчитать и построить зависимость ширины главного луча по половинной мощности Δθ_(0,5) и уровня мак- симальных боковых лепестков УБЛ щелевой волноводной антенны №1 в зависимости от величины Δ (0 ≤ Δ ≤ 1 с шагом 0,25), N = 7, λ = 3,2 см.
N := 7
λ_кр := 2*a_1 = 38  # мм
λ_в := λ_0/sqrt(1 - (λ_0/λ_кр)^2) = 59.3347  # мм
ΔΦ := 2*π*d/λ_в - π
k := 2*π/λ_0
L := N*d = 136.5  # мм
ξ := ΔΦ/(k*d)
Θ_gl := acos(ξ) = 1.85584  # рад
Δ := 0, 0.25 .. 1
ΔΘ_05(Δ) := (51*λ_0/(L*sin(Θ_gl)))*(1 + 0.636*Δ^2)
YBL(Δ) := -(13 + 8*Δ + 3*Δ^2)
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# 3.2.3 Рассчитать и построить в декартовых координатах нормированную диаграмму направленности в плоскости вектора Н антенны №1 в случае равномерного возбуждения
# а) всех семи щелей (Δ = 0, d = 22,5 мм)
Δ := 0
d := 22.5
N := 7
λ_0 = 32
λ_в = 59.3347
ΔΦ := 2*π*d/λ_в - π
k := 2*π/λ_0
ξ := ΔΦ/(k*d)  # θ
F_N(θ) := sin(N*k*d/2*(cos(θ) - ξ))/(N*sin(k*d/2*(cos(θ) - ξ)))
F_1(θ) := cos(π/2*cos(θ))/sin(θ)
θ := 0, 0.001 .. 2*π
F_max := 0.97876
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# а) четырех  щелей (Δ = 0, d = 22,5 мм)
Δ := 0
d := 45
N := 4
λ_0 = 32
λ_в = 59.3347
ΔΦ := 2*π*d/λ_в
k := 2*π/λ_0
ξ := ΔΦ/(k*d)
F_N(θ) := sin(N*k*d/2*(cos(θ) - ξ))/(N*sin(k*d/2*(cos(θ) - ξ)))
F_1(θ) := cos(π/2*cos(θ))/sin(θ)
θ := 0, 0.001 .. 2*π
F_max := 0.97862
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# 3.2.4 Рассчитать амплитуды возбуждения щелей антенной решётки (антенна №1) для одного значения Δ.
Δ := 0.2
d := 19.5
N := 7
L := N*d = 136.5
I(z) := 1 + Δ*cos(2*π*z/L)
I(1*d) = 1.1247
I(2*d) = 0.955496
I(3*d) = 0.819806
I(4*d) = 0.819806
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I(5*d) = 0.955496
I(6*d) = 1.1247
I(7*d) = 1.2
