φ := transpose([-60, -50, -40, -30, -25, -20, -15, -10, -5, 0, 5, 10, 15, 20, 25, 30, 40, 50, 60])
P_1 := transpose([1, 1, 1, 4, 2, 2, 24, 24, 21, 96, 98, 63, 2, 7, 2, 4, 2, 1, 1])
P_2 := transpose([1, 1, 1, 1, 3, 23, 12, 96, 100, 44, 5, 4, 4, 1, 1, 1, 3, 1, 1])
P_3 := transpose([1, 1, 1, 3, 2, 1, 1, 4, 3, 15, 86, 71, 5, 4, 1, 1, 1, 1, 1])
V_1 := sqrt(P_1)
V_2 := sqrt(P_2)
V_3 := sqrt(P_3)
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θ_28 := transpose([-16, -14, -12, -10, -8, -6, -4, -2, 0, 2, 4, 6, 8, 10, 12, 14, 16])
P_28 := transpose([1, 1, 1, 4, 6, 5, 1, 4, 15, 40, 76, 99, 90, 66, 27, 7, 1])
V_28 := sqrt(P_28)
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θ_23 := transpose([
    -40, -38, -36, -34, -32, -30, -28, -26, -24, -22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])
P_23 := transpose([
    1, 1, 4, 9, 11, 7, 4, 5, 4, 4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])
V_23 := sqrt(P_23)
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θ_19 := transpose([
    -40, -38, -36, -34, -32, -30, -28, -26, -24, -22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])
P_19 := transpose([
    1, 2, 3, 8, 13, 9, 4, 1, 1, 1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])
V_19 := sqrt(P_19)
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