# Исходные данные - вариант № 3:
# 1) Рассчитать линейную дискретную эквидистантную антенную решётку, определить, то есть определить число излучателей N, расстояние между ними d и сдвиг фаз между токами в соседних излучателях ΔΦ при минимально возможном числе излучателей и при следующих дополнительных условиях:
#
# a) Нормированная диаграмма одного излучателя в плоскости XZ: P(θ)=sin(θ)^Q, θ = 0...180. В нижнем полупространстве излучение отсутствует.
#
# b) Линейное распределение фаз токов в излучателях решётки определяет направление главного максимума под углом θ_m к оси решётки в плоскости XZ.
#
# c) Ширина ДН в плоскости XZ по половинной мощности Δθ. Уровень боковых лепестков во всём диапазоне углов не должен превышать уровня большего из двух соседних с главным боковых лепестков.
q := 1
θ°_max := 55 °
Δθ° := 6.5 °
L := 51 °/(Δθ°*sin(θ°_max))
L = 9.57839
θ°_max == arccos(ξ)  # ξ - коэффициент замедления
ξ := cos(θ°_max)
ξ = 0.573576
N := 1 + L*(1 + |ξ|)
(1 + |ξ|) = 1.57358
N = 16.0723
N := 16
ψ(θ) := π*L*(cos(θ) - cos(θ°_max))
F_N(θ) := sin(ψ(θ))/(N*sin(ψ(θ)/N))  # F_N - множитель комбинирования
F(θ) := sin(θ)^q  # F - диаграмма направленности одного излучателя
F_Σ(θ) := F_N(θ)*F(θ)  # F_Σ - диаграмма направленности решетки
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# 2
# Теперь найдём минимальное число излучателей в антенне, учитывая что уровень боковых лепестков при этом не может превышать уровень бокового  лепестка, ближайшего к главному.
N := 15
F_N(θ) := sin(ψ(θ))/(N*sin(ψ(θ)/N))
F(θ) := sin(θ)^q
F_Σ(θ) := F_N(θ)*F(θ)
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# Полученная ДН не соответствует требованиям по уровню боковых лепестков. Вернём значение количества излучателей .
N := 16
F_N(θ) := sin(ψ(θ))/(N*sin(ψ(θ)/N))
F(θ) := sin(θ)^q
F_Σ(θ) := F_N(θ)*F(θ)
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d := L/N = 0.598649  # шаг решетки
ΔΦ := ξ*2*π*d = 2.15746  # рад
ΔΦ*180/π = 123.614  # град
# град | 3
# 2) Рассчитать и построить характерные ДН решётки в верхнем полупространстве в плоскости XZ в декартовой и полярной системах координат.
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Q := 0, 0.01 .. π
# 3) Вычислить КНД решётки.
КНД := 1/(1/2*integral(|F_Σ(θ)|^2*sin(θ), θ = 0 .. π)) = 28.2723
# 4) Для полученной антенной решётки модифицировать амплитудно-фазовое распределение токов в излучающих элементах с целью подавления большего бокового лепестка из двух соседних с главным, то есть на месте первого бокового лепестка должен появиться нуль ДН. Вывести таблицу, содержащую исходное амплитудно-фазовое распределение и модифицированное.
# 4
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43.74 deg = 0.763407
65 deg = 1.13446
# Определим углы левого и правого боковых лепестков и уровень ближайшего к главному лепестку
θ_л := 43.74
θ_п := 65
ΔΦ_м := cos(θ_п*180/π)*2*π*L/N = -0.496643
УБЛ := 0.229/0.95 = 0.241053
j := 1i  # j - мнимая единица
i := 1 .. N
I_0 := 1
I_2(i) := УБЛ*I_0*e^(-j*(i - 1)*ΔΦ_м)
I_1(i) := I_0*e^(-j*(i - 1)*ΔΦ)
I_Σ(i) := I_1(i) + I_2(i)
i = [1; 2; 3; 4; 5; 6; 7; 8; 9; 10; 11; 12; 13; 14; 15; 16]
# Амплитуда  Фаза
# токов
# Амплитуда  Фаза
# токов
# Амплитуда  Фаза
# токов
|I_1(i)| = [1; 1; 1; 1; 1; 1; 1; 1; 1; 1; 1; 1; 1; 1; 1; 1]
arg(I_1(i)) = [0; -2.15746; 1.96826; -0.189206; -2.34667; 1.77905; -0.378411; -2.53587; 1.58985; -0.567617; -2.72508; 1.40064; -0.756823; -2.91429; 1.21144; -0.946028]
|I_2(i)| = [0.241053; 0.241053; 0.241053; 0.241053; 0.241053; 0.241053; 0.241053; 0.241053; 0.241053; 0.241053; 0.241053; 0.241053; 0.241053; 0.241053; 0.241053; 0.241053]
arg(I_2(i)) = [0; 0.496643; 0.993285; 1.48993; 1.98657; 2.48321; 2.97986; -2.80669; -2.31005; -1.8134; -1.31676; -0.820118; -0.323475; 0.173167; 0.66981; 1.16645]
|I_Σ(i)| = [1.24105; 0.795085; 1.15267; 1.00298; 0.937904; 1.19396; 0.766338; 1.23395; 0.841484; 1.10093; 1.06588; 0.875418; 1.22297; 0.759413; 1.21293; 0.899746]
arg(I_Σ(i)) = [0; -2.01497; 1.79429; 0.0520543; -2.58776; 1.91013; -0.446086; -2.58816; 1.78814; -0.776626; -2.50001; 1.17963; -0.673961; -2.89711; 1.1088; -0.714405]
# 5
# 5) Провести проверочный расчёт ДН исходной и модифицированной антенной решётки. Построить полученные ДН.
θ'°_1 := 65 °
УБЛ := 0.243
ξ' := cos(θ'°_1)
ξ' = 0.422618
ΔΦ' := ξ'*2*π*L/N
ΔΦ' = 1.58965
ψ1(θ) := π*L*(cos(θ) - ξ')
F'_N1(θ) := sin(ψ1(θ))/(N*sin(ψ1(θ)/N))
F'_Σ(θ) := F(θ)*F'_N1(θ)
F_ΣМ(θ) := F_Σ(θ) + УБЛ*F'_Σ(θ)
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# 6
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# По полученной ДН видно, что правый лепесток испытывает подавление.
