q := 1
Δθ_0.5 := 6.5 deg
θ_max := 55 deg
G(θ) := sin(θ)^q
ξ := cos(θ_max) = 0.573576
L_0 := 51 deg/(Δθ_0.5*sin(θ_max)) = 9.57839
N_нач := 1 + L_0*(1 + |ξ|) = 16.0723
ψ(θ) := L_0*π*(cos(θ) - ξ)
ψ_max := ψ(0) = 12.8317
F_N(θ, N) := sin(ψ(θ))/(N*sin(ψ(θ)/N))
ψ_min := ψ(π) = -47.3511
F_Σ(θ, N) := F_N(θ, N)*G(θ)
θ := 0, 0.001 .. π
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# Для N = 9, 8, 7
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# При N=7 заданное условие относительно УБЛ не выполняется, поэтому принимаем Nmin=8
N_min := 16
# Найдем фазовый сдвиг и шаг решетки в длинах волны:
# d/λ=L/Nmin
m := L_0/N_min = 0.598649  # - шаг решетки
ΔΦ := 2*π*m*ξ = 2.15746  # рад
ΔΦ*180/π = 123.614  # град
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# ПУНКТ 2
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θ_max1 := 65 deg  # - угол правого бокового лепестка
ξ1 := cos(θ_max1) = 0.422618
УБЛ := 0.19936/0.82013 = 0.243083
ΔΦ1 := 2*π*m*ξ1 = 1.58965
L_01 := 51 deg/(Δθ_0.5*sin(θ_max1)) = 8.65727
ψ1(θ) := L_01*π*(cos(θ) - ξ1)
F_N1(θ, N) := sin(ψ1(θ))/(N*sin(ψ1(θ)/N))
F_Σ1(θ, N) := F_N1(θ, N)*G(θ)*УБЛ
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# Расчет амплитуд токов и фаз излучателей
ΔΦ := 2*π*m*cos(θ_max) = 123.614 deg
N_min = 16
# Исходные амплитуды и фазы:
j := sqrt(-1)
i := 0 .. N_min
I[i] := 1*e^(j*(N_min - 1)/2*ΔΦ)*e^(-j*i*ΔΦ)
# Амплитуды токов:
# Фазы:
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|I[i]| = [1; 1; 1; 1; 1; 1; 1; 1; 1; 1; 1; 1; 1; 1; 1; 1; 1]
arg(I[i]) = [-152.898; 83.4882; -40.1254; -163.739; 72.6475; -50.9661; -174.58; 61.8068; -61.8068; 174.58; 50.9661; -72.6475; 163.739; 40.1254; -83.4882; 152.898; 29.2847] deg
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# Добавка
ΔΦ_доб := 2*π*m*cos(θ_max1) = 91.08 deg
91.08 deg = 1.58965
Iдоб[i] := УБЛ*e^(j*(N_min - 1)/2*ΔΦ_доб)*e^(-j*i*ΔΦ_доб)
# Амплитуды токов:
# Фазы:
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|Iдоб[i]| = [0.243083; 0.243083; 0.243083; 0.243083; 0.243083; 0.243083; 0.243083; 0.243083; 0.243083; 0.243083; 0.243083; 0.243083; 0.243083; 0.243083; 0.243083; 0.243083; 0.243083]
arg(Iдоб[i]) = [-36.8999; -127.98; 140.94; 49.8601; -41.22; -132.3; 136.62; 45.54; -45.54; -136.62; 132.3; 41.22; -49.8601; -140.94; 127.98; 36.8999; -54.1801] deg
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# Скорректированные:
# Амплитуды токов:
# Фазы:
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|I[i] + Iдоб[i]| = [0.919772; 0.802759; 0.756972; 0.808793; 0.928642; 1.06412; 1.17444; 1.23523; 1.23523; 1.17444; 1.06412; 0.928642; 0.808793; 0.756972; 0.802759; 0.919772; 1.05566]
arg(I[i] + Iдоб[i]) = [-139.157; 92.5833; -40.4675; -173.313; 58.7977; -64.0177; 176.461; 58.6468; -58.6468; -176.461; 64.0177; -58.7977; 173.313; 40.4675; -92.5833; 139.157; 16.0601] deg
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m = 0.598649
θ_max1 := 65 deg  # - угол правого бокового лепестка
ξ1 := cos(θ_max1) = 0.422618
УБЛ := 0.19936/0.82013 = 0.243083
ΔΦ1 := 2*π*m*ξ1 = 1.58965
L_01 := 51 deg/(Δθ_0.5*sin(θ_max1)) = 8.65727
ψ1(θ) := L_01*π*(cos(θ) - ξ1)
F_N1(θ, N) := sin(ψ1(θ))/(N*sin(ψ1(θ)/N))
F_Σ(θ, N) := G(θ)*F_N1(θ, N)
F_ΣМ(θ, N) := F_Σ(θ, N) + УБЛ*F_Σ(θ, N)
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