Q := 1
θ_m := 55 deg = 0.959931
Δθ := 6.5 deg = 0.113446
ξ := cos(θ_m) = 0.573576  # - коэффициент замедления
N*d/λ == 51*deg/(Δθ*sin(θ_m))
51*deg/(Δθ*sin(θ_m)) = 9.57839
N_0 := 51*deg/(Δθ*sin(θ_m))*(1 + ξ) + 1 = 16.0723
d/λ == (N - 1)/(N*(1 + ξ))
(N_0 - 1)/(N_0*(1 + ξ)) = 0.595955
d_λ := (N_0 - 1)/(N_0*(1 + ξ))
ψ(θ) == N*k*d/2*(cos(θ) - ξ) == N*2*π*d/(2*λ)*(cos(θ) - ξ) == N*π*d/λ*(cos(θ) - ξ)
ψ(θ) := N_0*π*d_λ*(cos(θ) - ξ)
F_N(θ, N) := sin(ψ(θ))/(N*sin(ψ(θ)/N))  # - множитель комбинирования
F(θ) := sin(θ)^Q  # - диаграмма направленности одного излучателя
F_Σ(θ, N) := F_N(θ, N)*F(θ)  # - диаграмма направленности решетки
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ψ_1(θ, N) := N*π*d_λ*(cos(θ) - ξ)
ψ_1(0, N_0) = 12.8317
ψ_1(π, N_0) = -47.3511
ΔΦ := 2*π*d_λ*ξ = 2.14776
ΔΦ/deg = 123.057
КНД := |F_Σ(θ_m + 10^-16, N_0)|^2/(1/2*integral(|F_Σ(θ, N_0)|^2*sin(θ), θ = 0 .. π)) = 18.9891
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θ_b := 65 deg = 1.13446
ξ_dop := cos(θ_b) = 0.422618
ΔΦ_dop := 2*π*d_λ*ξ_dop = 1.58249
ψ_dop(θ) := N_0*π*d_λ*(cos(θ) - ξ_dop)
ΔΦ_dop/deg = 90.6702
F_N1(θ, N) := sin(ψ_dop(θ))/(N*sin(ψ_dop(θ)/N))
УБЛ := 0.19936/0.90013 = 0.221479
F_dop(θ) := F(θ)*(F_N(θ, N_0) + УБЛ*F_N1(θ, N_0))
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F_Σ(θ*deg, N_0)
ΔΦ := 2*π*d_λ*cos(θ_m) = 123.057 deg
N_0 = 16.0723
# Исходные амплитуды и фазы:
j := sqrt(-1)
i := 0 .. N_0
I[i] := 1*e^(j*(N_0 - 1)/2*ΔΦ)*e^(-j*i*ΔΦ)
# Амплитуды токов:
# Фазы:
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|I[i]| = [1; 1; 1; 1; 1; 1; 1; 1; 1; 1; 1; 1; 1; 1; 1; 1; 1]
arg(I[i]) = [-152.62; 84.3225; -38.7348; -161.792; 75.1505; -47.9068; -170.964; 65.9785; -57.0788; 179.864; 56.8065; -66.2508; 170.692; 47.6345; -75.4228; 161.52; 38.4625] deg
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# Добавка
ΔΦ_доб := 2*π*d_λ*cos(θ_b) = 90.6702 deg
91.08 deg = 1.58965
Iдоб[i] := УБЛ*e^(j*(N_0 - 1)/2*ΔΦ_доб)*e^(-j*i*ΔΦ_доб)
# Амплитуды токов:
# Фазы:
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|Iдоб[i]| = [0.221479; 0.221479; 0.221479; 0.221479; 0.221479; 0.221479; 0.221479; 0.221479; 0.221479; 0.221479; 0.221479; 0.221479; 0.221479; 0.221479; 0.221479; 0.221479; 0.221479]
arg(Iдоб[i]) = [-36.695; -127.365; 141.965; 51.2945; -39.3757; -130.046; 139.284; 48.6138; -42.0564; -132.727; 136.603; 45.9331; -44.7371; -135.407; 133.923; 43.2524; -47.4178] deg
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# Скорректированные:
# Амплитуды токов:
# Фазы:
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|I[i] + Iдоб[i]| = [0.924875; 0.819835; 0.778542; 0.82336; 0.930149; 1.05339; 1.15553; 1.21319; 1.21527; 1.16139; 1.06185; 0.939042; 0.829527; 0.778922; 0.814208; 0.916119; 1.03965]
arg(I[i] + Iдоб[i]) = [-140.183; 92.4807; -38.9338; -170.236; 62.6395; -59.9283; -179.376; 62.8552; -54.3713; -172.065; 68.6524; -53.6359; 179.596; 48.499; -83.0837; 149.226; 26.1947] deg
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58.36 - 51.84 = 6.52
58.64 - 51.68 = 6.96
51.84
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|F_Σ(θ_m + 10^-16, N_0)| = 0.819152
|F_dop(θ_m + 10^-16)| = 0.779259
|F_Σ(θ_m + 10^-16, N_0)| - |F_dop(θ_m + 10^-16)| = 0.0398934
(|F_dop(θ_m + 10^-16)| - |F_Σ(θ_m + 10^-16, N_0)|)/|F_Σ(θ_m + 10^-16, N_0)|*100 = -4.87009
Q := 0, 10^-3 .. π
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КНД := |F_dop(θ_m + 10^-16)|^2/(1/2*integral(|F_dop(θ)|^2*sin(θ), θ = 0 .. π)) = 18.055
