f_s := 256
j := 1i
φ(f) := 2*π*f/f_s
H(f) := (0.125 - 0.25*e^(-j*φ(f)))/(1 - 0.125*e^(-j*φ(f)) + 0.75*e^(-j*2*φ(f)))
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x(n) :=
    1 if n == 0
    0 otherwise
y(n) := 0.125*x(n) - 0.25*x(n - 1) + 0.125*y(n - 1) - 0.75*y(n - 2)
y(n) :=
    0.125*x(n) if n == 0
    0.125*x(n) - 0.25*x(n - 1) + 0.125*y(n - 1) if n == 1
    0.125*x(n) - 0.25*x(n - 1) + 0.125*y(n - 1) - 0.75*y(n - 2) otherwise
x_0 := 100
y_0 := 0.125*x_0 = 12.5
y_1 := -(0.25*x_0) + 0.125*y_0 = -23.4375
y_2 := 0.125*y_1 - 0.75*y_0 = -12.3047
y_3 := 0.125*y_2 - 0.75*y_1 = 16.04
y_4 := 0.125*y_3 - 0.75*y_2 = 11.2335
y_5 := 0.125*y_4 - 0.75*y_3 = -10.6258
y_6 := 0.125*y_5 - 0.75*y_4 = -9.75337
y_7 := 0.125*y_6 - 0.75*y_5 = 6.75021
y_8 := 0.125*y_7 - 0.75*y_6 = 8.1588
y_9 := 0.125*y_8 - 0.75*y_7 = -4.04281
y_10 := 0.125*y_9 - 0.75*y_8 = -6.62445
y_11 := 0.125*y_10 - 0.75*y_9 = 2.20405
y_12 := 0.125*y_11 - 0.75*y_10 = 5.24385
y_13 := 0.125*y_12 - 0.75*y_11 = -0.997555
y_14 := 0.125*y_13 - 0.75*y_12 = -4.05758
y_15 := 0.125*y_14 - 0.75*y_13 = 0.240969
y_16 := 0.125*y_15 - 0.75*y_14 = 3.07331
y_17 := 0.125*y_16 - 0.75*y_15 = 0.203437
y_18 := 0.125*y_17 - 0.75*y_16 = -2.27955
y_19 := 0.125*y_18 - 0.75*y_17 = -0.437521
y_20 := 0.125*y_19 - 0.75*y_18 = 1.65497
y_ih := [
    y_0;
    y_1;
    y_2;
    y_3;
    y_4;
    y_5;
    y_6;
    y_7;
    y_8;
    y_9;
    y_10;
    y_11;
    y_12;
    y_13;
    y_14;
    y_15;
    y_16;
    y_17;
    y_18;
    y_19;
    y_20
]
y_ih = [12.5; -23.4375; -12.3047; 16.04; 11.2335; -10.6258; -9.75337; 6.75021; 8.1588; -4.04281; -6.62445; 2.20405; 5.24385; -0.997555; -4.05758; 0.240969; 3.07331; 0.203437; -2.27955; -0.437521; 1.65497]
n := [0; 1; 2; 3; 4; 5; 6; 7; 8; 9; 10; 11; 12; 13; 14; 15; 16; 17; 18; 19; 20; 21; 22; 23; 24; 25]
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y_ih := [12; -24; -12; 16; 11; -11; -11; 6; 8; -4; -7; 2; 5; -2; -5; 0; 3; 0; -2; 1; 0; 0; 0; 0; 0; 0]
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y_ph := [
    sum(y_ih[i], i = 0 .. 0);
    sum(y_ih[i], i = 0 .. 1);
    sum(y_ih[i], i = 0 .. 2);
    sum(y_ih[i], i = 0 .. 3);
    sum(y_ih[i], i = 0 .. 4);
    sum(y_ih[i], i = 0 .. 5);
    sum(y_ih[i], i = 0 .. 6);
    sum(y_ih[i], i = 0 .. 7);
    sum(y_ih[i], i = 0 .. 8);
    sum(y_ih[i], i = 0 .. 9);
    sum(y_ih[i], i = 0 .. 10);
    sum(y_ih[i], i = 0 .. 11);
    sum(y_ih[i], i = 0 .. 12);
    sum(y_ih[i], i = 0 .. 13);
    sum(y_ih[i], i = 0 .. 14);
    sum(y_ih[i], i = 0 .. 15);
    sum(y_ih[i], i = 0 .. 16);
    sum(y_ih[i], i = 0 .. 17);
    sum(y_ih[i], i = 0 .. 18);
    sum(y_ih[i], i = 0 .. 19);
    sum(y_ih[i], i = 0 .. 20);
    sum(y_ih[i], i = 0 .. 21);
    sum(y_ih[i], i = 0 .. 22);
    sum(y_ih[i], i = 0 .. 23);
    sum(y_ih[i], i = 0 .. 24);
    sum(y_ih[i], i = 0 .. 2)
]
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f_1 := [1; 8; 16; 32; 48; 56; 64; 72; 90; 120]
K_1 := [0.078; 0.078; 0.109; 0.156; 0.375; 0.703; 0.781; 0.594; 0.25; 0.188]
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