S_d := 1.5
K := 5
T_0 := 0.033
λ(t) :=
    1 if t == 0
    0 otherwise
T_2 := 0.05
S_d*K*T_0 = 0.2475
X(s) := (1 + s*T_0)/(s^2*T_0 + s + S_d*K)
SKT_0 := 0.25
x_4(t, T) := 0.5*e^(-0.5*t/T)*(2.0*T + t)/T
S_d*K*T_0/2 = 0.12375
x_5(t, T) := e^(-0.5*t/T)*(1 + 0.5*t/T)
x_3(t, T, SKT) := e^(-t/(2*T))*(sinh(t*sqrt(-(4*SKT - 1)/T^2)/2) + T*cosh(t*sqrt(-(4*SKT - 1)/T^2)/2)*sqrt(-(4*SKT - 1)/T^2))/(T*sqrt(-(4*SKT - 1)/T^2))
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x_1(t, T) := e^(-t/(2*T))*(sinh(t*sqrt(-(4*K*S_d*T - 1)/T^2)/2) + T*cosh(t*sqrt(-(4*K*S_d*T - 1)/T^2)/2)*sqrt(-(4*K*S_d*T - 1)/T^2))/(T*sqrt(-(4*K*S_d*T - 1)/T^2))
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x_srkv == (β/(S_d*K))^2 + S_ξ*K/(2*S_d)
S_ξ/(2*S_d) - 2*β^2/(K_opt^3*S_d^2) == 0
2*β^2/(K_opt^3*S_d^2) == S_ξ/(2*S_d)
4*β^2 == S_ξ*K_opt^3*S_d
4*β^2 == S_ξ*K_opt^3*S_d
K_opt == nthroot(4*β^2/(S_ξ*S_d), 3)
K_opt(β, S_ξ) := nthroot(4*β^2/(S_ξ*S_d), 3)
K_opt(1, 10^-3) = 13.8672
x_2(t, T, K) := e^(-t/(2*T))*(sinh(t*sqrt(-(4*K*S_d*T - 1)/T^2)/2) + T*cosh(t*sqrt(-(4*K*S_d*T - 1)/T^2)/2)*sqrt(-(4*K*S_d*T - 1)/T^2))/(T*sqrt(-(4*K*S_d*T - 1)/T^2))
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a_0 := S_d*K = 7.5
a_1 := 1
a_2 := T_0 + T_2 = 0.083
a_3 := T_0*T_2 = 0.00165
a_1*a_2 = 0.083
a_0*a_3 = 0.012375
