left := 0
right := 1
n := 99
SkT(d) := 2*(1 + d)/(1 - d)
Δ := (right - left)/n
f1(x) := SkT(x)
f2(x) := 0
[x; y] :=
    x[0] ← left
    y[0] ← f1(left)
    for i ∈ 1, 3 .. n*2 + 1
        x[i] ← x[i - 1]
        x[i + 1] ← x[i] + Δ
    for i ∈ 1, 5 .. n*2 + 1
        y[i] ← f2(x[i])
        y[i + 1] ← f2(x[i + 1])
    for i ∈ 3, 7 .. n*2 + 1
        y[i] ← f1(x[i])
        y[i + 1] ← f1(x[i + 1])
    [x; y]
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d_0 := 0.6
SkT(d_0) = 8
l(k) :=
    1 if k == 0
    0 otherwise
S_0 := 2
S_1 := 2
S_2 := 2
K_0 := 4
K_1 := 4
K_2 := 4
α := 1
T_0 := 0.5
T_1 := 1.5
T_2 := 1
λ(k) := α*l(k)
S_0*K_0*T_0 = 4
S_1*K_1*T_1 = 12
S_2*K_2*T_2 = 8
x(k, d, S, K, T) := λ(k) - (1 + d)*λ(k - 1) + d*λ(k - 2) - (S*K*T*(1 - d) - d - 1)*x(k - 1, d, S, K, T) - d*x(k - 2, d, S, K, T)  # error: Значение должно быть функцией, но имеет форму: [Unitless].
k := [0, 1, 2, 3, 4, 5, 6, 7, 8, 9, 10, 11, 12, 13, 14, 15, 16, 17, 18, 19, 20]
x_0(d, S, K, T) := λ(0)
x_1(d, S, K, T) := -(1 + d)*λ(0) - (S*K*T*(1 - d) - d - 1)*x_0(d, S, K, T)
x_2(d, S, K, T) := d*λ(0) - (S*K*T*(1 - d) - d - 1)*x_1(d, S, K, T) - d*x_0(d, S, K, T)
x_3(d, S, K, T) := -((S*K*T*(1 - d) - d - 1)*x_2(d, S, K, T)) - d*x_1(d, S, K, T)
x_4(d, S, K, T) := -((S*K*T*(1 - d) - d - 1)*x_3(d, S, K, T)) - d*x_2(d, S, K, T)
x_5(d, S, K, T) := -((S*K*T*(1 - d) - d - 1)*x_4(d, S, K, T)) - d*x_3(d, S, K, T)
x_6(d, S, K, T) := -((S*K*T*(1 - d) - d - 1)*x_5(d, S, K, T)) - d*x_4(d, S, K, T)
x_7(d, S, K, T) := -((S*K*T*(1 - d) - d - 1)*x_6(d, S, K, T)) - d*x_5(d, S, K, T)
x_8(d, S, K, T) := -((S*K*T*(1 - d) - d - 1)*x_7(d, S, K, T)) - d*x_6(d, S, K, T)
x_9(d, S, K, T) := -((S*K*T*(1 - d) - d - 1)*x_8(d, S, K, T)) - d*x_7(d, S, K, T)
x_10(d, S, K, T) := -((S*K*T*(1 - d) - d - 1)*x_9(d, S, K, T)) - d*x_8(d, S, K, T)
x_11(d, S, K, T) := -((S*K*T*(1 - d) - d - 1)*x_10(d, S, K, T)) - d*x_9(d, S, K, T)
x_12(d, S, K, T) := -((S*K*T*(1 - d) - d - 1)*x_11(d, S, K, T)) - d*x_10(d, S, K, T)
x_13(d, S, K, T) := -((S*K*T*(1 - d) - d - 1)*x_12(d, S, K, T)) - d*x_11(d, S, K, T)
x_14(d, S, K, T) := -((S*K*T*(1 - d) - d - 1)*x_13(d, S, K, T)) - d*x_12(d, S, K, T)
x_15(d, S, K, T) := -((S*K*T*(1 - d) - d - 1)*x_14(d, S, K, T)) - d*x_13(d, S, K, T)
x_16(d, S, K, T) := -((S*K*T*(1 - d) - d - 1)*x_15(d, S, K, T)) - d*x_14(d, S, K, T)
x_17(d, S, K, T) := -((S*K*T*(1 - d) - d - 1)*x_16(d, S, K, T)) - d*x_15(d, S, K, T)
x_18(d, S, K, T) := -((S*K*T*(1 - d) - d - 1)*x_17(d, S, K, T)) - d*x_16(d, S, K, T)
x_19(d, S, K, T) := -((S*K*T*(1 - d) - d - 1)*x_18(d, S, K, T)) - d*x_17(d, S, K, T)
x_20(d, S, K, T) := -((S*K*T*(1 - d) - d - 1)*x_19(d, S, K, T)) - d*x_18(d, S, K, T)
x(d, S, K, T) := [|x_0(d, S, K, T)|, |x_1(d, S, K, T)|, |x_2(d, S, K, T)|, |x_3(d, S, K, T)|, |x_4(d, S, K, T)|, |x_5(d, S, K, T)|, |x_6(d, S, K, T)|, |x_7(d, S, K, T)|, |x_8(d, S, K, T)|, |x_9(d, S, K, T)|, |x_10(d, S, K, T)|, |x_11(d, S, K, T)|, |x_12(d, S, K, T)|, |x_13(d, S, K, T)|, |x_14(d, S, K, T)|, |x_15(d, S, K, T)|, |x_16(d, S, K, T)|, |x_17(d, S, K, T)|, |x_18(d, S, K, T)|, |x_19(d, S, K, T)|, |x_20(d, S, K, T)|]
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f(xx) := e^xx
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σ_xfl(d, S, K, T) := (1 - d)*(K*T)^2/(1 + d - S*K*T*(1 - d)) + K*T/S
σ_xfl(d_0, S_0, K_0, T_2) = -2
