P_ф := 16
f_0 := 3*10^6
t_с := 40
S := 3
S_к := 1
E_штрих := 0.6
E_к := 28
R_п.к := 5
e_эб.доп := 4
t_п.доп := 150
P_1 := 1.1*P_ф = 17.6
θ := 85 deg
cos(θ) = 0.0871557
α_0 := 0.302
α_1 := 0.487
g1 := α_0/α_1 = 0.620123
ζ_кр := 0.5 + 0.5*sqrt(1 - 8*P_1/(α_1*S_к*E_к^2)) = 0.897249
U_к.кр := ζ_кр*E_к = 25.123
I_к1 := 2*P_1/U_к.кр = 1.40111
R_к.кр := U_к.кр/I_к1 = 17.9308
I_к0 := I_к1*g1 = 0.868859
P_0 := I_к0*E_к = 24.3281
P_рас := P_0 - P_1 = 6.72806
η_э := P_1/P_0 = 0.723444
U_в := I_к1/(S*α_1*(1 - cos(θ))) = 1.05057
E_см := E_штрих - U_в*cos(θ) = 0.508437
R_тmax := (t_п.доп - t_с)/P_рас = 16.3494
|E_см - U_в| = 0.542132
R_к.сmax := R_тmax - R_п.к = 11.3494
i_b(U_be) :=
    (S/5*(U_be - E_штрих)) if U_be > E_штрих
    0 otherwise
i_k(U_be) :=
    (S*(U_be - E_штрих)) if U_be > E_штрих
    0 otherwise
V_min := 770/R_к.сmax^1.54 = 18.2739
H := 2
A := 2.5
U_be1(t) := E_см + U_в*cos(θ*t)
I_b1(t) := i_b(U_be1(t))
B := 3.7
I_k1(t) := i_k(U_be1(t))
H*A*B = 18.5
I_kmin(U_к) := S_к*(E_к - U_к)
I_km := S*(E_см + U_в - E_штрих) = 2.87702
I_kmin(U_к.кр) = 2.87702
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i_k2(U_ke) :=
    S_к*U_ke if 0 ≤ U_ke ≤ E_к - U_к.кр
    (S_к*(E_к - U_к.кр)) otherwise
    0 if U_ke < 0
i_k2(U_ke) :=
    S_к*U_ke if U_ke ≥ 0
    0 otherwise
U_ke1(t, U_к) := E_к - U_к*cos(θ*t)
I_k3(t, U_к) := i_k2(U_ke1(t, U_к))
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I_kmain(t, U_к) :=
    I_k1(t) if I_k1(t) < I_k3(t, U_к)
    I_k3(t, U_к) if I_k1(t) > I_k3(t, U_к)
I_kmin1 := I_kmin(1.1*U_к.кр) = 0.364719
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γ_1 := 0.445
I_к11(R_k) := U_к.кр/R_k
I_к11(R_к.кр) = 1.40111
U_в1(R_k) := I_к11(R_k)/(S*γ_1)
E_см1(R_k) := E_штрих - U_в1(R_k)*cos(θ)
E_к1(R_k) := S*(E_см1(R_k) + U_в1(R_k) - E_штрих)/S_к + U_к.кр
I_k1(t, R_k) :=
    (S*(E_см + U_в*cos(θ*t) - E_штрих)) if E_см + U_в*cos(θ*t) > E_штрих
    0 otherwise
I_k2(t, R_k) :=
    S_к*(E_к1(R_k) - U_к.кр*cos(θ*t)) if E_к1(R_k) - U_к.кр*cos(θ*t) ≥ 0
    0 otherwise
I_км := S*(E_см + U_в - E_штрих)
S_к*E_к = 28
I_kmin(R_k) := S_к*(E_к1(R_k) - U_к.кр)
I_kmain(t, R_k) :=
    I_k1(t, R_k) if I_k1(t, R_k) < I_k2(t, R_k)
    I_k2(t, R_k) if I_k1(t, R_k) > I_k2(t, R_k)
n := 1
28 - I_km = 25.123
I_кmin := I_kmin(n*R_к.кр)
S_к*U_к.кр = 25.123
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R_f := 50
ω_0 := 2*π*f_0 = 18849556
C_1 := 1/(ω_0*sqrt(R_к.кр*R_f)) = 1.7718e-9
C_2 := C_1 = 1.7718e-9
Q_1 := sqrt(R_к.кр/R_f) = 0.598846
Q_2 := Q_1^-1 = 1.66988
L_1e := R_к.кр/ω_0*(Q_1 + Q_2)/(1 + Q_1^2) = 1.58849e-6
L_1 := 10*L_1e = 1.58849e-5
C_3 := 1/(ω_0^2*(L_1 - L_1e)) = 1.96866e-10
L_bl := 200*R_к.кр/ω_0 = 0.000190252
C_bl := 1/(ω_0*R_к.кр) = 2.95869e-9
C_r := 1/(ω_0*0.1) = 5.30516e-7
