I_k0max := 0.869
I_k1max := 1.401
U_bmax := 1.051
E_shtrih := 0.6
E_cm := 0.508
U_k.kr := 25.123
E_k1 := 28
R_k.kr := 17.931
m := 1
# Molchi | Moduli
P_1max := 17.6
P_1mol := P_1max/(1 + m)^2 = 4.4
P_1mod := P_1mol*(1 + m^2/2) = 6.6
P_0max := 24.328
P_0mol := P_0max/(1 + m)^2 = 6.082
P_0mod := P_0mol*(1 + m^2/2) = 9.123
P_pac.max := 6.728
P_pacmol := P_pac.max/(1 + m)^2 = 1.682
P_pacmod := P_pacmol*(1 + m^2/2) = 2.523
U_bmin := E_shtrih - E_cm = 0.092
U_bmax - U_bmin = 0.959
m_pk := (U_bmax - U_bmin)/(U_bmax + U_bmin) = 0.83902
U_bmax + U_bmin = 1.143
U_bmax = 1.051
P_Ωmax := P_0max - P_0mol = 18.246
P_Ωmod := P_0mod - P_0mol = 3.041
P_0Ωmod := 1.1*P_Ωmod/0.5 = 6.6902
R_Ω := E_k/I_k0max  # error: Эта переменная не определена.
f := 3*10^6
F_max := 3*10^3
ω := 2*π*f = 18849556
Ω_max := 2*π*F_max = 18849.6
L_1 := R_k.kr/ω = 9.51269e-7
L_2 := R_Ω/Ω_max  # error: Эта переменная не определена.
L_bl := (L_1 + L_2)/2  # error: Эта переменная не определена.
C_1 := 1/(ω*R_k.kr) = 2.95866e-9
C_2 := 1/Ω_max = 5.30516e-5
C_bl := (C_1 + C_2)/2 = 2.65273e-5
θ_0 := 85 deg = 1.48353
γ_1(θ) := 1/π*(θ - sin(θ)*cos(θ))
S := 3
S_k := 1
θ_1(R_k, E_k) := acos((-S*(E_cm - E_shtrih) + S_k*E_k)/(S*U_bmax + S_k*(I_k1max*R_k)))
n := 0
I_k1(R_k, E_k) :=
    (S*U_bmax*γ_1(θ_0) - (S*U_bmax + S_k*(I_k1max*R_k))*γ_1(θ_1(R_k, E_k))) if 0 < θ_1(R_k, E_k) < π
    I_k1max if θ_1(R_k, E_k) ≤ 0
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