I_k1max := 1.401
E_k1 := 28
E_cm := 0.508
E_shtrih := 0.6
U_bmax := 1.051
U_kkr := 25.123
R_kkr := 17.931
S := 3
S_k := 1
γ_1(θ) := 1/π*(θ - sin(θ)*cos(θ))
U_k(R_k) := I_k1max*R_k
θ_0 := acos((E_shtrih - E_cm)/U_bmax) = 1.48315
θ_1(E_k, R_k) := acos((S*(E_shtrih - E_cm) + S_k*E_k)/(S*U_bmax + S_k*U_k(R_k)))
θ_1(E_k1, R_kkr) = 0.0108654i
θ_1(E_k1, 0) = 2.88368i
I_k1(E_k, R_k) := S*U_bmax*γ_1(θ_0) - (S*U_bmax + S_k*U_k(R_k))*γ_1(θ_1(E_k, R_k))
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θ_1(E_k1, U_kkr) = 0.74172
