β := 30
R_k.kp := 0.9*50*(9.5/21)^2 = 9.20918
R_k := [32, 24.8, 15.4, 9.2, 6.5, 4]
I_k0 := [0.42, 0.45, 0.54, 0.64, 0.70, 0.72]
I_b0 := I_k0/β = [0.014, 0.015, 0.018, 0.0213333, 0.0233333, 0.024]
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P_n := [2.56, 3.06, 4.2, 4.41, 2.25, 1.82]
U_keff := [13.5, 13, 12, 9.5, 5, 4.5]
U_k := U_keff*sqrt(2) = [19.0919, 18.3848, 16.9706, 13.435, 7.07107, 6.36396]
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ξ := [0.73, 0.7, 0.65, 0.51, 0.27, 0.24]
η := [0.23, 0.26, 0.29, 0.26, 0.12, 0.09]
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