E_k := [4, 6, 8, 10, 12, 14, 16, 18, 20]
I_k0 := [0.36, 0.48, 0.54, 0.58, 0.6, 0.6, 0.62, 0.62, 0.62]
i(x) :=
    x*0.6/13 if x < 13
    0.6 otherwise
U_n := [4, 6.3, 8.5, 11, 12.5, 15, 16.5, 17.5, 19]
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u(x) :=
    x*19.5/13 if x < 13
    19.5 otherwise
11^2/50 = 2.42
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m(x) := x*1/11
U_Ω := [0, 1, 2, 3, 4, 5, 6, 7, 8, 9, 10, 11]
U_max := [1.1, 1.2, 1.3, 1.4, 1.5, 1.5, 1.6, 1.7, 1.8, 1.8, 1.9, 2]
U_min := [1.1, 1, 1, 0.9, 0.8, 0.7, 0.6, 0.5, 0.4, 0.3, 0.2, 0]
m_1 := (U_max - U_min)/(U_max + U_min) = [0, 0.0909091, 0.130435, 0.217391, 0.304348, 0.363636, 0.454545, 0.545455, 0.636364, 0.714286, 0.809524, 1]
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