R_n := [1, 0.9, 0.8, 0.7, 0.6, 0.5, 0.4, 0.3, 0.2]
I_k01 := [7, 6.7, 6.5, 6.4, 6.2, 6, 5.5, 5, 5]
U_b1 := [0.13, 0.11, 0.07, 0.05, 0.03, 0.02, 0.01, 0.01, 0]
U_k1 := [1.9, 1.8, 1.7, 1.6, 1.4, 1.2, 0.9, 0.4, 0]
I_k02 := [8, 7.5, 7.5, 7, 6.5, 6, 5.5, 5, 5]
U_b2 := [0.21, 0.19, 0.16, 0.13, 0.1, 0.07, 0.05, 0.02, 0]
U_k2 := [2.6, 2.4, 2.2, 1.9, 1.6, 1.3, 1, 0.6, 0]
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