# Вариант 1
f_c := 1500
ω_c := 2*π*f_c = 9424.78
f_z := 3000
ω_z := 2*π*f_z = 18849.6
j := 1i
f_d := 8000
H_c := -3
T_d := 1/f_d = 0.000125
H_z := -40
F_c := f_d/π*tan(π*f_c/f_d) = 1701.5
Ω_c := 2/T_d*tan(ω_c*T_d/2) = 10690.9
F_z := f_d/π*tan(π*f_z/f_d) = 6147.74
Ω_z := 2/T_d*tan(ω_z*T_d/2) = 38627.4
ФНЧ
s == p/Ω_c
v_c := 1
v_z := F_z/F_c = 3.61313
# Умножение на 10 потому что порядок меньше единицы
# Пускай будет 3 порядок
n := log((10^(0.1*H_z) - 1)/(10^(0.1*H_c) - 1))/(2*log(v_z))*10 = 2.70683
n := 3
H(s) == 1/((1 + s)*(1 + s + s^2))
s == γ*(1 - z^-1)/(1 + z^-1)
γ := f_d/(π*F_c) = 1.49661
H(z) := 1/((1 + γ*(1 - z^-1)/(1 + z^-1))*(1 + γ*(1 - z^-1)/(1 + z^-1) + (γ*(1 - z^-1)/(1 + z^-1))^2))
H(z) == (1 + z^-1)^2/(((1 + z^-1)^2 + γ*(1 - z^-1)*(1 + z^-1))*((1 + z^-1)^2 + γ*(1 - z^-1)*(1 + z^-1) + (γ*(1 - z^-1))^2))
(1 + z^-1)^2 solve → -1
((1 + z^-1)^2 + γ*(1 - z^-1)*(1 + z^-1))*((1 + z^-1)^2 + γ*(1 - z^-1)*(1 + z^-1) + (γ*(1 - z^-1))^2) solve → [0.19891236738; -1.0; 0.261764158277 + 0.547288721231i; 0.261764158277 - 0.547288721231i]
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s(z) := γ*(1 - z^-1)/(1 + z^-1)
H(z) := 1/(1 + s(z))
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