Φ_c1 := π/4
N := 18
H(Φ_1) := 1 - Φ(Φ_1 - Φ_c1)
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n := 0 .. N - 1
# Четная функция
a := (N - 1)/2 = 8.5
h(n) := 1/π*integral(H(Φ_1)*cos(Φ_1*(n - a)), Φ_1 = 0 .. π)
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H(φ) := sum(h(k)*e^(-1i*φ*k), k = 0 .. N - 1)
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# Оконная функция Ганна
w_1(n) := 1/2*(1 - cos(2*π*n/(N - 1)))
h_1(n) := h(n)*w_1(n)
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H_1(φ) := sum(h_1(k)*e^(-1i*φ*k), k = 0 .. N - 1)
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# Оконная функция Хэмминга
w_2(n) := 0.54 - 0.46*cos(2*π*n/(N - 1))
h_2(n) := h(n)*w_2(n)
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H_2(φ) := sum(h_2(k)*e^(-1i*φ*k), k = 0 .. N - 1)
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H(z) := sum(h(k)*z^(-k), k = 0 .. N - 1) → 0.0348034056573/z^5 - 0.0452430752063/z^2 - 0.0534690888802/z^3 - 0.0270693155112/z^4 - 0.0162415893067/z + 0.117631995536/z^6 + 0.196053325894/z^7 + 0.243623839601/z^8 + 0.243623839601/z^9 + 0.196053325894/z^10 + 0.117631995536/z^11 + 0.0348034056573/z^12 - 0.0270693155112/z^13 - 0.0534690888802/z^14 - 0.0452430752063/z^15 - 0.0162415893067/z^16 + 0.0143308140942/z^17 + 0.0143308140942
H_1(z) := sum(h_1(k)*z^(-k), k = 0 .. N - 1) → 0.0221639048571/z^5 - 0.000548379158407/z^16 - 0.000548379158407/z + 0.0221639048571/z^12 + 0.181370611543/z^7 + 0.181370611543/z^10 + 0.0942605551966/z^6 + 0.0942605551966/z^11 - 0.00590401959318/z^2 - 0.00590401959318/z^15 - 0.0122858370886/z^4 - 0.0122858370886/z^13 - 0.0148179325589/z^3 - 0.0148179325589/z^14 + 0.241549760185/z^8 + 0.241549760185/z^9
H_2(z) := sum(h_2(k)*z^(-k), k = 0 .. N - 1) → 0.0231750649211/z^5 - 0.00905114404224/z^2 - 0.0179100250646/z^3 - 0.0134685153624/z^4 - 0.00180383597027/z + 0.0961302704238/z^6 + 0.182545228691/z^7 + 0.241715686539/z^8 + 0.241715686539/z^9 + 0.182545228691/z^10 + 0.0961302704238/z^11 + 0.0231750649211/z^12 - 0.0134685153624/z^13 - 0.0179100250646/z^14 - 0.00905114404224/z^15 - 0.00180383597027/z^16 + 0.00114646512753/z^17 + 0.00114646512753
H(z) solve → [
    -1;
    0.366319999485;
    1.5808091989;
    2.72985368368;
    0.632587412003;
    -0.146247967414 - 0.989247962862i;
    -0.937445751622 - 0.348131387216i;
    0.207435846179 - 0.978248623674i;
    -0.757473107658 - 0.65286636548i;
    -0.146247967414 + 0.989247962862i;
    0.52790671566 - 0.849302360506i;
    -0.757473107658 + 0.65286636548i;
    -0.482294215509 - 0.876009297717i;
    -0.482294215509 + 0.876009297717i;
    0.52790671566 + 0.849302360506i;
    -0.937445751622 + 0.348131387216i;
    0.207435846179 + 0.978248623674i
]
H_1(z) solve → [
    2.08640674696;
    -0.130258738065;
    -1;
    0.479292928599;
    -7.67702815838;
    -0.182617889739 - 0.983183963634i;
    -0.781975385377 - 0.623309310587i;
    0.16444330228 + 0.98638653698i;
    -0.946334779046 - 0.323188004058i;
    -0.946334779046 + 0.323188004058i;
    -0.781975385377 + 0.623309310587i;
    0.16444330228 - 0.98638653698i;
    -0.515876251298 + 0.856663115435i;
    -0.515876251298 - 0.856663115435i;
    -0.182617889739 + 0.983183963634i
]
H_2(z) solve → [
    4.27193910341;
    -1;
    2.01969487386;
    0.495124294736;
    0.234085733853;
    -0.461091137653 + 0.887352783721i;
    -0.116782341779 + 1.12935316941i;
    -0.461091137653 - 0.887352783721i;
    -0.935961833174 - 0.352101472366i;
    -0.0905937886283 + 0.876094628334i;
    0.131560012507 - 0.99130820793i;
    -0.75085826168 - 0.660463375871i;
    -0.75085826168 + 0.660463375871i;
    -0.935961833174 + 0.352101472366i;
    -0.0905937886283 - 0.876094628334i;
    0.131560012507 + 0.99130820793i;
    -0.116782341779 - 1.12935316941i
]
H(Φ_1) := 1 - Φ(Φ_1 - Φ_c1)
n := 0 .. N - 1
h(n) := 1/π*integral(H(Φ_1)*sin(Φ_1*(n - a)), Φ_1 = 0 .. π)
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H(φ) := sum(h(k)*e^(-1i*φ*k), k = 0 .. N - 1)
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# Оконная функция Ганна
w_1(n) := 1/2*(1 - cos(2*π*n/(N - 1)))
h_1(n) := h(n)*w_1(n)
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H_1(φ) := sum(h_1(k)*e^(-1i*φ*k), k = 0 .. N - 1)
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# Оконная функция Хэмминга
w_2(n) := 0.54 - 0.46*cos(2*π*n/(N - 1))
h_2(n) := h(n)*w_2(n)
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H_2(φ) := sum(h_2(k)*e^(-1i*φ*k), k = 0 .. N - 1)
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H(z) := sum(h(k)*z^(-k), k = 0 .. N - 1) → 0.0484597946852/z^9 - 0.0302304563667/z^2 - 0.0800221465426/z^3 - 0.136086638894/z^4 - 0.174968535721/z^5 - 0.176048722394/z^6 - 0.130998644255/z^7 - 0.0484597946852/z^8 - 0.00323065297901/z + 0.130998644255/z^10 + 0.176048722394/z^11 + 0.174968535721/z^12 + 0.136086638894/z^13 + 0.0800221465426/z^14 + 0.0302304563667/z^15 + 0.00323065297901/z^16 + 0.00285057615795/z^17 - 0.00285057615795
H_1(z) := sum(h_1(k)*z^(-k), k = 0 .. N - 1) → 0.00394493977002/z^15 - 0.00394493977002/z^2 - 0.141070890099/z^6 + 0.141070890099/z^11 - 0.0221766032585/z^3 + 0.0221766032585/z^14 - 0.0480472346385/z^8 + 0.0480472346385/z^9 - 0.111425474188/z^5 + 0.111425474188/z^12 - 0.00010907939662/z + 0.00010907939662/z^16 - 0.121187968179/z^7 + 0.121187968179/z^10 - 0.0617650739894/z^4 + 0.0617650739894/z^13
H_2(z) := sum(h_2(k)*z^(-k), k = 0 .. N - 1) → 0.0480802394422/z^9 - 0.00604778109775/z^2 - 0.0268042467212/z^3 - 0.0677107991818/z^4 - 0.11650891911/z^5 - 0.143869116683/z^6 - 0.121972822266/z^7 - 0.0480802394422/z^8 - 0.000358805283212/z + 0.121972822266/z^10 + 0.143869116683/z^11 + 0.11650891911/z^12 + 0.0677107991818/z^13 + 0.0268042467212/z^14 + 0.00604778109775/z^15 + 0.000358805283212/z^16 + 0.000228046092636/z^17 - 0.000228046092636
H(z) solve → [
    1.0;
    -0.240437555154 + 0.970664608437i;
    -0.845335346339 + 0.534236045423i;
    -0.240437555154 - 0.970664608437i;
    -0.587245707772 + 0.809408721663i;
    -0.587245707772 - 0.809408721663i;
    -0.845335346339 - 0.534236045423i;
    0.14524131647 - 0.989396260348i;
    0.860838793642 - 3.13566972454i;
    -0.982474742656 + 0.186395761869i;
    0.860838793642 + 3.13566972454i;
    0.501331585323 - 0.865255246478i;
    0.501331585323 + 0.865255246478i;
    0.0814149898187 - 0.2965601929i;
    0.0814149898187 + 0.2965601929i;
    -0.982474742656 - 0.186395761869i;
    0.14524131647 + 0.989396260348i
]
H_1(z) solve → [
    1.0;
    -0.0333583305656;
    -1.87336450822;
    -0.533798946021;
    -29.9775193496;
    -0.815187542443 + 0.579197091364i;
    0.156904993076 + 0.987613701377i;
    -0.977387928741 - 0.211454100815i;
    -0.977387928741 + 0.211454100815i;
    -0.540025403465 - 0.841648717466i;
    -0.815187542443 - 0.579197091364i;
    -0.198165801449 - 0.980168513642i;
    -0.540025403465 + 0.841648717466i;
    0.156904993076 - 0.987613701377i;
    -0.198165801449 + 0.980168513642i
]
H_2(z) solve → [
    1.0;
    -0.387229089637 + 0.921983531382i;
    -0.387229089637 - 0.921983531382i;
    -0.855807703564 + 0.517294089005i;
    -0.983452404917 - 0.181166683644i;
    -0.983452404917 + 0.181166683644i;
    0.052245226397 + 0.178516220576i;
    0.15974864644 + 0.98715772294i;
    0.052245226397 - 0.178516220576i;
    -0.629831160883 + 0.776732070138i;
    -0.629831160883 - 0.776732070138i;
    -0.152450348782 - 0.988311130746i;
    -0.152450348782 + 0.988311130746i;
    1.51008218242 + 5.15978554513i;
    1.51008218242 - 5.15978554513i;
    -0.855807703564 - 0.517294089005i;
    0.15974864644 - 0.98715772294i
]
