# Полосовой фильтр
# Вариант 6
f_c1 := 275
ω_c1 := 2*π*f_c1 = 1727.88
f_c2 := 325
j := 1i
ω_c2 := 2*π*f_c2 = 2042.04
f_z1 := 125
ω_z1 := 2*π*f_z1 = 785.398
f_z2 := 800
ω_z2 := 2*π*f_z2 = 5026.55
f_d := 4000
H_c := -3
T := 1/f_d = 0.00025
H_z := -20
F_c1 := f_d/π*tan(π*f_c1/f_d) = 279.358
Ω_c1 := 2/T*tan(ω_c1*T/2) = 1755.26
F_c2 := f_d/π*tan(π*f_c2/f_d) = 332.247
Ω_c2 := 2/T*tan(ω_c2*T/2) = 2087.57
F_z1 := f_d/π*tan(π*f_z1/f_d) = 125.403
Ω_z1 := 2/T*tan(ω_z1*T/2) = 787.931
Ω_z2 := 2/T*tan(ω_z2*T/2) = 5812.34
F_z2 := f_d/π*tan(π*f_z2/f_d) = 925.063
s == (p^2 + Ω_0^2)/(ΔΩ*p)
Ω_0 := sqrt(Ω_c1*Ω_c2) = 1914.22
ΔΩ := Ω_c2 - Ω_c1 = 332.317
s(p) := (p^2 + Ω_0^2)/(ΔΩ*p)
v(Ω) := |(Ω_0^2 - Ω^2)/(ΔΩ*Ω)|
v_c1 := v(Ω_c1) = 1
v_c2 := v(Ω_c2) = 1
v_z1 := v(Ω_z1) = 11.6229
v_z2 := v(Ω_z2) = 15.5933
v_c := 1
v_z :=
    v_z1 if v_z1 < v_z2
    v_z2 if v_z2 < v_z1
    = 11.6229
n := log((10^(0.1*H_z) - 1)/(10^(0.1*H_c) - 1))/(2*log(v_z))*10 = 1.39723
n := 2
H(s) == 1/(1 + 1.41*s + s^2)
α := ((Ω_0/(2*f_d))^2 - 1)/((Ω_0/(2*f_d))^2 + 1) = -0.891694
γ := ((Ω_0/(2*f_d))^2 + 1)/(ΔΩ/(2*f_d)) = 25.4517
s(z) := γ*(1 + 2*α*z^-1 + z^-2)/(1 - z^-2)
H(z) == 1/(1 + 1.41*(γ*(1 + 2*α*z^-1 + z^-2)/(1 - z^-2)) + (γ*(1 + 2*α*z^-1 + z^-2)/(1 - z^-2))^2) == (1 - z^-2)^2/((1 - z^-2)^2 + (1.41*γ + 2.82*γ*α*z^-1 + 1.41*γ*z^-2)*(1 - z^-2) + (γ + 2*γ*α*z^-1 + γ*z^-2)^2)
H(z) == (1 - 2*z^-2 + z^-4)/(1 - 2*z^-2 + z^-4 + 1.41*γ + 2.82*γ*α*z^-1 + 1.41*γ*z^-2 - 1.41*γ*z^-2 - 2.82*γ*α*z^-3 - 1.41*γ*z^-4 + γ^2 + 2*γ^2*α*z^-1 + γ^2*z^-2 + 2*γ^2*α*z^-1 + 4*γ^2*α^2*z^-2 + 2*γ^2*α*z^-3 + γ^2*z^-2 + 2*γ^2*α*z^-3 + γ^2*z^-4) → H(z) == (1/z^4 - 2/z^2 + 1)/(3353.8532715/z^2 - 2374.51852749/z - 2246.5180084/z^3 + 612.902115071/z^4 + 684.675907885)
H(z) == (1 - 2*z^-2 + z^-4)/(1 + 1.41*γ + γ^2 + (2.82*γ*α + 2*γ^2*α + 2*γ^2*α)*z^-1 + (-2 + 1.41*γ - 1.41*γ + γ^2 + 4*γ^2*α^2 + γ^2)*z^-2 + (-2.82*γ*α + 2*γ^2*α + 2*γ^2*α)*z^-3 + (1 - 1.41*γ + γ^2)*z^-4)
1 + 1.41*γ + γ^2 = 684.676
(2.82*γ*α + 2*γ^2*α + 2*γ^2*α) = -2374.52
(-2 + 1.41*γ - 1.41*γ + γ^2 + 4*γ^2*α^2 + γ^2) = 3353.85
(-2.82*γ*α + 2*γ^2*α + 2*γ^2*α) = -2246.52
(1 - 1.41*γ + γ^2) = 612.902
H(z) == (1 - 2*z^-2 + z^-4)/(684.676 - 2.375*10^3*z^-1 + 3.354*10^3*z^-2 - 2.247*10^3*z^-3 + 612.902*z^-4)
H(z) == (1/z^4 - 2/z^2 + 1)/(3353.8532715/z^2 - 2374.51852749/z - 2246.5180084/z^3 + 612.902115071/z^4 + 684.675907885)
1 - 2*z^-2 + z^-4 solve → [1; -1]  # нули
684.676 - 2.375*10^3*z^-1 + 3.354*10^3*z^-2 - 2.247*10^3*z^-3 + 612.902*z^-4 solve → [
    0.888034844742 - 0.398483802891i;
    0.888034844742 + 0.398483802891i;
    0.846362154714 - 0.478065828815i;
    0.846362154714 + 0.478065828815i
]  # полюсы
γ*(1 + 2*α*e^(-j*(2*π*f/f_d)) + e^(-j*2*(2*π*f/f_d)))/(1 - e^(-j*2*(2*π*f/f_d)))
φ(f) := 2*π*f/f_d
H_1(f) := 1/(1 + 1.41*(γ*(1 + 2*α*e^(-j*(2*π*f/f_d)) + e^(-j*2*(2*π*f/f_d)))/(1 - e^(-j*2*(2*π*f/f_d)))) + (γ*(1 + 2*α*e^(-j*(2*π*f/f_d)) + e^(-j*2*(2*π*f/f_d)))/(1 - e^(-j*2*(2*π*f/f_d))))^2)
H(f) := (1 - 2*e^(-j*2*φ(f)) + e^(-j*4*φ(f)))/(684.676 - 2.375*10^3*e^(-j*1*φ(f)) + 3.354*10^3*e^(-j*2*φ(f)) - 2.247*10^3*e^(-j*3*φ(f)) + 612.902*e^(-j*4*φ(f)))
# АЧХ
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# ФЧХ
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H(z) == (1 - 2*z^-2 + z^-4)/(684.676 - 2.375*10^3*z^-1 + 3.354*10^3*z^-2 - 2.247*10^3*z^-3 + 612.902*z^-4)
