n := [0, 1, 2, 3, 4]
x_n := [-3, -2, 1, -2, 1.5]
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j := sqrt(-1)
X(φ) := (-3 - 2*cos(φ) + cos(2*φ) - 2*cos(3*φ) + 1.5*cos(4*φ)) + j*(2*sin(φ) + sin(2*φ) - 2*sin(3*φ) + 1.5*sin(4*φ))
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n := [0, 1, 2, 3, 4, 5, 6, 7, 8, 9, 10, 11, 12, 13, 14, 15, 16, 17, 18, 19, 20, 21, 22, 23, 24, 25, 26, 27, 28]
x_n := [-3, -2, 1, -2, 1.5, 0, -3, -2, 1, -2, 1.5, 0, -3, -2, 1, -2, 1.5, 0, -3, -2, 1, -2, 1.5, 0, -3, -2, 1, -2, 1.5]
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X_мп(φ) := (cos(12*φ) - j*sin(12*φ))*(1 + 2*cos(6*φ) + 2*cos(12*φ))
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N := 5
j := sqrt(-1)
A(k, n) := e^(-j*2*π/N*k*n)
A_kn5 := [
    A(0, 0), A(1, 0), A(2, 0), A(3, 0), A(4, 0);
    A(0, 1), A(1, 1), A(2, 1), A(3, 1), A(4, 1);
    A(0, 2), A(1, 2), A(2, 2), A(3, 2), A(4, 2);
    A(0, 3), A(1, 3), A(2, 3), A(3, 3), A(4, 3);
    A(0, 4), A(1, 4), A(2, 4), A(3, 4), A(4, 4)
] = [
    1, 1, 1, 1, 1;
    1, 0.309017 - 0.951057i, -0.809017 - 0.587785i, -0.809017 + 0.587785i, 0.309017 + 0.951057i;
    1, -0.809017 - 0.587785i, 0.309017 + 0.951057i, 0.309017 - 0.951057i, -0.809017 + 0.587785i;
    1, -0.809017 + 0.587785i, 0.309017 - 0.951057i, 0.309017 + 0.951057i, -0.809017 - 0.587785i;
    1, 0.309017 + 0.951057i, -0.809017 + 0.587785i, -0.809017 - 0.587785i, 0.309017 - 0.951057i
]
x_n := [-3; -2; 1; -2; 1.5]
|-4.5| = 4.5
|-2.345 + 1.565i| = 2.81926
|-2.905 + 4.91i| = 5.70501
|-2.905 - 4.91i| = 5.70501
|-2.345 - 1.565i| = 2.81926
A_kn := [
    A(0, 0), A(1, 0), A(2, 0), A(3, 0), A(4, 0);
    A(0, 1), A(1, 1), A(2, 1), A(3, 1), A(4, 1);
    A(0, 2), A(1, 2), A(2, 2), A(3, 2), A(4, 2);
    A(0, 3), A(1, 3), A(2, 3), A(3, 3), A(4, 3);
    A(0, 4), A(1, 4), A(2, 4), A(3, 4), A(4, 4)
] = [
    1, 1, 1, 1, 1;
    1, 0.309017 - 0.951057i, -0.809017 - 0.587785i, -0.809017 + 0.587785i, 0.309017 + 0.951057i;
    1, -0.809017 - 0.587785i, 0.309017 + 0.951057i, 0.309017 - 0.951057i, -0.809017 + 0.587785i;
    1, -0.809017 + 0.587785i, 0.309017 - 0.951057i, 0.309017 + 0.951057i, -0.809017 - 0.587785i;
    1, 0.309017 + 0.951057i, -0.809017 + 0.587785i, -0.809017 - 0.587785i, 0.309017 - 0.951057i
]
X(φ) := -3 - 2*e^(-j*φ) + e^(-j*2*φ) - 2*e^(-j*3*φ) + 1.5*e^(-j*4*φ)
A_kn = [
    1, 1, 1, 1, 1;
    1, 0.309017 - 0.951057i, -0.809017 - 0.587785i, -0.809017 + 0.587785i, 0.309017 + 0.951057i;
    1, -0.809017 - 0.587785i, 0.309017 + 0.951057i, 0.309017 - 0.951057i, -0.809017 + 0.587785i;
    1, -0.809017 + 0.587785i, 0.309017 - 0.951057i, 0.309017 + 0.951057i, -0.809017 - 0.587785i;
    1, 0.309017 + 0.951057i, -0.809017 + 0.587785i, -0.809017 - 0.587785i, 0.309017 - 0.951057i
]
A_kn*x_n = [-4.5; -2.34549 + 1.56534i; -2.90451 + 4.91042i; -2.90451 - 4.91042i; -2.34549 - 1.56534i]
X_1 := transpose([4.5, 2.819, 5.705, 5.705, 2.819])
φ_1 := transpose([0*2*π/5, 1*2*π/5, 2*2*π/5, 3*2*π/5, 4*2*π/5])
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N := 10
A(k, n) := e^(-j*2*π/N*k*n)
A_kn10 := [
    A(0, 0), A(01, 0), A(02, 0), A(03, 0), A(04, 0), A(05, 0), A(06, 0), A(07, 0), A(08, 0), A(09, 0);
    A(0, 1), A(01, 1), A(02, 1), A(03, 1), A(04, 1), A(05, 1), A(06, 1), A(07, 1), A(08, 01), A(09, 01);
    A(0, 2), A(01, 2), A(02, 2), A(03, 2), A(04, 2), A(05, 2), A(06, 2), A(07, 2), A(08, 02), A(09, 02);
    A(0, 3), A(01, 3), A(02, 3), A(03, 3), A(04, 3), A(05, 3), A(06, 3), A(07, 3), A(08, 03), A(09, 03);
    A(0, 4), A(01, 4), A(02, 4), A(03, 4), A(04, 4), A(05, 4), A(06, 4), A(07, 4), A(08, 04), A(09, 04);
    A(0, 5), A(01, 5), A(02, 5), A(03, 5), A(04, 5), A(05, 5), A(06, 5), A(07, 5), A(08, 05), A(09, 05);
    A(0, 6), A(01, 6), A(02, 6), A(03, 6), A(04, 6), A(05, 6), A(06, 6), A(07, 6), A(08, 06), A(09, 06);
    A(0, 7), A(01, 7), A(02, 7), A(03, 7), A(04, 7), A(05, 7), A(06, 7), A(07, 7), A(08, 07), A(09, 07);
    A(0, 8), A(01, 8), A(02, 8), A(03, 8), A(04, 8), A(05, 8), A(06, 8), A(07, 8), A(08, 08), A(09, 08);
    A(0, 9), A(01, 9), A(02, 9), A(03, 9), A(04, 9), A(05, 9), A(06, 9), A(07, 9), A(08, 09), A(09, 09)
]
A_kn10 = [
    1, 1, 1, 1, 1, 1, 1, 1, 1, 1;
    1, 0.809017 - 0.587785i, 0.309017 - 0.951057i, -0.309017 - 0.951057i, -0.809017 - 0.587785i, -1, -0.809017 + 0.587785i, -0.309017 + 0.951057i, 0.309017 + 0.951057i, 0.809017 + 0.587785i;
    1, 0.309017 - 0.951057i, -0.809017 - 0.587785i, -0.809017 + 0.587785i, 0.309017 + 0.951057i, 1, 0.309017 - 0.951057i, -0.809017 - 0.587785i, -0.809017 + 0.587785i, 0.309017 + 0.951057i;
    1, -0.309017 - 0.951057i, -0.809017 + 0.587785i, 0.809017 + 0.587785i, 0.309017 - 0.951057i, -1, 0.309017 + 0.951057i, 0.809017 - 0.587785i, -0.809017 - 0.587785i, -0.309017 + 0.951057i;
    1, -0.809017 - 0.587785i, 0.309017 + 0.951057i, 0.309017 - 0.951057i, -0.809017 + 0.587785i, 1, -0.809017 - 0.587785i, 0.309017 + 0.951057i, 0.309017 - 0.951057i, -0.809017 + 0.587785i;
    1, -1, 1, -1, 1, -1, 1, -1, 1, -1;
    1, -0.809017 + 0.587785i, 0.309017 - 0.951057i, 0.309017 + 0.951057i, -0.809017 - 0.587785i, 1, -0.809017 + 0.587785i, 0.309017 - 0.951057i, 0.309017 + 0.951057i, -0.809017 - 0.587785i;
    1, -0.309017 + 0.951057i, -0.809017 - 0.587785i, 0.809017 - 0.587785i, 0.309017 + 0.951057i, -1, 0.309017 - 0.951057i, 0.809017 + 0.587785i, -0.809017 + 0.587785i, -0.309017 - 0.951057i;
    1, 0.309017 + 0.951057i, -0.809017 + 0.587785i, -0.809017 - 0.587785i, 0.309017 - 0.951057i, 1, 0.309017 + 0.951057i, -0.809017 + 0.587785i, -0.809017 - 0.587785i, 0.309017 - 0.951057i;
    1, 0.809017 + 0.587785i, 0.309017 + 0.951057i, -0.309017 + 0.951057i, -0.809017 + 0.587785i, -1, -0.809017 - 0.587785i, -0.309017 - 0.951057i, 0.309017 - 0.951057i, 0.809017 - 0.587785i
]
|[-4.5]| = 4.5
|[-4.905 + 1.245i]| = 5.06054
|[-2.345 + 1.565i]| = 2.81926
|[-4.345 - 0.112i]| = 4.34644
x_n := [-3; -2; 1; -2; 1.5; 0; 0; 0; 0; 0]
A_kn10*x_n = [-4.5; -4.90451 + 1.24495i; -2.34549 + 1.56534i; -4.34549 - 0.112257i; -2.90451 + 4.91042i; 3.5; -2.90451 - 4.91042i; -4.34549 + 0.112257i; -2.34549 - 1.56534i; -4.90451 - 1.24495i]
|[-2.905 + 4.91i]| = 5.70501
|[3.5]| = 3.5
|[-2.905 - 4.91i]| = 5.70501
|[-4.345 + 0.112i]| = 4.34644
|[-2.345 - 1.565i]| = 2.81926
|[-4.905 - 1.245i]| = 5.06054
X_2 := transpose([4.5, 5.061, 2.819, 4.346, 5.705, 3.5, 5.705, 4.346, 2.819, 5.061])
φ_2 := transpose([0*2*π/10, 1*2*π/10, 2*2*π/10, 3*2*π/10, 4*2*π/10, 5*2*π/10, 6*2*π/10, 7*2*π/10, 8*2*π/10, 9*2*π/10])
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