a_0 := 1
a_1 := -2.5
a_2 := 4
j := 1i
b_0 := 1
b_1 := 2
b_2 := -2
H(z) := (a_0 + a_1*z^-1 + a_2*z^-2)/(b_0 + b_1*z^-1 + b_2*z^-2)
H(φ) := (a_0 + a_1*e^(-j*φ) + a_2*e^(-j*2*φ))/(b_0 + b_1*e^(-j*φ) + b_2*e^(-j*2*φ))  # e^(-j*φ)
cos(φ) - j*sin(φ)
H_1(φ) := (a_0 + a_1*(cos(φ) - j*sin(φ)) + a_2*(cos(2*φ) - j*sin(2*φ)))/(b_0 + b_1*(cos(φ) - j*sin(φ)) + b_2*(cos(2*φ) - j*sin(2*φ)))
H_2(φ) := sqrt((a_0 + a_1*cos(φ) + a_2*cos(2*φ))^2 + (a_1*sin(φ) + a_2*sin(2*φ))^2)/sqrt((b_0 + b_1*cos(φ) + b_2*cos(2*φ))^2 + (b_1*sin(φ) + b_2*sin(2*φ))^2)
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Φ_1(φ) := atan(Im(H(φ))/Re(H(φ)))
a_0 = 1
a_1 = -2.5
a_2 = 4
b_0 = 1
b_1 = 2
b_2 = -2
((a_0 + a_1*cos(φ) + a_2*cos(2*φ)) + j*(a_1*sin(φ) + a_2*sin(2*φ)))/((b_0 + b_1*cos(φ) + b_2*cos(2*φ)) + j(b_1*sin(φ) + b_2*sin(2*φ)))*((b_0 + b_1*cos(φ) + b_2*cos(2*φ)) - j(b_1*sin(φ) + b_2*sin(2*φ)))/((b_0 + b_1*cos(φ) + b_2*cos(2*φ)) - j(b_1*sin(φ) + b_2*sin(2*φ)))
((a_0 + a_1*cos(φ) + a_2*cos(2*φ))*(b_0 + b_1*cos(φ) + b_2*cos(2*φ)) + j*(a_1*sin(φ) + a_2*sin(2*φ))*(b_0 + b_1*cos(φ) + b_2*cos(2*φ)))/((b_0 + b_1*cos(φ) + b_2*cos(2*φ))^2 + (b_1*sin(φ) + b_2*sin(2*φ))^2) + ((a_0 + a_1*cos(φ) + a_2*cos(2*φ))*(-j(b_1*sin(φ) + b_2*sin(2*φ))) + (a_1*sin(φ) + a_2*sin(2*φ))*(b_1*sin(φ) + b_2*sin(2*φ)))/((b_0 + b_1*cos(φ) + b_2*cos(2*φ))^2 + (b_1*sin(φ) + b_2*sin(2*φ))^2)
((a_0 + a_1*cos(φ) + a_2*cos(2*φ))*(b_0 + b_1*cos(φ) + b_2*cos(2*φ)) + (a_1*sin(φ) + a_2*sin(2*φ))*(b_1*sin(φ) + b_2*sin(2*φ)))/((b_0 + b_1*cos(φ) + b_2*cos(2*φ))^2 + (b_1*sin(φ) + b_2*sin(2*φ))^2) + j*(-((a_1*sin(φ) + a_2*sin(2*φ))*(b_0 + b_1*cos(φ) + b_2*cos(2*φ))) + (a_0 + a_1*cos(φ) + a_2*cos(2*φ))*(b_1*sin(φ) + b_2*sin(2*φ)))/((b_0 + b_1*cos(φ) + b_2*cos(2*φ))^2 + (b_1*sin(φ) + b_2*sin(2*φ))^2)
Re(H(φ)) == ((a_0 + a_1*cos(φ) + a_2*cos(2*φ))*(b_0 + b_1*cos(φ) + b_2*cos(2*φ)) + (a_1*sin(φ) + a_2*sin(2*φ))*(b_1*sin(φ) + b_2*sin(2*φ)))/((b_0 + b_1*cos(φ) + b_2*cos(2*φ))^2 + (b_1*sin(φ) + b_2*sin(2*φ))^2)
Im(H(φ)) == j*((a_0 + a_1*cos(φ) + a_2*cos(2*φ))*(b_1*sin(φ) + b_2*sin(2*φ)) - (a_1*sin(φ) + a_2*sin(2*φ))*(b_0 + b_1*cos(φ) + b_2*cos(2*φ)))/((b_0 + b_1*cos(φ) + b_2*cos(2*φ))^2 + (b_1*sin(φ) + b_2*sin(2*φ))^2)
Im(H(φ))/Re(H(φ)) == ((a_0 + a_1*cos(φ) + a_2*cos(2*φ))*(b_1*sin(φ) + b_2*sin(2*φ)) - (a_1*sin(φ) + a_2*sin(2*φ))*(b_0 + b_1*cos(φ) + b_2*cos(2*φ)))/((a_0 + a_1*cos(φ) + a_2*cos(2*φ))*(b_0 + b_1*cos(φ) + b_2*cos(2*φ)) + (a_1*sin(φ) + a_2*sin(2*φ))*(b_1*sin(φ) + b_2*sin(2*φ)))
Φ_2(φ) := atan(((a_0 + a_1*cos(φ) + a_2*cos(2*φ))*(b_1*sin(φ) + b_2*sin(2*φ)) - (a_1*sin(φ) + a_2*sin(2*φ))*(b_0 + b_1*cos(φ) + b_2*cos(2*φ)))/((a_0 + a_1*cos(φ) + a_2*cos(2*φ))*(b_0 + b_1*cos(φ) + b_2*cos(2*φ)) + (a_1*sin(φ) + a_2*sin(2*φ))*(b_1*sin(φ) + b_2*sin(2*φ))))
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v_0 := 1
v_1 := -1
v_2 := 5
v_3 := -11
v_4 := 33
v_5 := -87
y_0 := v_0 - 2.5*0 + 4*0 = 1
y_1 := v_1 - 2.5*v_0 + 4*0 = -3.5
y_2 := v_2 - 2.5*v_1 + 4*v_0 = 11.5
y_3 := v_3 - 2.5*v_2 + 4*v_1 = -27.5
y_4 := v_4 - 2.5*v_3 + 4*v_2 = 80.5
y_5 := v_5 - 2.5*v_4 + 4*v_3 = -213.5
