j := 1i
N := 6
H_n(z) := sum(z^(-i), i = 0 .. N - 1) → 1/z + 1/z^2 + 1/z^3 + 1/z^4 + 1/z^5 + 1
H_n1(φ) := sum(e^(-j*i*φ), i = 0 .. N - 1) → e^(-φ*1i) + e^(-2i*φ) + e^(-3i*φ) + e^(-4i*φ) + e^(-5i*φ) + 1
H_p(z) := (1 - z^(-N))/(1 - z^-1)
H_p1(φ) := (1 - e^(-j*N*φ))/(1 - e^(-j*φ))
H(φ) := (cos(2.5*φ) - j*sin(2.5*φ))*(2*cos(0.5*φ) + 2*cos(1.5*φ) + 2*cos(2.5*φ))
H_n2(φ) := (e^(-φ*1i) + e^(-2i*φ) + e^(-3i*φ) + e^(-4i*φ) + e^(-5i*φ) + 1)^3
H_1(φ) := sqrt((cos(2.5*φ)*(2*cos(0.5*φ) + 2*cos(1.5*φ) + 2*cos(2.5*φ)))^2 + (sin(2.5*φ)*(2*cos(0.5*φ) + 2*cos(1.5*φ) + 2*cos(2.5*φ)))^2)
H_3(φ) := 6*cos(0.5*φ) + 6*cos(1.5*φ) + 4*cos(2.5*φ) + 2*cos(3.5*φ)
Φ_1(φ) := atan(-sin(2.5*φ)/cos(2.5*φ))
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H_2(φ) := e^(-1i*9*φ)*(2*1i*sin(9*φ) - 2*1i*sin(3*φ))/(e^(-1i*1.5*φ)*(2*1i*sin(1.5*φ) - 2*1i*sin(0.5*φ)))
H_2(φ) := e^(-1i*9*φ)*(e^(1i*9*φ) - 3*e^(1i*3*φ) + 3*e^(-1i*3*φ) - e^(-1i*9*φ))/(e^(-1i*1.5*φ)*(e^(1i*1.5*φ) - 3*e^(1i*0.5*φ) + 3*e^(-1i*0.5*φ) - e^(-1i*1.5*φ)))
H_2(φ) := (2*1i*sin(9*φ) - 3*e^(1i*3*φ) + 3*e^(-1i*3*φ))/(2*1i*sin(1.5*φ) - 3*e^(1i*0.5*φ) + 3*e^(-1i*0.5*φ))*e^(-1i*6*φ)
H_2(φ) := (2*1i*sin(9*φ) - 6*1i*sin(3*φ))/(2*1i*sin(1.5*φ) - 6*1i*sin(0.5*φ))*e^(-1i*6*φ)
H_2(φ) := (sin(9*φ) - 3*sin(3*φ))/(sin(1.5*φ) - 3*sin(0.5*φ))
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