a := 21.2
b := 26.4
λ := 3
DOR(θ) := 4*π*(a*b/λ)^2*cos(θ)^2*|sin(2*π/λ*a*sin(θ))/(2*π/λ*a*sin(θ))|^2*10^-4
DOR(0) = 43.7368
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θ := 0, 10^-3 .. 2*π
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r := 12
2*π/λ*r*h^2
h := 44.6
DOR_1(θ) := sin(θ)*|sin(2*π/λ*h*sin(θ))/(2*π/λ*h*sin(θ))|^2
r_sh := 12.9
DOR_2(θ) := π*r_sh^2
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