ЛЧМ - сигнал
λ := 3*10^-2  # м
τ_и := 30*10^-6  # c
m := 22
Δα := 0.8 deg = 0.0139626
Δβ := 36 deg = 0.628319
ε_α := 100
η := 3  # дБ
R_max := 80*10^3  # м
V_min := 800*10^3/60^2 = 222.222  # м/с
V_max := 1200*10^3/60^2 = 333.333  # м/с
σ_ц := 24  # м^2
T_ш := 320  # K
ΔR := 15  # м
D := 0.9
F := 10^-3
c := 3*10^8
k_b := 1.38*10^-23
# 1. Определение параметров зондирующего сигнала и изображение сечения НДАФ
f_0 := c/λ = 10000000000  # Гц  # - Центральная частота
Δf_с := c/(2*ΔR) = 10000000  # Гц  # - Ширина спектра ЛЧМ сигнала
B := Δf_с*τ_и = 300  # - База ЛЧМ сигнала
k := Δf_с/τ_и = 3.33333e11  # Гц/с  # - Скорость изменения частоты внутри импульса
T_п := 2*R_max/c*1.2 = 0.00064  # с  # - Период повторения ЛЧМ сигналов
ΔV_R := λ/(2*τ_и) = 500  # м/с  # - Разрешающая способность по скорости
ρ_τ1(τ) := |sin(π*Δf_с*τ)/(π*Δf_с*τ)|
ρ_τ(τ)
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τ, мкс
m*T_п = 0.01408
ρ_τ(τ) := sum((1 - |i|/m)*|sin(π*k*(τ - i*T_п)*(τ_и - |τ - i*T_п|))/(π*k*(τ - i*T_п)*τ_и)|, i = -m .. m)
Num := 20
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ρ_F(F) := |sin(π*F*τ_и)/(π*F*τ_и)|
ρ_F(F)
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F, кГц
τ_и = 3e-5
V_max = 333.333  # м/с
R_min := c*τ_и/2 = 4500
V_min = 222.222  # м/с
R_max = 80000
ΔV_R = 500
ΔR = 15
m_R := (R_max - R_min)/ΔR = 5033.33
m_V := V_max/ΔV_R = 0.666667
m_φ := ε_α*deg/Δα = 125
m_R := 5033
m_V := 1
m_φ := 125
m_Σ := m_R*m_V*m_φ = 629125
F_1 := F/m_Σ = 1.58951e-9
L := 10^(η/10) = 1.99526
q_Σ := ln(F_1)/ln(D) - 1 = 191.291
K_0 := 1.5*sqrt(m) = 7.03562
q_ΣдБ := 10*log(q_Σ) = 22.8169
β_mдБ := 10*log(m) = 13.4242
q_1дБ := q_ΣдБ - β_mдБ = 9.39271
Φ(x) := 1/sqrt(2*π)*integral(e^(-y^2/2), y = 0 .. x)
Given
F == 0.5 - Φ((K_0 - m*P_w)/sqrt(m*P_w*(1 - P_w)))
Find(P_w) → 0.112013875313
p_ш := 0.112013875313
X_0 := sqrt(2*ln(1/p_ш)) = 2.09243
Э := 47.076^2/2 = 1108.07
β_ЦОдБ := 2.5
β_НКГдБ := 1
F_д := 2*V_max/λ = 22222.2
τ_ид := F_д/k = 6.66667e-8
β_ддБ := -10*log(1 - τ_ид/τ_и) = 0.00966173
q_вхдБ := q_ΣдБ - β_mдБ + β_НКГдБ + β_ЦОдБ + β_ддБ = 12.9024
q := sqrt(2*10^(q_вхдБ/10)) = 6.24645
10^(q_вхдБ/10) = 19.5091
P_ПРД := (4*π)^3*R_max^4*L*(Δα*Δβ)^2*k_b*T_ш*q/(0.5^2*λ^2*σ_ц*T_п) = 99626.1
Q := T_п/τ_и = 21.3333
P_имп := P_ПРД*Q = 2125356
f_adc := 2*Δf_с = 20000000
t_adc := 1/f_adc = 5e-8
τ_и/t_adc = 600
