x_1 := 4.7
y_1 := 5.09
z_1 := 0.774
x_0 := 0
x_2 := 1.579
y_2 := 0.858
z_2 := 0.78
y_0 := 0
x_3 := 9
y_3 := 3.476
z_3 := 1.557
z_0 := 0
N := 1
R_1 :=
    3.190 if N == 1
    5.45 if N == 2
QA_1 := transpose([x_1, y_1, z_1])
R_2 :=
    2.423 if N == 1
    9.99 if N == 2
QA_2 := transpose([x_2, y_2, z_2])
R_3 :=
    6.232 if N == 1
    2.473 if N == 2
QA_3 := transpose([x_3, y_3, z_3])
Q_0 := transpose([x_0, y_0, z_0])
R := transpose([R_1, R_2, R_3])
R_11(x, y, z) := sqrt((x_1 - x)^2 + (y_1 - y)^2 + (z_1 - z)^2)
R_22(x, y, z) := sqrt((x_2 - x)^2 + (y_2 - y)^2 + (z_2 - z)^2)
R_33(x, y, z) := sqrt((x_3 - x)^2 + (y_3 - y)^2 + (z_3 - z)^2)
f(x, y, z) := [R_11(x, y, z); R_22(x, y, z); R_33(x, y, z)]
H(x, y, z) := [
    d/dx(R_11(x, y, z)), d/dy(R_11(x, y, z)), d/dz(R_11(x, y, z));
    d/dx(R_22(x, y, z)), d/dy(R_22(x, y, z)), d/dz(R_22(x, y, z));
    d/dx(R_33(x, y, z)), d/dy(R_33(x, y, z)), d/dz(R_33(x, y, z))
]
Q_0 = [0; 0; 0]
Q_1 := Q_0 + (transpose(H(Q_0[0], Q_0[1], Q_0[2]))*H(Q_0[0], Q_0[1], Q_0[2]))^-1*transpose(H(Q_0[0], Q_0[1], Q_0[2]))*(R - f(Q_0[0], Q_0[1], Q_0[2])) = [5.5178; 2.35291; -14.9235]
Q_2 := Q_1 + (transpose(H(Q_1[0], Q_1[1], Q_1[2]))*H(Q_1[0], Q_1[1], Q_1[2]))^-1*transpose(H(Q_1[0], Q_1[1], Q_1[2]))*(R - f(Q_1[0], Q_1[1], Q_1[2])) = [-2.08516; 2.94944; -2.44864]
Q_3 := Q_2 + (transpose(H(Q_2[0], Q_2[1], Q_2[2]))*H(Q_2[0], Q_2[1], Q_2[2]))^-1*transpose(H(Q_2[0], Q_2[1], Q_2[2]))*(R - f(Q_2[0], Q_2[1], Q_2[2])) = [5.31374; 2.38757; -6.4547]
Q_4 := Q_3 + (transpose(H(Q_3[0], Q_3[1], Q_3[2]))*H(Q_3[0], Q_3[1], Q_3[2]))^-1*transpose(H(Q_3[0], Q_3[1], Q_3[2]))*(R - f(Q_3[0], Q_3[1], Q_3[2])) = [1.59631; 1.98875; -1.74651]
Q_5 := Q_4 + (transpose(H(Q_4[0], Q_4[1], Q_4[2]))*H(Q_4[0], Q_4[1], Q_4[2]))^-1*transpose(H(Q_4[0], Q_4[1], Q_4[2]))*(R - f(Q_4[0], Q_4[1], Q_4[2])) = [3.38259; 2.68258; -1.0457]
Q_6 := Q_5 + (transpose(H(Q_5[0], Q_5[1], Q_5[2]))*H(Q_5[0], Q_5[1], Q_5[2]))^-1*transpose(H(Q_5[0], Q_5[1], Q_5[2]))*(R - f(Q_5[0], Q_5[1], Q_5[2])) = [3.09422; 2.43619; -0.324933]
Q_7 := Q_6 + (transpose(H(Q_6[0], Q_6[1], Q_6[2]))*H(Q_6[0], Q_6[1], Q_6[2]))^-1*transpose(H(Q_6[0], Q_6[1], Q_6[2]))*(R - f(Q_6[0], Q_6[1], Q_6[2])) = [3.0914; 2.50058; -0.174691]
Q_8 := Q_7 + (transpose(H(Q_7[0], Q_7[1], Q_7[2]))*H(Q_7[0], Q_7[1], Q_7[2]))^-1*transpose(H(Q_7[0], Q_7[1], Q_7[2]))*(R - f(Q_7[0], Q_7[1], Q_7[2])) = [3.09013; 2.50043; -0.163368]
Q_9 := Q_8 + (transpose(H(Q_8[0], Q_8[1], Q_8[2]))*H(Q_8[0], Q_8[1], Q_8[2]))^-1*transpose(H(Q_8[0], Q_8[1], Q_8[2]))*(R - f(Q_8[0], Q_8[1], Q_8[2])) = [3.09013; 2.50043; -0.163312]
Q_10 := Q_9 + (transpose(H(Q_9[0], Q_9[1], Q_9[2]))*H(Q_9[0], Q_9[1], Q_9[2]))^-1*transpose(H(Q_9[0], Q_9[1], Q_9[2]))*(R - f(Q_9[0], Q_9[1], Q_9[2])) = [3.09013; 2.50043; -0.163312]
Q_11 := Q_10 + (transpose(H(Q_10[0], Q_10[1], Q_10[2]))*H(Q_10[0], Q_10[1], Q_10[2]))^-1*transpose(H(Q_10[0], Q_10[1], Q_10[2]))*(R - f(Q_10[0], Q_10[1], Q_10[2])) = [3.09013; 2.50043; -0.163312]
Q_12 := Q_11 + (transpose(H(Q_11[0], Q_11[1], Q_11[2]))*H(Q_11[0], Q_11[1], Q_11[2]))^-1*transpose(H(Q_11[0], Q_11[1], Q_11[2]))*(R - f(Q_11[0], Q_11[1], Q_11[2])) = [3.09013; 2.50043; -0.163312]
Q_13 := Q_12 + (transpose(H(Q_12[0], Q_12[1], Q_12[2]))*H(Q_12[0], Q_12[1], Q_12[2]))^-1*transpose(H(Q_12[0], Q_12[1], Q_12[2]))*(R - f(Q_12[0], Q_12[1], Q_12[2])) = [3.09013; 2.50043; -0.163312]
Q_14 := Q_13 + (transpose(H(Q_13[0], Q_13[1], Q_13[2]))*H(Q_13[0], Q_13[1], Q_13[2]))^-1*transpose(H(Q_13[0], Q_13[1], Q_13[2]))*(R - f(Q_13[0], Q_13[1], Q_13[2])) = [3.09013; 2.50043; -0.163312]
Q_15 := Q_14 + (transpose(H(Q_14[0], Q_14[1], Q_14[2]))*H(Q_14[0], Q_14[1], Q_14[2]))^-1*transpose(H(Q_14[0], Q_14[1], Q_14[2]))*(R - f(Q_14[0], Q_14[1], Q_14[2])) = [3.09013; 2.50043; -0.163312]
Q_16 := Q_15 + (transpose(H(Q_15[0], Q_15[1], Q_15[2]))*H(Q_15[0], Q_15[1], Q_15[2]))^-1*transpose(H(Q_15[0], Q_15[1], Q_15[2]))*(R - f(Q_15[0], Q_15[1], Q_15[2])) = [3.09013; 2.50043; -0.163312]
Q_17 := Q_16 + (transpose(H(Q_16[0], Q_16[1], Q_16[2]))*H(Q_16[0], Q_16[1], Q_16[2]))^-1*transpose(H(Q_16[0], Q_16[1], Q_16[2]))*(R - f(Q_16[0], Q_16[1], Q_16[2])) = [3.09013; 2.50043; -0.163312]
Q_18 := Q_17 + (transpose(H(Q_17[0], Q_17[1], Q_17[2]))*H(Q_17[0], Q_17[1], Q_17[2]))^-1*transpose(H(Q_17[0], Q_17[1], Q_17[2]))*(R - f(Q_17[0], Q_17[1], Q_17[2])) = [3.09013; 2.50043; -0.163312]
Q_19 := Q_18 + (transpose(H(Q_18[0], Q_18[1], Q_18[2]))*H(Q_18[0], Q_18[1], Q_18[2]))^-1*transpose(H(Q_18[0], Q_18[1], Q_18[2]))*(R - f(Q_18[0], Q_18[1], Q_18[2])) = [3.09013; 2.50043; -0.163312]
Q_20 := Q_19 + (transpose(H(Q_19[0], Q_19[1], Q_19[2]))*H(Q_19[0], Q_19[1], Q_19[2]))^-1*transpose(H(Q_19[0], Q_19[1], Q_19[2]))*(R - f(Q_19[0], Q_19[1], Q_19[2])) = [3.09013; 2.50043; -0.163312]
Q_21 := Q_20 + (transpose(H(Q_20[0], Q_20[1], Q_20[2]))*H(Q_20[0], Q_20[1], Q_20[2]))^-1*transpose(H(Q_20[0], Q_20[1], Q_20[2]))*(R - f(Q_20[0], Q_20[1], Q_20[2])) = [3.09013; 2.50043; -0.163312]
Q_22 := Q_21 + (transpose(H(Q_21[0], Q_21[1], Q_21[2]))*H(Q_21[0], Q_21[1], Q_21[2]))^-1*transpose(H(Q_21[0], Q_21[1], Q_21[2]))*(R - f(Q_21[0], Q_21[1], Q_21[2])) = [3.09013; 2.50043; -0.163312]
Q_23 := Q_22 + (transpose(H(Q_22[0], Q_22[1], Q_22[2]))*H(Q_22[0], Q_22[1], Q_22[2]))^-1*transpose(H(Q_22[0], Q_22[1], Q_22[2]))*(R - f(Q_22[0], Q_22[1], Q_22[2])) = [3.09013; 2.50043; -0.163312]
Q_24 := Q_23 + (transpose(H(Q_23[0], Q_23[1], Q_23[2]))*H(Q_23[0], Q_23[1], Q_23[2]))^-1*transpose(H(Q_23[0], Q_23[1], Q_23[2]))*(R - f(Q_23[0], Q_23[1], Q_23[2])) = [3.09013; 2.50043; -0.163312]
Q_25 := Q_24 + (transpose(H(Q_24[0], Q_24[1], Q_24[2]))*H(Q_24[0], Q_24[1], Q_24[2]))^-1*transpose(H(Q_24[0], Q_24[1], Q_24[2]))*(R - f(Q_24[0], Q_24[1], Q_24[2])) = [3.09013; 2.50043; -0.163312]
