Q(X) := 1/sqrt(2*π)*integral(e^(-u^2/2), u = X .. ∞)
P_BPSK(EbN0) := Q(sqrt(2*10^(EbN0/10)))
P_BPSK(10) = 3.87211e-6
P_DBPSK(EbN0) := 1/2*e^(-10^(EbN0/10))
P_DBPSK(10) = 2.27e-5
P_BFSK_KG(EbN0) := Q(sqrt(10^(EbN0/10)))
P_BFSK_KG(10) = 0.000782701
P_BFSK_NKG(EbN0) := 1/2*e^(-1/2*10^(EbN0/10))
P_BFSK_NKG(10) = 0.00336897
P_Shenona(EbN0) :=
    1/2 if EbN0 < -1.6
    10^-10 if EbN0 ≥ -1.6
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