E_дв := 1
τ_дв := 10^-1
τ_dv := τ_дв
S_MSK(Δf) := 8*E_дв/π^2*(1 + cos(4*π*Δf*τ_дв))/(1 - (4*Δf*τ_дв)^2)^2
S_QPSK(Δf) := 2*E_дв*(sin(2*π*Δf*τ_дв)/(2*π*Δf*τ_дв))^2
n := 1.5
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# 2.22 | 2.97
2.97/2.22 = 1.33784
