# Исходные данные для построения офсетной двузеркальной антенны Грегори:
# Приложение 1
Dm := 800  # - диаметр раскрыва главного рефлектора
F := 310.3  # - фокальная длинна главного рефлектора
h := 434.6  # - смещение главного рефлектора
d_f_mr := 86.66  # - минимальная вертикальная дистанция между F_0 и краем главного рефлектора
β := 10 deg = 0.174533  # - угол наклона между осями систем координат сабрефлектора z_sr и главного рефлектора z_mr
# Расчет остальных параметров:
# 1)
θ_0 := -2*atan(h/(2*F)) = -1.22184  # рад
θ_0/deg = -70.0063  # град
# 2)
θ_U := -2*atan((2*h + Dm)/(4*F)) = -1.86282  # рад
θ_U/deg = -106.732  # град
# 3)
θ_L := -2*atan((2*h - Dm)/(4*F)) = -0.11139  # рад
θ_L/deg = -6.38216  # град
σ := 1
# 4)
e := (1 - σ*sqrt(tan(β/2)/tan((β - θ_0)/2)))/(1 + σ*sqrt(tan(β/2)/tan((β - θ_0)/2))) = 0.51185
# 5)
α := 2*atan((e + 1)/(e - 1)*tan(β/2)) = -0.529215
α/deg = -30.3218  # град
# 6)
θ_e := -σ*(2*atan((1 - e)/(1 + e)*tan((θ_U - β)/2)) - α) = 0.436328
θ_e/deg = 24.9998  # град
# 7)
f := (d_f_mr - h + Dm/2)/(2*sin(β)) = 149.901
# 8)
a := f/e = 292.861
# 9)
Ds_x := -σ*a*((e^2 - 1)*sin(β - θ_U)/(e*cos(β - θ_U) + 1) - (e^2 - 1)*sin(β - θ_L)/(e*cos(β - θ_L) + 1)) = 209.888
# 10)
Lm := -a*(e^2 - 1)/(e*cos(β - θ_0) + 1) - h/sin(θ_0) = 660.975
# 11)
Ls := a*(2 + (e^2 - 1)/(e*cos(β - θ_0) + 1)) = 387.22
# 12)
d_sr_mr := h - Dm/2 - a*((σ - 1)/2)*(e^2 - 1)*sin(θ_U)/(e*cos(β - θ_U) + 1) + a*((σ + 1)/2)*(e^2 - 1)*sin(θ_L)/(e*cos(β - θ_L) + 1) = 50.7128
# 13)
Lt := -a*((σ + 1)/2)*(e^2 - 1)*cos(θ_L)/(e*cos(β - θ_L) + 1) + a*((σ - 1)/2)*(e^2 - 1)*cos(θ_U)/(e*cos(β - θ_U) + 1) - (2*h - Dm)^2/(16*F) + F = 453.39
# 14)
Ht := h + Dm/2 - a*((σ - 1)/2)*(e^2 - 1)*sin(θ_L)/(e*cos(β - θ_L) + 1) + a*((σ + 1)/2)*(e^2 - 1)*sin(θ_U)/(e*cos(β - θ_U) + 1) = 1103.49
[x; y; z]
# 15)
F_0 := [-2*f*sin(β); 0; -2*f*cos(β)] = [-52.06; 0; -295.247]
Q_0 := [h; 0; h^2/(4*F) - F] = [434.6; 0; -158.127]
Q_1 := [h - Dm/2; 0; (2*h - Dm)^2/(16*F) - F] = [34.6; 0; -309.335]
Q_2 := [h + Dm/2; 0; (2*h + Dm)^2/(16*F) - F] = [834.6; 0; 250.897]
R_0 := [h; 0; max(0, transpose(Q_0)[:, 2], transpose(Q_1)[:, 2], transpose(Q_2)[:, 2])] = [434.6; 0; 250.897]
R_1 := [h - Dm/2; 0; max(0, transpose(Q_0)[:, 2], transpose(Q_1)[:, 2], transpose(Q_2)[:, 2])] = [34.6; 0; 250.897]
R_2 := [h + Dm/2; 0; max(0, transpose(Q_0)[:, 2], transpose(Q_1)[:, 2], transpose(Q_2)[:, 2])] = [834.6; 0; 250.897]
P_0 := [σ*σ*(2*a - Ls)*sin(θ_0); 0; σ*σ*(2*a - Ls)*cos(θ_0)] = [-186.538; 0; 67.871]
P_1 := [
    σ*(-σ*a*(e^2 - 1)/(e*cos(θ_L - β) + 1))*sin(θ_L);
    0;
    σ*(-σ*a*(e^2 - 1)/(e*cos(θ_L - β) + 1))*cos(θ_L)
] = [-16.1128; 0; 144.054]
F0P1 := a*(2 + σ^2*(e^2 - 1)/(e*cos(θ_L - β) + 1)) = 440.769
P_2 := [
    σ*(-σ*a*(e^2 - 1)/(e*cos(θ_U - β) + 1))*sin(θ_U);
    0;
    σ*(-σ*a*(e^2 - 1)/(e*cos(θ_U - β) + 1))*cos(θ_U)
] = [-268.893; 0; -80.8343]
F0P2 := a*(2 + σ^2*(e^2 - 1)/(e*cos(θ_U - β) + 1)) = 304.941
xC_sr := (F0P1*sin(α + θ_e) + F0P2*sin(α - θ_e))/2 = -145.827
yC_sr := 0
zC_sr := a*sqrt(1 + xC_sr^2/(f^2 - a^2)) - f = 88.7471
C_sr := [xC_sr; yC_sr; zC_sr] = [-145.827; 0; 88.7471]
ϕ := 0, 0.0001 .. 2*π
# 16)
Ds_y(ϕ) := 2*a*(e^2 - 1)*sin(θ_e)*sin(ϕ)/(e*(-sin(α)*sin(θ_e)*cos(ϕ) + cos(α)*cos(θ_e)) - 1)
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309.88
