S := [A_1*cos(k*ω*T + φ_0); A_1*sin(k*ω*T + φ_0); A_2*cos(k*ω*T + φ_0 + Δφ); A_2*sin(k*ω*T + φ_0 + Δφ)]  # error: Эта переменная не определена.
y := [y_1; y_2; y_3; y_4]  # error: Эта переменная не определена.
D := [σ^2, 0, 0, 0; 0, σ^2, 0, 0; 0, 0, σ^2, 0; 0, 0, 0, σ^2]  # error: Эта переменная не определена.
transpose(S) → [A_1*cos(φ_0 + T*ω*k), A_1*sin(φ_0 + T*ω*k), A_2*cos(Δφ + φ_0 + T*ω*k), A_2*sin(Δφ + φ_0 + T*ω*k)]
D^-1 → [1/σ^2, 0, 0, 0; 0, 1/σ^2, 0, 0; 0, 0, 1/σ^2, 0; 0, 0, 0, 1/σ^2]
transpose(S)*D^-1 → [A_1*cos(φ_0 + T*ω*k)/σ^2, A_1*sin(φ_0 + T*ω*k)/σ^2, A_2*cos(Δφ + φ_0 + T*ω*k)/σ^2, A_2*sin(Δφ + φ_0 + T*ω*k)/σ^2]
y - 1/2*S → [
    y_1 - A_1*cos(φ_0 + T*ω*k)/2;
    y_2 - A_1*sin(φ_0 + T*ω*k)/2;
    y_3 - A_2*cos(Δφ + φ_0 + T*ω*k)/2;
    y_4 - A_2*sin(Δφ + φ_0 + T*ω*k)/2
]
transpose(S)*D^-1*(y - 1/2*S) → A_2*cos(Δφ + φ_0 + T*ω*k)*(y_3 - A_2*cos(Δφ + φ_0 + T*ω*k)/2)/σ^2 + A_2*sin(Δφ + φ_0 + T*ω*k)*(y_4 - A_2*sin(Δφ + φ_0 + T*ω*k)/2)/σ^2 + A_1*cos(φ_0 + T*ω*k)*(y_1 - A_1*cos(φ_0 + T*ω*k)/2)/σ^2 + A_1*sin(φ_0 + T*ω*k)*(y_2 - A_1*sin(φ_0 + T*ω*k)/2)/σ^2
d/dA_1(transpose(S)*D^-1*(y - 1/2*S)) → cos(φ_0 + T*ω*k)*(y_1 - A_1*cos(φ_0 + T*ω*k)/2)/σ^2 + sin(φ_0 + T*ω*k)*(y_2 - A_1*sin(φ_0 + T*ω*k)/2)/σ^2 - A_1*cos(φ_0 + T*ω*k)^2/(2*σ^2) - A_1*sin(φ_0 + T*ω*k)^2/(2*σ^2)
d/dA_2(transpose(S)*D^-1*(y - 1/2*S)) → cos(Δφ + φ_0 + T*ω*k)*(y_3 - A_2*cos(Δφ + φ_0 + T*ω*k)/2)/σ^2 + sin(Δφ + φ_0 + T*ω*k)*(y_4 - A_2*sin(Δφ + φ_0 + T*ω*k)/2)/σ^2 - A_2*cos(Δφ + φ_0 + T*ω*k)^2/(2*σ^2) - A_2*sin(Δφ + φ_0 + T*ω*k)^2/(2*σ^2)
d/dω(transpose(S)*D^-1*(y - 1/2*S)) → A_2*T*k*cos(Δφ + φ_0 + T*ω*k)*(y_4 - A_2*sin(Δφ + φ_0 + T*ω*k)/2)/σ^2 - A_2*T*k*sin(Δφ + φ_0 + T*ω*k)*(y_3 - A_2*cos(Δφ + φ_0 + T*ω*k)/2)/σ^2 - A_1*T*k*sin(φ_0 + T*ω*k)*(y_1 - A_1*cos(φ_0 + T*ω*k)/2)/σ^2 + A_1*T*k*cos(φ_0 + T*ω*k)*(y_2 - A_1*sin(φ_0 + T*ω*k)/2)/σ^2
d/dφ_0(transpose(S)*D^-1*(y - 1/2*S)) → A_2*cos(Δφ + φ_0 + T*ω*k)*(y_4 - A_2*sin(Δφ + φ_0 + T*ω*k)/2)/σ^2 - A_2*sin(Δφ + φ_0 + T*ω*k)*(y_3 - A_2*cos(Δφ + φ_0 + T*ω*k)/2)/σ^2 - A_1*sin(φ_0 + T*ω*k)*(y_1 - A_1*cos(φ_0 + T*ω*k)/2)/σ^2 + A_1*cos(φ_0 + T*ω*k)*(y_2 - A_1*sin(φ_0 + T*ω*k)/2)/σ^2
d/dΔφ(transpose(S)*D^-1*(y - 1/2*S)) → A_2*cos(Δφ + φ_0 + T*ω*k)*(y_4 - A_2*sin(Δφ + φ_0 + T*ω*k)/2)/σ^2 - A_2*sin(Δφ + φ_0 + T*ω*k)*(y_3 - A_2*cos(Δφ + φ_0 + T*ω*k)/2)/σ^2
d/dA_1(d/dA_1(transpose(S)*D^-1*(y - 1/2*S))) → -cos(φ_0 + T*ω*k)^2/σ^2 - sin(φ_0 + T*ω*k)^2/σ^2
d/dA_1(d/dA_2(transpose(S)*D^-1*(y - 1/2*S))) → 0
d/dA_2(d/dA_1(transpose(S)*D^-1*(y - 1/2*S))) → 0
d/dA_1(d/dω(transpose(S)*D^-1*(y - 1/2*S))) → T*k*cos(φ_0 + T*ω*k)*(y_2 - A_1*sin(φ_0 + T*ω*k)/2)/σ^2 - T*k*sin(φ_0 + T*ω*k)*(y_1 - A_1*cos(φ_0 + T*ω*k)/2)/σ^2
d/dω(d/dA_1(transpose(S)*D^-1*(y - 1/2*S))) → T*k*cos(φ_0 + T*ω*k)*(y_2 - A_1*sin(φ_0 + T*ω*k)/2)/σ^2 - T*k*sin(φ_0 + T*ω*k)*(y_1 - A_1*cos(φ_0 + T*ω*k)/2)/σ^2
d/dA_1(d/dφ_0(transpose(S)*D^-1*(y - 1/2*S))) → cos(φ_0 + T*ω*k)*(y_2 - A_1*sin(φ_0 + T*ω*k)/2)/σ^2 - sin(φ_0 + T*ω*k)*(y_1 - A_1*cos(φ_0 + T*ω*k)/2)/σ^2
d/dA_1(d/dΔφ(transpose(S)*D^-1*(y - 1/2*S))) → 0
d/dA_2(d/dA_2(transpose(S)*D^-1*(y - 1/2*S))) → -cos(Δφ + φ_0 + T*ω*k)^2/σ^2 - sin(Δφ + φ_0 + T*ω*k)^2/σ^2
d/dA_2(d/dω(transpose(S)*D^-1*(y - 1/2*S))) → T*k*cos(Δφ + φ_0 + T*ω*k)*(y_4 - A_2*sin(Δφ + φ_0 + T*ω*k)/2)/σ^2 - T*k*sin(Δφ + φ_0 + T*ω*k)*(y_3 - A_2*cos(Δφ + φ_0 + T*ω*k)/2)/σ^2
d/dA_2(d/dφ_0(transpose(S)*D^-1*(y - 1/2*S))) → cos(Δφ + φ_0 + T*ω*k)*(y_4 - A_2*sin(Δφ + φ_0 + T*ω*k)/2)/σ^2 - sin(Δφ + φ_0 + T*ω*k)*(y_3 - A_2*cos(Δφ + φ_0 + T*ω*k)/2)/σ^2
d/dA_2(d/dΔφ(transpose(S)*D^-1*(y - 1/2*S))) → cos(Δφ + φ_0 + T*ω*k)*(y_4 - A_2*sin(Δφ + φ_0 + T*ω*k)/2)/σ^2 - sin(Δφ + φ_0 + T*ω*k)*(y_3 - A_2*cos(Δφ + φ_0 + T*ω*k)/2)/σ^2
d/dω(d/dω(transpose(S)*D^-1*(y - 1/2*S))) → -A_1^2*T^2*k^2*cos(φ_0 + T*ω*k)^2/(2*σ^2) - A_1^2*T^2*k^2*sin(φ_0 + T*ω*k)^2/(2*σ^2) - A_2^2*T^2*k^2*cos(Δφ + φ_0 + T*ω*k)^2/(2*σ^2) - A_2^2*T^2*k^2*sin(Δφ + φ_0 + T*ω*k)^2/(2*σ^2) - A_2*T^2*k^2*cos(Δφ + φ_0 + T*ω*k)*(y_3 - A_2*cos(Δφ + φ_0 + T*ω*k)/2)/σ^2 - A_2*T^2*k^2*sin(Δφ + φ_0 + T*ω*k)*(y_4 - A_2*sin(Δφ + φ_0 + T*ω*k)/2)/σ^2 - A_1*T^2*k^2*cos(φ_0 + T*ω*k)*(y_1 - A_1*cos(φ_0 + T*ω*k)/2)/σ^2 - A_1*T^2*k^2*sin(φ_0 + T*ω*k)*(y_2 - A_1*sin(φ_0 + T*ω*k)/2)/σ^2
d/dω(d/dφ_0(transpose(S)*D^-1*(y - 1/2*S))) → -A_1^2*T*k*cos(φ_0 + T*ω*k)^2/(2*σ^2) - A_1^2*T*k*sin(φ_0 + T*ω*k)^2/(2*σ^2) - A_2^2*T*k*cos(Δφ + φ_0 + T*ω*k)^2/(2*σ^2) - A_2^2*T*k*sin(Δφ + φ_0 + T*ω*k)^2/(2*σ^2) - A_2*T*k*cos(Δφ + φ_0 + T*ω*k)*(y_3 - A_2*cos(Δφ + φ_0 + T*ω*k)/2)/σ^2 - A_2*T*k*sin(Δφ + φ_0 + T*ω*k)*(y_4 - A_2*sin(Δφ + φ_0 + T*ω*k)/2)/σ^2 - A_1*T*k*cos(φ_0 + T*ω*k)*(y_1 - A_1*cos(φ_0 + T*ω*k)/2)/σ^2 - A_1*T*k*sin(φ_0 + T*ω*k)*(y_2 - A_1*sin(φ_0 + T*ω*k)/2)/σ^2
d/dω(d/dΔφ(transpose(S)*D^-1*(y - 1/2*S))) → -A_2^2*T*k*cos(Δφ + φ_0 + T*ω*k)^2/(2*σ^2) - A_2^2*T*k*sin(Δφ + φ_0 + T*ω*k)^2/(2*σ^2) - A_2*T*k*cos(Δφ + φ_0 + T*ω*k)*(y_3 - A_2*cos(Δφ + φ_0 + T*ω*k)/2)/σ^2 - A_2*T*k*sin(Δφ + φ_0 + T*ω*k)*(y_4 - A_2*sin(Δφ + φ_0 + T*ω*k)/2)/σ^2
d/dφ_0(d/dφ_0(transpose(S)*D^-1*(y - 1/2*S))) → -A_1^2*cos(φ_0 + T*ω*k)^2/(2*σ^2) - A_1^2*sin(φ_0 + T*ω*k)^2/(2*σ^2) - A_2^2*cos(Δφ + φ_0 + T*ω*k)^2/(2*σ^2) - A_2^2*sin(Δφ + φ_0 + T*ω*k)^2/(2*σ^2) - A_2*cos(Δφ + φ_0 + T*ω*k)*(y_3 - A_2*cos(Δφ + φ_0 + T*ω*k)/2)/σ^2 - A_2*sin(Δφ + φ_0 + T*ω*k)*(y_4 - A_2*sin(Δφ + φ_0 + T*ω*k)/2)/σ^2 - A_1*cos(φ_0 + T*ω*k)*(y_1 - A_1*cos(φ_0 + T*ω*k)/2)/σ^2 - A_1*sin(φ_0 + T*ω*k)*(y_2 - A_1*sin(φ_0 + T*ω*k)/2)/σ^2
d/dφ_0(d/dΔφ(transpose(S)*D^-1*(y - 1/2*S))) → -A_2^2*cos(Δφ + φ_0 + T*ω*k)^2/(2*σ^2) - A_2^2*sin(Δφ + φ_0 + T*ω*k)^2/(2*σ^2) - A_2*cos(Δφ + φ_0 + T*ω*k)*(y_3 - A_2*cos(Δφ + φ_0 + T*ω*k)/2)/σ^2 - A_2*sin(Δφ + φ_0 + T*ω*k)*(y_4 - A_2*sin(Δφ + φ_0 + T*ω*k)/2)/σ^2
d/dΔφ(d/dΔφ(transpose(S)*D^-1*(y - 1/2*S))) → -A_2^2*cos(Δφ + φ_0 + T*ω*k)^2/(2*σ^2) - A_2^2*sin(Δφ + φ_0 + T*ω*k)^2/(2*σ^2) - A_2*cos(Δφ + φ_0 + T*ω*k)*(y_3 - A_2*cos(Δφ + φ_0 + T*ω*k)/2)/σ^2 - A_2*sin(Δφ + φ_0 + T*ω*k)*(y_4 - A_2*sin(Δφ + φ_0 + T*ω*k)/2)/σ^2
