Q(X) := 1/sqrt(2*π)*integral(e^(-u^2/2), u = X .. ∞)
P_E_8PSK(EbN0) := 2*Q(sqrt(10^(EbN0/10))*sqrt(3)*sin(π/8))
P_B_8PSK(EbN0) := P_E_8PSK(EbN0)/3
P_E_2ASK(EbN0) := Q(1/2*sqrt(10^(2*EbN0/10)))
P_B_2ASK(EbN0) := P_E_2ASK(EbN0)/3
Q(0) = 0.5
P_Shenona(EbN0) :=
    1/2 if EbN0 < -1.6
    10^-10 if EbN0 ≥ -1.6
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integral(cos(2*π*10^3*t)^2, t = 0 .. 10^-3) = 0.0005
integral(cos(2*2*π*10^3*t), t = 0 .. 10^-3) = -3.05311e-19
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integral(cos(2*π*10^3*t)^2, t = 0 .. 10^-3) = 0.0005
