# Задача 3
h_3 := 30000*10^3
R := 6370*10^3
γ := 2*asin(R/(R + h_3))/deg = 20.1741
R/(R + h_3) = 0.175144
1/(20*10^6) = 5e-8
# Задача 5
G := 6.67*10^-11
M := 6*10^24
h_5 := 35768*10^3
T(R) := 2*π*R/sqrt(G*M/R)
d := h_5
f := 40*10^9
c := 3*10^8
T(35768*10^3)/86164 = 0.779754
λ := c/f = 0.0075
L_0 := 16*π^2*d^2/λ^2 = 3.59159e21
L_0 := 10*log(L_0) = 215.553
L_pot := 20
asin(R/(R + h_5))/deg = 8.69473
L_sum := L_0 + L_pot = 235.553
2*(π/2 - asin(R/(R + h_5)))/deg = 162.611
log(64, 2) = 6
# Задача 1
T_1 := 86164
a_1 := 41785
a_2 := 20893
T_2 := sqrt(T_1^2*a_2^3/a_1^3) = 30464.7
30.465*10^3/(60*60) = 8.4625
30.465*10^3/60 - 8*60 = 27.75
30.465*10^3 - 8*60*60 - 27*60 = 45
i := 55
Φ := (i*π/32 - π)/deg = 129.375
f(x) := |sin(π*x)/(π*x)|
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f(0)*f(0 - 2*1.732) = 0.0913038
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