U_sh := 0.1
K_d := 0.8
U_s := [0; 0.1; 0.2; 0.3; 0.4; 0.5; 0.6; 0.7; 0.8; 0.9; 1]
U_sr := [0.125; 0.124; 0.182; 0.254; 0.330; 0.408; 0.487; 0.566; 0.645; 0.725; 0.804]
0.1/(0.8*1.25) = 0.1
σ_U := [0.065; 0.062; 0.073; 0.077; 0.079; 0.079; 0.079; 0.080; 0.080; 0.080; 0.080]
M(a) := sqrt(π/2)*e^(-a^2/4)*((1 + a^2/2)*In(0, a^2/4) + a^2/2*In(1, a^2/4))
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N(a) := sqrt(2 + a^2 - M(a)^2)
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