P_vx := 5*10^-19*1*10^6 = 5e-13
P_vix := P_vx*4 = 2e-12
U_sh := sqrt(P_vix*50) = 1e-5
w(u) := 1/(U_sh*sqrt(2*π))*e^(-u^2/(2*U_sh^2))
w_og(U) := U/U_sh^2*e^(-U^2/(2*U_sh^2))
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40.56*10^-15/(1.38*10^-23*1*10^6) - 293 = 2646.13
0.1*0.66/1.25 = 0.0528
2.646*10^3/293 + 1 = 10.0307
293*1.38*10^-23*1*10^6 = 4.0434e-15
5.07*10^-13/12.5 = 4.056e-14
20*log(5*10^-13) = -246.021
U_s := [0; 0.1; 0.2; 0.3; 0.4; 0.5; 0.6; 0.7; 0.8; 0.9; 1]
CAO := [58.81; 46.21; 26.89; 16.41; 11.85; 9.32; 7.74; 6.6; 5.77; 5.09; 4.6]
U_sh := 0.1
a := U_s/U_sh
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