N := 32
d/λ := 0.52  # error: Здесь необходимо указать имя.
# Метод парциальных диаграмм (Вудворда)
F_1(θ) := sin(N*sin(0.52*θ*deg))/(N*sin(0.52*π*sin(θ*deg)))
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# Синтез ДН, хотим сделать шире на том же фазовом участке (но возьмём побольше, чтобы лучше видеть как сильно исаков похож на дона карлтона из университета монстров)
# Например, будем сдвигать каждые 15 градусов, чтобы расширить ДН
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# ой а вот и он, следит, как ты, умник, делаешь домашку по фар
F_2(θ) := sin(N*sin(0.52*(θ*deg - 15*deg)))/(N*sin(0.52*π*sin(θ*deg - 15*deg)))
F_3(θ) := sin(N*sin(0.52*(θ*deg - 30*deg)))/(N*sin(0.52*π*sin(θ*deg - 30*deg)))
F_4(θ) := sin(N*sin(0.52*(θ*deg - 45*deg)))/(N*sin(0.52*π*sin(θ*deg - 45*deg)))
F_5(θ) := sin(N*sin(0.52*(θ*deg - 60*deg)))/(N*sin(0.52*π*sin(θ*deg - 60*deg)))
F_Σ(θ) := F_2(θ) + F_3(θ) + F_4(θ) + F_5(θ)  # приветик, хочешь увидеть меня в сверхразрешении?))0)))00)
F_Σ1(θ) := F_Σ(θ + 38)
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# получаем чикибамбони, радуемся жизни, мы пральна сделали дз, исаков одобряет самолично
