N := 8
d/λ := 0.5  # error: Здесь необходимо указать имя.
F_1(θ) := sin(N*π*sin(0.5*θ*deg))/(N*sin(π*0.5*sin(θ*deg)))
F_2(θ) := sin(N*π*sin(0.5*(θ*deg - 21*deg)))/(N*sin(π*0.5*sin(θ*deg - 21*deg)))*0.235
# Исходная ДН
# ДН по max уровню бокового лепестка
# Модуль исходной ДН для определения max уровня бокового лепестка
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F_3(θ) := F_1(θ) - F_2(θ)
# Итоговое распределение
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# Дон Исаков Карлтон-роллтон не забыл прибежать посмотреть, как ты делаешь домашку за день до зачёта
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# маркеры не пишут, но вы держитесь
# Модуль результата
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# Если честно, получилась дичь, но красивая, поэтому всё на стиле, копируем
